*---------------------------------------------------------------------
* ADIABATIC HYDRATION / AGING / ACCIDENT - COOLING OF KALIFA (2000) EXPERIMENT
*---------------------------------------------------------------------
* By: Tan Kiet HONG

* Reference code: * G.Sciumè (31 - 10 - 2024)
* "CONCRETE CASTING AND LIFETIME CONDITIONS IMPACT ON HIGH TEMPERATURE RESISTANCE" by G. Sciumè (1), S. Dal Pont (2), D. Dauti (2)
* (1) I2M, Université de Bordeaux, Bordeaux, France
* (2) 3SR, Université Grenoble Alpes, Grenoble, France


OPTI ECHO 0;
*---------------------------------------------------------------------
* CONSTANT PHYSICAL PARAMEMTERS
*---------------------------------------------------------------------
RGP1     = 8.3145 ;
MMGA1    = 28.9645E-3 ;
MMGW1    = 18.0153E-3 ;
RHOS1    = 2625.8 ;
RHOW0    = 1000. ;
CPW1     = 4181.0 ;
CPGW1    = 1805.0 ;
CPGA1    = 1005.7 ;

*---------------------------------------------------------------------
* MESH - KALIFA 120x120mm
*---------------------------------------------------------------------
'OPTI' 'DIME' 2 'MODE' PLAN CONT 'ELEM' QUA4;

* OPTION 1: REGTANGULAR MESH 24X24 ELEMENTS (Original mesh used in Dauti's thesis is 28x28)
p1  = 0.0   0.0;
p2  = 0.12  0.0;
p3  = 0.12  0.12;
p4  = 0.0   0.12;

DAB1 = DROI 24 p1 p2;
DDA1 = DROI 24 p2 p3;
DCD1 = DROI 24 p3 p4;
DBC1 = DROI 24 p4 p1;

CONT1  = DAB1 ET DDA1 ET DCD1 ET DBC1;
MAIL1  = (SURF CONT1) 'COUL' 'BLAN';

* OPTION 2: REFINED 1D MESH (Not used in this example)
L1       = 0.12 ;
H1       = 0.12 ;
DY_COLD  = 0.005;
DY_HOT   = 0.001;

P1  = 0.   0.;
P2  = 0.   H1;
L12 = DROI P1 P2 'DINI' DY_COLD 'DFIN' DY_HOT;

*MAIL1 = (TRAN 1 L12 (L1 0.)) 'COUL' 'BLAN';
*DCD1 = COTE 2 MAIL1;
*DAB1 = COTE 4 MAIL1;

* VISUALIZATION OF THE MESH
TRAC (MAIL1 ET (DCD1 'COUL' 'ROUG') ET (DAB1 'COUL' 'BLEU')) TITRE 'Mesh - Kalifa HPC M100' ;

* ALIAS FOR BOUNDARIES: DCD1 = hot face (top, y=0.12) and DAB1 = cold face (bottom, y=0)
* [HYRIC] Vapor convection
CONTH1 = DCD1;
CONTH2 = DAB1;
CONTH = CONTH1 ET CONTH2;

* [THERMAL] Thermal convection and radiation
CONTT1 = DCD1;
CONTT2 = DAB1;

* Points of measurement for temperature (PO_00 to PO_120) along the vertical centerline of the sample
* x = 0.06 (mid sample), y = 0.120 - distance from hot face
PO_00  = MAIL1 POIN 'PROC' (0.06 0.120);
PO_10  = MAIL1 POIN 'PROC' (0.06 0.110);
PO_20  = MAIL1 POIN 'PROC' (0.06 0.100);
PO_30  = MAIL1 POIN 'PROC' (0.06 0.090);
PO_40  = MAIL1 POIN 'PROC' (0.06 0.080);
PO_50  = MAIL1 POIN 'PROC' (0.06 0.070);
PO_120 = MAIL1 POIN 'PROC' (0.06 0.000);

*---------------------------------------------------------------------
* MATERIAL PROPERTIES (HPC M100)
*---------------------------------------------------------------------

* MIX DATA
cem  = 350.   ;
aggr = 1920.  ;
wc   = 0.32   ;
sc   = 0.108  ;

* HYDRATION PROCESS DATA (affinity. activation energy. hydration heat)
AI   = 6    ;
AP   = 1250.  ;
GAMP = 0.24   ;
ALFA = 48.    ;
EAR1 = 5369.  ;
lat1 = 114.3e6 ;

* INTRINSIC PERMEABILITY
KINT = 2.E-19 ;
*KINT = 7.5E-20 ;

* THERMAL PARAMETERS
CS   = 960.   ;
KS   = 1.38   ;
*CS   = 835.   ;
*KS   = 1.67   ;

* DESORPTION ISOTHERME MODEL PARAMETERS
*a1   =  46.9364E6 ;
*b1   =  1.9433    ;
*c1   =  0.4854    ;

a1   =  18.6E6 ;
b1   =  2.27    ;
c1   =  1.5     ;

* VISUALAIZATION OF THE RETENTION CURVE
LPC = PROG 1.E5 PAS 1.E6 1.E9 ;
LSW = PROG ;

REPETER BOU1 (DIME LPC);
  PC_I = EXTR LPC &BOU1 ;
  SW_I = (1. + ((PC_I / a1)**b1))**(-1. * c1) ;
  LSW = LSW ET (PROG SW_I) ;
FIN BOU1 ;

EVO1 = EVOL 'BLEU' MANU 'Pc (Pa)' LPC 'Sw' LSW ;
DESS EVO1
     'XBOR' 0. 1000000000. 'XGRA' 100000000.
     'YBOR' 0. 1. 'YGRA' 0.1
      'GRIL' 'POIN' 'GRIS'
      TITRE 'Desorption Isotherm HPC M100' ;


*---------------------------------------------------------------------
* MODEL DEFINITION
*---------------------------------------------------------------------
MODTHC  = 'MODE' MAIL1 'THERMOHYDRIQUE' 'BETON_THM' 'CONS' 'BO';
MODCOT1 = 'MODE' CONTT1 'THERMIQUE' 'CONVECTION';
MODCOT2 = 'MODE' CONTT2 'THERMIQUE' 'CONVECTION';
MODRAY  = 'MODE' CONTT1 'THERMIQUE' 'RAYONNEMENT' 'INFINI';
MOD_TOT = MODTHC ET MODCOT1 ET MODCOT2 ET MODRAY ;
*---------------------------------------------------------------------

*---------------------------------------------------------------------
* MATERIAL MODEL DEFINITION
*---------------------------------------------------------------------
WINF GAM0 POR1 APOR = @POWERS cem aggr wc sc;
MATTHC = 'MATE' MODTHC 'CS'  CS    'KS'   KS   'GAM0' GAM0 'WINF' WINF
'VGA' a1   'VGB'  b1   'VGC' c1    'K1' KINT  'AK'   3.  'BK'   1.
'KLI1' 20000.  'AKLI'   1.  'BKLI' 1. 'POR1' POR1 'APOR' APOR
'AFF1' Ai  'AFF2' Ap   'AFF3' GAMP 'AFF4' ALFA 'EAR'  EAR1 'QLAT' lat1;
MATCOT1  = 'MATE'  MODCOT1   'H'     10.;
MATCOT2  = 'MATE'  MODCOT2   'H'     10.;
MATRAY  = 'MATE'  MODRAY   'EMIS'   0.;
MAT_TOT = MATTHC et MATCOT1 ET MATCOT2 ET MATRAY;
*---------------------------------------------------------------------

*---------------------------------------------------------------------
* Vapor convection (processed by Charther) and therefore not to be added to the overall model
*---------------------------------------------------------------------
MODCOH  = 'MODE' CONTH 'THERMIQUE' 'CONVECTION' ;
MATCOH  = 'MATE' MODCOH   'H'                0. ;
*---------------------------------------------------------------------

*---------------------------------------------------------------------*
* TEST DESCRIPTION AND TEMPORAL DISCRETIZATION
*---------------------------------------------------------------------*
* Modeled phases
* I)   Early age :        0           ---> 3 days              /  adiabatic conditions
* II)  Aging     :        3           ---> age time            /  H & T convection
* III) Accident  : age time           ---> age time + 240 mins /  H convection & T convection + radiation (hot face)
* IV)  Cooling   : age time + 240 min ---> age time + 600 mins /  H & T convection
*---------------------------------------------------------------------*
minute1  = 60.         ;
hours1   = 3600.       ;
day1     = 86400.      ;
year1    = 360 * day1  ;

* Duration of diferent phases
early_time =   3 * day1   ;
age_time   =   1 * year1  ;

* Accident phase duration
* x = 10 mins (original paper is 0 mins but we need some time for the ramp to reach 400oC)
* Ramp:    0    -->x min     (20oC --> 400oC)
* Linear1: x    -->x+130 min (400oC --> 460oC)
* Linear2: x+130-->x+240 min (460oC --> 466oC)
ramp_time   = 1 * minute1;
lin1_time   = 130 * minute1 - ramp_time;
lin2_time   = 110 * minute1;
acc_time    = ramp_time + lin1_time + lin2_time;

ramp2_time  = 1 * minute1;
cool_time   = 360 * minute1;

* Time markers for the different phases
temps1       =  early_time ;

temps2a      =  early_time + (3 * day1) ;
temps2       =  age_time   ;

temps_ramp   = age_time  + ramp_time ;
temps_lin1   = age_time  + ramp_time + lin1_time ;
temps3       = age_time  + acc_time ;

temps_ramp2  = temps3 + ramp2_time ;
temps4       = temps3 + cool_time ;


* Time steps for the different phases
DT01     =  600.;

DT12a    =  600.;
DT2a2    =  3 * day1;

DT_RAMP  =   5.;
DT_LIN1  =   15. ;
DT_LIN2  =   15. ;

DT_RAMP2 =   1.;
DT34     =   15.;

* Calculation of the time steps for the different phases
LTP_HYDR = PROG  0.              PAS DT01 temps1        ;
LTP_AGIN = PROG (temps1 + DT12a) PAS DT12a temps2a PAS DT2a2 temps2 ;
LTP_ACCI = PROG (temps2 + DT_RAMP) PAS DT_RAMP temps_ramp PAS DT_LIN1 temps_lin1 PAS DT_LIN2 temps3;
LTP_COOL = PROG (temps3 + DT_RAMP2) PAS DT_RAMP2 temps_ramp2 PAS DT34 temps4;
LTP_TOT  = LTP_HYDR ET LTP_AGIN ET LTP_ACCI ET LTP_COOL;

* Saved times
LSA_HYDR = PROG  0.              PAS hours1 temps1;
LSA_AGIN = PROG (temps1 + DT2a2) PAS DT2a2  temps2;
LSA_ACCI = PROG (temps2 + 60.)  PAS 60.   temps3;
LSA_COOL = PROG (temps3 + 60.)  PAS 60.   temps4;
LSA_TOT  = LSA_HYDR ET LSA_AGIN ET LSA_ACCI ET LSA_COOL;
*---------------------------------------------------------------------


*---------------------------------------------------------------------
* INITIAL CONDITION (COST adibatic calorimetry test)
* - initial degree of hydration HY_0 = 0
* - initial temperature TC_0 = 22°
* - initial gas pressure PG_0 = p_atm
* - initial relative humidity HR_0 = 0.99995
HY_0   = 0.            ;
TC_0   = 20.           ;
TK_0   = 273.15 + TC_0 ;
PG_0   = 101325.       ;
HR_0   = 0.99995        ;

ZERO1  = MANU 'CHPO' MAIL1 'SCAL' 0.       ;
CHTK_0 = MANU 'CHPO' MAIL1 'T' TK_0        ;
PVS_0 XX YY ZZ KK JJ= @PVSAT ZERO1 ZERO1 CHTK_0    ;

* Clapeyron
PC_0   = PG_0 - PVS_0 + ((-1.)*(RGP1*TK_0*RHOW0*(LOG(HR_0))/MMGW1));
PC_0   = PC_0 'NOMC' 'PC';

* Calculation of the corresponding degree of saturation
CHPC_0 = MANU CHPO MAIL1 1 'SCAL' (MAXI PC_0);
CHTK_0 = MANU CHPO MAIL1 1 'SCAL' TK_0;
HYDR   = MANU CHPO MAIL1 1 'SCAL' HY_0;
cha1   = MANU CHPO MAIL1 1 'SCAL' a1;
chb1   = MANU CHPO MAIL1 1 'SCAL' b1;
chc1   = MANU CHPO MAIL1 1 'SCAL' c1;
chgam0 = MANU CHPO MAIL1 1 'SCAL' gam0;

SW0    = @SATURA CHPC_0 CHTK_0 HYDR cha1 chb1 chc1 chgam0;

CI_TH  = ('MANU' 'CHPO' MAIL1 2 'PG' PG_0 'T' TK_0)  +  PC_0;
*TRAC CI_TH MAIL1;
*---------------------------------------------------------------------*

*---------------------------------------------------------------------*
* BOUNDARY CONDITIONS
* - PC_ext = p_atm
*
* - TC_ext = 20°C until "age time" then accident phase thermal loading (see below)
*
*             / 0.95            0      < time < 3 days
* - HR_ext = {  0.95 --> 0.50   3 days < time < 6 days
*             \ 0.50            6 days < time < age time
* - Accident:  PGWe_i  = 1300.;
*---------------------------------------------------------------------*
TK_E  = TK_0;
PG_E  = PG_0;
HR_E1 = 0.95;
HR_E2 = 0.50;

* PG: imposed gas pressure at the top and bottom faces (PG_ext = p_atm)
EV_PG = 'EVOL' 'MANU' 'TEMPS'  ('PROG' 0.  temps4) ('PROG' 1. 1.);
CLPG1 = 'BLOQ' 'PG'         CONTT1;
CLPG2 = 'BLOQ' 'PG'         CONTT2;
CLPGT = CLPG1 ET CLPG2;
CHPG1 = 'DEPI'  CLPG1        PG_E;
CHPG2 = 'DEPI'  CLPG2        PG_E;
CGPG1 = 'CHAR' 'TIMP' CHPG1 EV_PG;
CGPG2 = 'CHAR' 'TIMP' CHPG2 EV_PG;


* T: Thermal convection and radiation
* --- Temperature loading curve ---

T_RAMP      = 400. ;
DELTAT_RAMP = T_RAMP - TC_0;
DELTAT_LIN1 = 60.;
DELTAT_LIN2 = 6.;

N1     = 1   ;
PRO_TK = PROG;
REPETER BOU_TE (DIME LTP_TOT);
    TIMEi  = EXTR N1 LTP_TOT;
* Before accident phase, temperature is constant at 20oC
SI (TIMEi '<EG' temps2);
TKi    = TK_E;
FINS;
* Linear 400-->460oC from x min to x+130 min
SI ((TIMEi '>' temps2) ET (TIMEi '<EG' temps_lin1));
TKi = T_RAMP + 273.15 + (DELTAT_LIN1 * ((TIMEi - temps2) / (temps_lin1 - temps2)));
FINS;
* Linear 460-->466oC from x+130 min to x+240 min
SI ((TIMEi '>' temps_lin1) ET (TIMEi '<EG' temps3));
TKi = T_RAMP + DELTAT_LIN1 + 273.15 + (DELTAT_LIN2 * ((TIMEi - temps_lin1) / (temps3 - temps_lin1)));
FINS;
* Thermal radiator turned off after x+240 min
SI (TIMEi '>' temps3);
TKi    = TK_E;
FINS;
    PRO_TK = PRO_TK ET (PROG TKi);
    N1 = N1 + 1;
FIN BOU_TE;

EVTK1 = 'EVOL' 'MANU'  LTP_TOT  PRO_TK;

* PLOT THERMAL RAMP IN CELSIUS (Accident and cooling phases)
L_TIME = EXTR EVTK1 'ABSC' ;
L_TEMP = EXTR EVTK1 'ORDO' ;
L_TIME_MIN = (L_TIME - (PROG (DIME L_TIME) * temps2)) / 60. ;
L_TEMP_C   = L_TEMP - (PROG (DIME L_TEMP) * 273.15) ;
EV_PLOT = EVOL 'ROUG' 'MANU' 'Time (min)' L_TIME_MIN 'Temp (C)' L_TEMP_C ;

*DESS EV_PLOT 'XBOR' 0. 600. 'XGRA' 50.
             'YBOR' 0. 500. 'YGRA' 50.
             'GRIL' 'POIN' 'GRIS'
             TITRE 'Thermal Loading Curve - Kalifa HPC M100' ;

* --- Hot face: convection + radiation (T_inf = T_rad) ---
CHTK1 = 'MANU' 'CHPO'  CONTT1 1 'T'  1. 'NATURE' 'DISCRETE';
CGTK1 = ('CHAR' 'TECO'  CHTK1    EVTK1) ET
        ('CHAR' 'TERA'  CHTK1    EVTK1);

* --- Cold face: convection only (T_inf = T_room = const) ---
EVTC1 = 'EVOL' 'MANU' ('PROG' 0. temps4) ('PROG' TK_0 TK_0);
CHTK2 = 'MANU' 'CHPO' CONTT2 1 'T' 1. 'NATURE' 'DISCRETE';
CGTK2 = 'CHAR' 'TECO' CHTK2 EVTC1;


* PC: hygral convection ( qw = hcv * (RGW_s - RGW_ext)n ) - Both faces
N1      = 1   ;
PRO_RGW = PROG;
REPETER BOU_RGW (DIME LTP_TOT);
    EXTR N1 LTP_TOT;
    TIMEi        = EXTR N1 LTP_TOT;
    TKi          = EXTR N1 PRO_TK ;
    PVSe_i XX YY ZZ KK JJ
           = @PVSAT ZERO1 ZERO1 (MANU 'CHPO' MAIL1 'T' TKi);
    PVSe_i       = MAXI PVSe_i;
    FGPGW0 = (MMGW1 / RGP1 )* (1./TKi) ;
       SI (TIMEi '<' temps1);
       PGWe_i  = HR_E1 * PVSe_i;
       FINS;
       SI (TIMEi '>EG' temps1);
       HR_i = HR_E1-(((TIMEi-temps1)/(temps2a-temps1))*(HR_E1-HR_E2));
       PGWe_i  = HR_i * PVSe_i;
       FINS;
       SI (TIMEi '>' temps2a);
       PGWe_i  = HR_E2 * PVSe_i;
       FINS;
       SI (TIMEi '>' temps2);
       PGWe_i  = 1300.;
       FINS;
    RGWi    = FGPGW0 * PGWe_i ;
    PRO_RGW = PRO_RGW ET (PROG RGWi);
    N1 = N1 + 1;
FIN BOU_RGW;
EVPC1   = 'EVOL' 'MANU' LTP_TOT  PRO_RGW;
*DESS EVPC1;
CHPC1   = 'MANU' 'CHPO' CONTH  1  'SCAL'  1. 'NATURE' 'DISCRETE';
CGPC1   = 'CHAR' 'TECO' CHPC1  EVPC1 ;
*---------------------------------------------------------------------

*---------------------------------------------------------------------*
*VI. Resolution PASAPAS : Early age (sealed)
*---------------------------------------------------------------------
TAB0                         = 'TABL' ;
TAB0 . 'MODELE'              = MOD_TOT ;
TAB0 . 'CARACTERISTIQUES'    = MAT_TOT ;
TAB0 . 'BLOCAGES_THERMIQUES' = CLPGT ;
TAB0 . 'CHARGEMENT'          = CGPG1 ET CGPG2 ET CGTK1 ET CGTK2;
TAB0 . 'TEMPS_CALCULES'      = LTP_HYDR ;
TAB0 . 'TEMPS_SAUVES'        = LSA_HYDR ;
TAB0 . 'PROCEDURE_THERMIQUE' = 'NONLINEAIRE' ;
TAB0 . 'RELAXATION_THETA'    = 1. ;
TAB0 . 'MOVA'                = 'D' ;

*--Vapor convection (managed by the CHARTHM procedure)
TAB0 . 'MO_CONVECTION_VAPEUR'     = TABLE;
TAB0 . 'MO_CONVECTION_VAPEUR' . 1 = MODCOH ;
TAB0 . 'MA_CONVECTION_VAPEUR'     = TABLE  ;
TAB0 . 'MA_CONVECTION_VAPEUR' . 1 = MATCOH ;
TAB0 . 'CH_CONVECTION_VAPEUR'     = TABLE  ;
TAB0 . 'CH_CONVECTION_VAPEUR' . 1 = CGPC1  ;
*---------------------------------------------------------------------
TAB0 . 'THM_PARAMETRES'      = MATTHC ;
TAB0 . 'TEMPERATURES'        = 'TABL' ;
TAB0 . 'TEMPERATURES' . 0    = CI_TH ;
TAB0 . 'HYDRATATION'         = 'TABL' ;
TAB0 . 'HYDRATATION' .  0    = MANU CHML MODTHC 'SCAL' HY_0;
TAB0 . 'DCH'                 = 'TABL' ;
TAB0 . 'DCH' .  0            = MANU CHML MODTHC 'SCAL' HY_0;
*---------------------------------------------------------------------
PASAPAS TAB0;

*---------------------------------------------------------------------
opti SAUV 'KALIFA_PHASE1';
SAUV;

*opti SAUV 'FORMAT' 'D:\castem\KALIFA_PHASE1';
*SAUV 'FORMAT';
*---------------------------------------------------------------------

*---------------------------------------------------------------------
opti REST 'KALIFA_PHASE1';
REST;

*opti REST 'FORMAT' 'D:\castem\KALIFA_PHASE1';
*REST 'FORMAT';
*---------------------------------------------------------------------

* --- Check the total number of saved steps
NTOT = DIME TAB0.'TEMPERATURES';
MESS '--- Total saved steps = ' NTOT;

* --- Visualization of the T, PG, PC field at the last saved time step (end of early aging)
CHMT = EXCO 'T' TAB0 . 'TEMPERATURES' . (NTOT - 1);
CHPG = EXCO 'PG' TAB0 . 'TEMPERATURES' . (NTOT - 1);
CHPC = EXCO 'PC' TAB0 . 'TEMPERATURES' . (NTOT - 1);
*TRAC CHMT MODTHC MAIL1 TITRE 'Temperature after early age phase';
*TRAC CHPG MODTHC MAIL1 TITRE 'Gas pressure after early age phase';
*TRAC CHPC MODTHC MAIL1 TITRE 'Capillary pressure after early age phase';

*---------------------------------------------------------------------
* DRYING AND AGING
*---------------------------------------------------------------------
MATCOH  = 'MATE' MODCOH   'H'  0.002;

*  Recalculation resumed
TAB0 . 'MA_CONVECTION_VAPEUR' . 1 = MATCOH ;
TAB0 . 'TEMPS_CALCULES'           = LTP_AGIN ;
TAB0 . 'TEMPS_SAUVES'             = LSA_AGIN ;
PASAPAS TAB0;

*---------------------------------------------------------------------
opti SAUV 'KALIFA_PHASE2';
SAUV;

opti SAUV 'FORMAT' 'D:\castem\KALIFA_PHASE2';
SAUV 'FORMAT';
*---------------------------------------------------------------------

*---------------------------------------------------------------------
opti REST 'KALIFA_PHASE2';
REST;

opti REST 'FORMAT' 'D:\castem\KALIFA_PHASE2';
REST 'FORMAT';
*---------------------------------------------------------------------

* --- Check the total number of saved steps
NTOT = DIME TAB0.'TEMPERATURES';
MESS '--- Total saved steps = ' NTOT;

* --- Visualization of the T, PG, PC field at the last saved time step (end of aging)
CHMT = EXCO 'T' TAB0 . 'TEMPERATURES' . (NTOT - 1);
CHPG = EXCO 'PG' TAB0 . 'TEMPERATURES' . (NTOT - 1);
CHPC = EXCO 'PC' TAB0 . 'TEMPERATURES' . (NTOT - 1);

L_ISO_T = PROG 292. PAS 1. 294. ;
*TRAC CHMT MODTHC MAIL1 L_ISO_T TITRE 'Temperature after aging phase - before accident';
L_ISO_PG = PROG 1.00E5 PAS 1000. 1.02E5 ;
*TRAC CHPG MODTHC MAIL1 L_ISO_PG TITRE 'Gas pressure after aging phase - before accident';
*TRAC CHPC MODTHC MAIL1 TITRE 'Capillary pressure after aging phase - before accident';


*---------------------------------------------------------------------
* ACCIDENT
*---------------------------------------------------------------------
OPTI ECHO 0;
DEBP PARATHER ;
  'ARGUMENT' TABTHER*'TABLE' INST*'FLOTTANT' ;
* (ENG) TABTHER is the input table of the PASAPAS procedur
*       INST is the current calculation time
* (ENG) The loading must be updated in the TABTHER.'WTABLE' table !
* (ENG) The 'THER_COURANT' indice is containing the current iteration
*       temperature field. The loading is updated to have TS = T.

*'MESS' 'ENTRA PARATHER';

WTABLE = TABTHER .'WTABLE' ;

SI ( (INST '>' temps2) ET (INST '<EG' temps3) );
   MATCOT1 = 'MATE' MODCOT1   'H'    11. ;
   MATCOT2 = 'MATE' MODCOT2   'H'    8.3 ;
   MATRAY  = 'MATE' MODRAY   'EMIS'  0.6  ;
   WTABLE.'MAT_TOT' = MATTHC et MATCOT1 et MATRAY et MATCOT2;
FINS;

FINP;
*---------------------------------------------------------------------

MATCOH  = 'MATE' MODCOH   'H'     0.018 ;

* Reprise du calcul
TAB0 . 'PROCEDURE_PARATHER'       = VRAI ;
TAB0 . 'CONVECTION_VAPEUR'        = 2 ;
TAB0 . 'MA_CONVECTION_VAPEUR' . 1 = MATCOH ;
TAB0 . 'TEMPS_CALCULES'           = LTP_ACCI ;
TAB0 . 'TEMPS_SAUVES'             = LSA_ACCI ;
PASAPAS TAB0;

*---------------------------------------------------------------------
opti SAUV 'KALIFA_PHASE3';
SAUV;

opti SAUV 'FORMAT' 'D:\castem\KALIFA_PHASE3';
SAUV 'FORMAT';
*---------------------------------------------------------------------

*---------------------------------------------------------------------
opti REST 'KALIFA_PHASE3';
REST;

opti REST 'FORMAT' 'D:\castem\KALIFA_PHASE3';
REST 'FORMAT';
*---------------------------------------------------------------------


*===================================================================*
*********** EXPORT GAS PRESSURE EVERY 5 MINUTES **************
*===================================================================*

* 1. Initialize the Cast3M base timeline (starting from temps2)
* Dùng PO_10 làm mốc trích xuất thời gian ban đầu vì đã bỏ PO_00
EVP_INIT = EVOL 'BLAN' 'TEMP' TAB0 'TEMPERATURES' 'PG' PO_10 ;
LT_SEC   = EXTR EVP_INIT 'ABSC' ;
LT_MIN   = (LT_SEC - (PROG (DIME LT_SEC) * temps2)) / 60. ;

* 2. Initialize the target time axis: From 0 to 240 minutes, step size 5 minutes
L_MIN_5  = PROG 0. PAS 5. 240. ;

* 3. Extract, convert to MPa (divide by 1.E6), and interpolate (IPOL) in a single line
* IPOL syntax: IPOL [new X-axis] [original graph]
LPG_10_5  = IPOL L_MIN_5 (EVOL 'MANU' LT_MIN ((EXTR (EVOL 'TEMP' TAB0 'TEMPERATURES' 'PG' PO_10)  'ORDO') / 1.E6)) ;
LPG_20_5  = IPOL L_MIN_5 (EVOL 'MANU' LT_MIN ((EXTR (EVOL 'TEMP' TAB0 'TEMPERATURES' 'PG' PO_20)  'ORDO') / 1.E6)) ;
LPG_30_5  = IPOL L_MIN_5 (EVOL 'MANU' LT_MIN ((EXTR (EVOL 'TEMP' TAB0 'TEMPERATURES' 'PG' PO_30)  'ORDO') / 1.E6)) ;
LPG_40_5  = IPOL L_MIN_5 (EVOL 'MANU' LT_MIN ((EXTR (EVOL 'TEMP' TAB0 'TEMPERATURES' 'PG' PO_40)  'ORDO') / 1.E6)) ;
LPG_50_5  = IPOL L_MIN_5 (EVOL 'MANU' LT_MIN ((EXTR (EVOL 'TEMP' TAB0 'TEMPERATURES' 'PG' PO_50)  'ORDO') / 1.E6)) ;
LPG_120_5 = IPOL L_MIN_5 (EVOL 'MANU' LT_MIN ((EXTR (EVOL 'TEMP' TAB0 'TEMPERATURES' 'PG' PO_120) 'ORDO') / 1.E6)) ;

* 4. Package into new graph objects to prepare for export.
EV_PG_10  = EVOL 'MANU' 'Time(min)' L_MIN_5 'PG_10mm(MPa)'  LPG_10_5 ;
EV_PG_20  = EVOL 'MANU' 'Time(min)' L_MIN_5 'PG_20mm(MPa)'  LPG_20_5 ;
EV_PG_30  = EVOL 'MANU' 'Time(min)' L_MIN_5 'PG_30mm(MPa)'  LPG_30_5 ;
EV_PG_40  = EVOL 'MANU' 'Time(min)' L_MIN_5 'PG_40mm(MPa)'  LPG_40_5 ;
EV_PG_50  = EVOL 'MANU' 'Time(min)' L_MIN_5 'PG_50mm(MPa)'  LPG_50_5 ;
EV_PG_120 = EVOL 'MANU' 'Time(min)' L_MIN_5 'PG_120mm(MPa)' LPG_120_5 ;

* Combine everything into one data package
EV_EXPORT_PG = EV_PG_10 ET EV_PG_20 ET EV_PG_30 ET EV_PG_40 ET EV_PG_50 ET EV_PG_120 ;

* 5. Export to CSV/TXT file
OPTI 'SORT' 'D:\castem\GasPressure_5min_Intervals.csv' ;
SORT 'EXCE' EV_EXPORT_PG ;


*---------------------------------------------------------------------
* VISUALIZATION
*---------------------------------------------------------------------

* --- Check the total number of saved steps
NTOT = DIME TAB0.'TEMPERATURES';
MESS '--- Total saved steps = ' NTOT;

* --- Visualization of the T, PG, PC field at the last saved time step (end of aging)
CHMT = EXCO 'T' TAB0 . 'TEMPERATURES' . (NTOT - 1);
CHPG = EXCO 'PG' TAB0 . 'TEMPERATURES' . (NTOT - 1);
CHPC = EXCO 'PC' TAB0 . 'TEMPERATURES' . (NTOT - 1);

*TRAC CHMT MODTHC MAIL1 TITRE 'Temperature after accident phase';
TRAC CHPG MODTHC MAIL1 TITRE 'Gas pressure after accident phase';
*TRAC CHPC MODTHC MAIL1 TITRE 'Capillary pressure after accident phase';


* =========================================================
* 1. TÍNH TOÁN MASS LOSS (%)
* =========================================================
L_TIME_ML   = PROG ;
L_ML_PCT    = PROG ;
MASS_0      = 0.0 ;

* --- ĐỊNH NGHĨA HẰNG SỐ ---
PORO  = 0.1 ;
RHOW  = 1000.0 ;
W_INF = winf ;

N1 = 0 ;
REPETER BOU_ML (DIME TAB0 . 'TEMPERATURES') ;
* Trích xuất các trường tại bước N1
    CHTKi = EXCO 'T' TAB0 . 'TEMPERATURES' . N1 ;
    CHPCi = EXCO 'PC' TAB0 . 'TEMPERATURES' . N1 ;
    CHPGi = EXCO 'PG' TAB0 . 'TEMPERATURES' . N1 ;
    HYDRi = CHAN CHPO (TAB0 . 'HYDRATATION' . N1) MODTHC ;

* Tính SW và Mật độ hơi nước RHOGW
    CHPVSATi CHPGWSCi RHOGWi XX YY ZZ = @PVSAT CHPGi CHPCi CHTKi ;
    SWi = @SATURA CHPCi CHTKi HYDRi cha1 chb1 chc1 chgam0 ;

* Tính tổng nước (Lỏng + Hơi + Liên kết) [kg/m3]
    W_LIQ   = SWi * (PORO * RHOW) ;
    CH_SG   = (MANU CHPO MAIL1 1 'SCAL' 1.0) - SWi ;
    W_VAP   = CH_SG * RHOGWi * PORO ;
    W_BOUND = HYDRi * W_INF ;
    W_TOT   = W_LIQ + W_VAP + W_BOUND ;

* Tích phân trên toàn thể tích => Khối lượng [kg]
    CHAM_W = CHAN 'CHAM' W_TOT MODTHC ;
    MASS_I = INTG MODTHC CHAM_W ;

* Lưu khối lượng ban đầu tại t=0
    SI (N1 EGA 0) ;
        MASS_0 = MASS_I ;
    FINSI ;

* Tính Mass Loss theo %
* Kiểm tra MASS_0 để tránh chia cho 0
    SI (MASS_0 NEG 0.0) ;
        M_LOSS_PCT = ((MASS_0 - MASS_I) / MASS_0) * 100.0 ;
    SINON ;
        M_LOSS_PCT = 0.0 ;
    FINSI ;

* Đưa vào mảng
    T_I = TAB0 . 'TEMPS' . N1 ;
    L_TIME_ML   = L_TIME_ML ET (PROG (T_I / 60.)) ;
    L_ML_PCT    = L_ML_PCT ET (PROG M_LOSS_PCT) ;

    N1 = N1 + 1 ;
FIN BOU_ML ;

* Đóng gói đồ thị Full Time
EV_ML_FULL = EVOL 'MANU' 'Time (min)' L_TIME_ML 'Mass Loss (%)' L_ML_PCT ;

* =========================================================
* 2. CẮT VÀ VẼ ĐỒ THỊ TRONG VÙNG 240 PHÚT
* =========================================================
L_MIN_240 = PROG 0. PAS 5. 240. ;
L_ML_240  = IPOL L_MIN_240 EV_ML_FULL ;

* Tạo đối tượng đồ thị cuối cùng
EV_ML_240 = EVOL 'ROUG' 'MANU' 'Time (min)' L_MIN_240 'Mass Loss (%)' L_ML_240 ;

* Vẽ ra màn hình
DESS EV_ML_240 ;


*===================================================================*
* INITIALIZE THE GENERAL TIME AXIS (CONVERT TO MINUTES & RESET TO 0 AT TEMPS2)
*===================================================================*
EVT_INIT = EVOL 'BLAN' 'TEMP' TAB0 'TEMPERATURES' 'T' PO_00;
LT_SEC   = EXTR EVT_INIT 'ABSC' ;
LT_MIN   = (LT_SEC - (PROG (DIME LT_SEC) * temps2)) / 60. ;

*===================================================================*
*********** STAGE: GAS PRESSURE (Pa & min) *********************
*===================================================================*
* 1. Extract original data from the results table
EVPG_10_O = EVOL 'BLEU' 'TEMP' TAB0 'TEMPERATURES' 'PG' PO_10;
EVPG_20_O = EVOL 'ORAN' 'TEMP' TAB0 'TEMPERATURES' 'PG' PO_20;
EVPG_30_O = EVOL 'JAUN' 'TEMP' TAB0 'TEMPERATURES' 'PG' PO_30;
EVPG_40_O = EVOL 'ROSE' 'TEMP' TAB0 'TEMPERATURES' 'PG' PO_40;
EVPG_50_O = EVOL 'VERT' 'TEMP' TAB0 'TEMPERATURES' 'PG' PO_50;

* 2. Redefine the horizontal axis to LT_MIN and convert Gas pressure to MPa (Pa / 1.E6)
EVPG_10 = EVOL 'BLEU' 'MANU' 'Time (min)' LT_MIN 'Gas Pressure (MPa)' ((EXTR EVPG_10_O 'ORDO') / 1.E6);
EVPG_20 = EVOL 'ORAN' 'MANU' 'Time (min)' LT_MIN 'Gas Pressure (MPa)' ((EXTR EVPG_20_O 'ORDO') / 1.E6);
EVPG_30 = EVOL 'JAUN' 'MANU' 'Time (min)' LT_MIN 'Gas Pressure (MPa)' ((EXTR EVPG_30_O 'ORDO') / 1.E6);
EVPG_40 = EVOL 'ROSE' 'MANU' 'Time (min)' LT_MIN 'Gas Pressure (MPa)' ((EXTR EVPG_40_O 'ORDO') / 1.E6);
EVPG_50 = EVOL 'VERT' 'MANU' 'Time (min)' LT_MIN 'Gas Pressure (MPa)' ((EXTR EVPG_50_O 'ORDO') / 1.E6);

* 3. Draw the gas pressure graph (X-axis synchronized from 0 to 240 min)
* DESS (EVPG_10 ET EVPG_20 ET EVPG_30 ET EVPG_40 ET EVPG_50)
     'XBOR' 0. 240. 'XGRA' 10.
     'YBOR' 0. 4. 'YGRA' 0.25
     'GRIL' 'POIN' 'GRIS'
     TITRE 'Gas Pressure Evolution at Measurement Points' ;


*===================================================================*
* 3. NHẬP DỮ LIỆU ÁP SUẤT KHÍ (GAS PRESSURE) DAUTI
*===================================================================*
* Khởi tạo mảng thời gian từ 0 đến 240 phút (bước nhảy 5)
L_MIN_DAUTI = PROG 0. PAS 5. 240. ;

* Mảng dữ liệu áp suất khí Dauti (được làm tròn 4 chữ số thập phân)
* Pg_10mm
LPG_DA_10 = PROG 0.1 0.1515 0.5455 1.0152 1.3535 1.6414 1.8687 2.0354 2.1414 2.1414 2.1061
                 2.0606 2.0152 1.9697 1.9293 1.8838 1.8485 1.8131 1.7778 1.7475 1.7172
                 1.6919 1.6667 1.6414 1.6162 1.5960 1.5758 1.5556 1.5303 1.5152 1.4949
                 1.4798 1.4646 1.4495 1.4394 1.4242 1.4141 1.3990 1.3939 1.3838 1.3737
                 1.3586 1.3485 1.3333 1.3283 1.3182 1.3030 1.2879 1.2828 ;

* Pg_20mm
LPG_DA_20 = PROG 0.1 0.0606 0.1212 0.2980 0.5606 0.9192 1.1869 1.4343 1.6364 1.7980 1.9697
                 2.1010 2.2475 2.3788 2.4899 2.5455 2.5556 2.5303 2.5051 2.4697 2.4394
                 2.4040 2.3737 2.3434 2.3081 2.2828 2.2576 2.2323 2.1970 2.1768 2.1515
                 2.1263 2.1061 2.0808 2.0657 2.0455 2.0253 2.0101 1.9899 1.9747 1.9596
                 1.9394 1.9192 1.9040 1.8889 1.8687 1.8535 1.8333 1.8131 ;

* Pg_30mm
LPG_DA_30 = PROG 0.1 0.0909 0.0606 0.0960 0.1616 0.3081 0.4899 0.7525 0.9949 1.1970 1.3838
                 1.5404 1.6717 1.8030 1.9293 2.0505 2.1616 2.2828 2.4091 2.5253 2.6414
                 2.7424 2.8081 2.8283 2.8283 2.8131 2.7929 2.7778 2.7525 2.7222 2.6970
                 2.6667 2.6414 2.6162 2.5909 2.5707 2.5455 2.5253 2.5000 2.4798 2.4596
                 2.4343 2.4091 2.3889 2.3687 2.3434 2.3182 2.2980 2.2778 ;

* Pg_40mm
LPG_DA_40 = PROG 0.1 0.1010 0.0657 0.0556 0.0758 0.1162 0.1768 0.2778 0.4192 0.5909 0.7778
                 0.9697 1.1465 1.2929 1.4343 1.5556 1.6717 1.7828 1.8889 1.9899 2.0960
                 2.1919 2.2980 2.4040 2.5051 2.6212 2.7374 2.8485 2.9646 3.0404 3.0808
                 3.0909 3.0859 3.0657 3.0455 3.0253 3.0000 2.9747 2.9495 2.9242 2.9040
                 2.8788 2.8535 2.8283 2.7980 2.7727 2.7475 2.7222 2.6919 ;

* Pg_50mm
LPG_DA_50 = PROG 0.1 0.1010 0.0960 0.0606 0.0505 0.0606 0.0808 0.1263 0.1768 0.2424 0.3384
                 0.4596 0.6061 0.7576 0.9091 1.0556 1.2020 1.3232 1.4444 1.5556 1.6717
                 1.7727 1.8687 1.9697 2.0606 2.1465 2.2475 2.3384 2.4343 2.5404 2.6465
                 2.7475 2.8586 2.9646 3.0606 3.1566 3.2323 3.2778 3.2980 3.2929 3.2778
                 3.2576 3.2374 3.2121 3.1869 3.1616 3.1313 3.1010 3.0707 ;

* Tạo các đường EVOL cho Áp suất khí Dauti
* Ghi chú: Có thể điều chỉnh màu tùy theo quy ước bạn đang dùng trong báo cáo
EVPGD_10 = EVOL 'BLEU' 'MANU' 'Time (min)' L_MIN_DAUTI 'Pg_Da_10' LPG_DA_10 ;
EVPGD_20 = EVOL 'ORAN' 'MANU' 'Time (min)' L_MIN_DAUTI 'Pg_Da_20' LPG_DA_20 ;
EVPGD_30 = EVOL 'JAUN' 'MANU' 'Time (min)' L_MIN_DAUTI 'Pg_Da_30' LPG_DA_30 ;
EVPGD_40 = EVOL 'ROSE' 'MANU' 'Time (min)' L_MIN_DAUTI 'Pg_Da_40' LPG_DA_40 ;
EVPGD_50 = EVOL 'VERT' 'MANU' 'Time (min)' L_MIN_DAUTI 'Pg_Da_50' LPG_DA_50 ;


*===================================================================*
* 2. NHẬP DỮ LIỆU ÁP SUẤT KHÍ (GAS PRESSURE) TỪ THỰC NGHIỆM
*===================================================================*
* Khởi tạo mảng thời gian từ 5 đến 240 phút (bước nhảy 5)
L_MIN_EXP = PROG 5. PAS 5. 240. ;

* Mảng dữ liệu áp suất khí (được làm tròn 4 chữ số thập phân)
* P10mm
LPGE_10 = PROG 0.0442 0.1125 0.3040 0.5271 0.8036 1.1488 1.4976 1.8497 2.0802 1.8728
              1.3952 1.1615 0.9911 0.9317 0.8685 0.8429 0.8174 0.7919 0.7664 0.7408
              0.7153 0.6922 0.6700 0.6495 0.6309 0.6123 0.5963 0.5831 0.5699 0.5568
              0.5436 0.5278 0.5111 0.4943 0.4776 0.4609 0.4441 0.4274 0.4107 0.3950
              0.3817 0.3683 0.3549 0.3415 0.3281 0.3148 0.3012 0.2869 ;

* P20mm
LPGE_20 = PROG 0.0255 0.0510 0.0766 0.1702 0.2833 0.4639 0.6643 0.8896 1.1589 1.4350
              1.7111 2.0132 2.3404 2.6461 2.8814 2.9006 2.3996 2.1459 2.0572 2.0344
              2.0171 1.9998 1.9847 1.9695 1.9543 1.9392 1.9240 1.9074 1.8567 1.8061
              1.7554 1.7047 1.6539 1.6029 1.5519 1.5009 1.4499 1.3989 1.3479 1.2987
              1.2510 1.2034 1.1557 1.1080 1.0604 1.0127 0.9650 0.9174 ;

* P30mm
LPGE_30 = PROG 0.0188 0.0334 0.0480 0.0626 0.0773 0.1221 0.2200 0.3406 0.4776 0.6246
              0.7715 0.9298 1.1326 1.3354 1.5067 1.6779 1.8324 1.9252 2.0179 2.1107
              2.1752 2.1974 2.2197 2.2160 2.2105 2.2051 2.1811 2.1500 2.1190 2.0879
              2.0509 2.0136 1.9763 1.9389 1.9016 1.8643 1.8185 1.7708 1.7231 1.6754
              1.6277 1.5800 1.5323 1.4846 1.4369 1.3892 1.3405 1.2782 ;

* P40mm
LPGE_40 = PROG 0.0074 0.0142 0.0209 0.0277 0.0418 0.0688 0.1149 0.1622 0.2336 0.3450
              0.4564 0.6312 0.8171 1.0503 1.2947 1.5536 1.8125 2.0577 2.2622 2.4667
              2.6453 2.7939 2.9425 3.0897 3.2260 3.2645 3.2388 3.1999 3.1611 3.1062
              3.0448 2.9835 2.9222 2.8609 2.7808 2.6938 2.6068 2.5198 2.4327 2.3457
              2.2587 2.1717 2.0846 1.9976 1.9106 1.8251 1.7474 1.6696 ;

* P50mm
LPGE_50 = PROG 0.0068 0.0137 0.0205 0.0386 0.0583 0.0779 0.0976 0.1362 0.1826 0.2291
              0.2755 0.3462 0.4485 0.5507 0.6529 0.7551 0.8763 1.0770 1.2778 1.4785
              1.6793 1.8801 2.0808 2.2801 2.4755 2.6653 2.7772 2.8891 3.0010 3.1129
              3.1897 3.2612 3.3326 3.4009 3.4529 3.5048 3.5567 3.6085 3.6600 3.6646
              3.6153 3.4466 3.1950 2.9832 2.7869 2.6043 2.4752 2.3461 ;

* Tạo các đường EVOL cho Áp suất khí thực nghiệm (Sử dụng P thay vì T ở tiền tố)
EVPGE_10 = EVOL 'BLEU' 'MANU' 'Time (min)' L_MIN_EXP 'Pg_Exp_10' LPGE_10 ;
EVPGE_20 = EVOL 'ORAN' 'MANU' 'Time (min)' L_MIN_EXP 'Pg_Exp_20' LPGE_20 ;
EVPGE_30 = EVOL 'JAUN' 'MANU' 'Time (min)' L_MIN_EXP 'Pg_Exp_30' LPGE_30 ;
EVPGE_40 = EVOL 'ROSE' 'MANU' 'Time (min)' L_MIN_EXP 'Pg_Exp_40' LPGE_40 ;
EVPGE_50 = EVOL 'VERT' 'MANU' 'Time (min)' L_MIN_EXP 'Pg_Exp_50' LPGE_50 ;


*===================================================================*
* 2. THIẾT LẬP BẢNG KIỂU NÉT VẼ (TABLE DE DESSIN)
*===================================================================*
TAB_DESS = TABLE ;

* Nhóm 1: 5 đường nét liền ('LIGN') cho kết quả mô phỏng của bạn
TAB_DESS . 1 = 'LIGN' ; TAB_DESS . 2 = 'LIGN' ; TAB_DESS . 3 = 'LIGN' ;
TAB_DESS . 4 = 'LIGN' ; TAB_DESS . 5 = 'LIGN' ;

* Nhóm 2: 5 đường nét đứt ('TIRR') cho kết quả tham chiếu của Dauti
TAB_DESS . 6  = 'TIRR' ; TAB_DESS . 7  = 'TIRR' ; TAB_DESS . 8 = 'TIRR' ;
TAB_DESS . 9 = 'TIRR' ; TAB_DESS . 10 = 'TIRR' ;

* Nhóm 3: Thực nghiệm 5 đường nét chấm - TIRC
TAB_DESS . 11 = 'TIRC' ; TAB_DESS . 12 = 'TIRC' ; TAB_DESS . 13 = 'TIRC' ;
TAB_DESS . 14 = 'TIRC' ; TAB_DESS . 15 = 'TIRC' ;

*===================================================================*
* 3. HIỂN THỊ ĐỒ THỊ SO SÁNH TRỰC QUAN (DOUBLE-LAYER CALIBRATION MY CODE VS DAUTI)
*===================================================================*
DESS (EVPG_10 ET EVPG_20 ET EVPG_30 ET EVPG_40 ET EVPG_50
   ET EVPGD_10 ET EVPGD_20 ET EVPGD_30 ET EVPGD_40 ET EVPGD_50)
     TAB_DESS
     'XBOR' 0. 240. 'XGRA' 10.
     'YBOR' 0. 4. 'YGRA' 0.25
     'GRIL' 'POIN' 'GRIS'
     TITRE 'Temperature Calibration: Current Model (Solid) vs Dauti (Dashed)' ;

*===================================================================*
* 3. HIỂN THỊ ĐỒ THỊ SO SÁNH TRỰC QUAN (DOUBLE-LAYER CALIBRATION MY CODE VS EXPERIMENT)
*===================================================================*
*DESS (EVPG_10 ET EVPG_20 ET EVPG_30 ET EVPG_40 ET EVPG_50
   ET EVPGE_10 ET EVPGE_20 ET EVPGE_30 ET EVPGE_40 ET EVPGE_50)
     TAB_DESS
     'XBOR' 0. 240. 'XGRA' 10.
     'YBOR' 0. 4. 'YGRA' 0.25
     'GRIL' 'POIN' 'GRIS'
     TITRE 'Temperature Calibration: Current Model (Solid) vs Exp (Dotted)' ;

*===================================================================*
* 3. HIỂN THỊ ĐỒ THỊ SO SÁNH 3 LỚP (TRIPLE-LAYER CALIBRATION)
*===================================================================*
DESS (EVPG_10 ET EVPG_20 ET EVPG_30 ET EVPG_40 ET EVPG_50
   ET EVPGD_10 ET EVPGD_20 ET EVPGD_30 ET EVPGD_40 ET EVPGD_50
   ET EVPGE_10 ET EVPGE_20 ET EVPGE_30 ET EVPGE_40 ET EVPGE_50)
     TAB_DESS
     'XBOR' 0. 240. 'XGRA' 10.
     'YBOR' 0. 4. 'YGRA' 0.25
     'GRIL' 'POIN' 'GRIS'
     TITRE 'Calibration: Current (Solid) vs Dauti (Dashed) vs Exp (Dotted)' ;


*===================================================================*
*********** STAGE: TEMPERATURE (°C & min) ***********************
*===================================================================*
* 1. Extract original data from the results table (in Kelvin units)
EVT_00_O  = EVOL 'BLEU' 'TEMP' TAB0 'TEMPERATURES' 'T'  PO_00;
EVT_10_O  = EVOL 'ORAN' 'TEMP' TAB0 'TEMPERATURES' 'T'  PO_10;
EVT_20_O  = EVOL 'JAUN' 'TEMP' TAB0 'TEMPERATURES' 'T'  PO_20;
EVT_30_O  = EVOL 'ROSE' 'TEMP' TAB0 'TEMPERATURES' 'T'  PO_30;
EVT_40_O  = EVOL 'VERT' 'TEMP' TAB0 'TEMPERATURES' 'T'  PO_40;
EVT_50_O  = EVOL 'TURQ' 'TEMP' TAB0 'TEMPERATURES' 'T'  PO_50;
EVT_120_O = EVOL 'BLAN' 'TEMP' TAB0 'TEMPERATURES' 'T'  PO_120;

* 2. Subtract 273.15 to convert to Celsius.
LY_00   = (EXTR EVT_00_O  'ORDO') - (PROG (DIME LT_MIN) * 273.15);
LY_10   = (EXTR EVT_10_O  'ORDO') - (PROG (DIME LT_MIN) * 273.15);
LY_20   = (EXTR EVT_20_O  'ORDO') - (PROG (DIME LT_MIN) * 273.15);
LY_30   = (EXTR EVT_30_O  'ORDO') - (PROG (DIME LT_MIN) * 273.15);
LY_40   = (EXTR EVT_40_O  'ORDO') - (PROG (DIME LT_MIN) * 273.15);
LY_50   = (EXTR EVT_50_O  'ORDO') - (PROG (DIME LT_MIN) * 273.15);
LY_120  = (EXTR EVT_120_O 'ORDO') - (PROG (DIME LT_MIN) * 273.15);

* 3. Redefine the Evolution curves according to the new coordinate system (min and °C)
EVT_00  = EVOL 'BLEU' 'MANU' 'Time (min)' LT_MIN 'Temperature (C)' LY_00;
EVT_10  = EVOL 'ORAN' 'MANU' 'Time (min)' LT_MIN 'Temperature (C)' LY_10;
EVT_20  = EVOL 'JAUN' 'MANU' 'Time (min)' LT_MIN 'Temperature (C)' LY_20;
EVT_30  = EVOL 'ROSE' 'MANU' 'Time (min)' LT_MIN 'Temperature (C)' LY_30;
EVT_40  = EVOL 'VERT' 'MANU' 'Time (min)' LT_MIN 'Temperature (C)' LY_40;
EVT_50  = EVOL 'TURQ' 'MANU' 'Time (min)' LT_MIN 'Temperature (C)' LY_50;
EVT_120 = EVOL 'BLAN' 'MANU' 'Time (min)' LT_MIN 'Temperature (C)' LY_120;

* 4. Draw a complete temperature graph with 50-unit divisions.
DESS (EVT_00 ET EVT_10 ET EVT_20 ET EVT_30 ET EVT_40 ET EVT_50 ET EVT_120)
     'XBOR' 0. 240. 'XGRA' 10.
     'YBOR' 0. 500. 'YGRA' 25.
     'GRIL' 'POIN' 'GRIS'
     TITRE 'Temperature Evolution at Measurement Points' ;

*===================================================================*
* 1. NHẬP DỮ LIỆU NHIỆT ĐỘ DAUTI TỪ BẢNG EXCEL (MỖI 5 PHÚT)
*===================================================================*
* Khởi tạo mảng thời gian từ 0 đến 240 phút (bước nhảy 5)
L_MIN_DAUTI = PROG 0. PAS 5. 240. ;

* Mảng dữ liệu nhiệt độ chính xác (được nhập nguyên bản từ file Excel)
LTD_00 = PROG 20.0 116.6 158.0 186.7 204.9 225.2 239.2 251.0 261.5 272.0
              281.1 289.5 296.5 303.5 310.5 316.1 323.1 329.4 334.3 339.2
              344.8 349.7 355.2 359.4 363.6 368.5 372.7 376.2 379.7 381.8
              384.6 386.7 388.8 390.2 392.3 393.7 395.1 396.5 397.9 399.3
              400.7 402.1 403.5 404.9 405.6 407.0 407.7 408.4 408.4 ;

LTD_10 = PROG 20.0  65.7 103.5 131.5 154.5 169.9 184.6 197.2 209.1 219.6
              230.8 239.2 247.6 255.2 262.2 269.2 275.5 281.8 288.1 294.4
              300.0 304.9 309.8 315.4 320.3 325.2 329.4 334.3 337.8 340.6
              344.8 346.9 350.3 352.4 355.2 356.6 359.4 361.5 363.6 365.7
              368.5 369.9 372.0 373.4 374.8 376.2 377.6 379.0 380.4 ;

LTD_20 = PROG 20.0  39.2  65.7  89.5 110.5 129.4 145.5 155.9 167.8 177.6
              187.4 195.8 205.6 213.3 220.3 226.6 234.3 241.3 246.9 253.1
              258.7 264.3 270.6 276.2 281.1 286.0 290.9 295.1 299.3 304.2
              307.7 311.9 315.4 318.2 321.0 323.8 326.6 329.4 332.2 334.3
              336.4 338.5 340.6 343.4 344.8 346.9 349.7 351.0 353.1 ;

LTD_30 = PROG 20.0  26.6  46.2  64.3  81.8  97.9 111.9 123.1 135.0 144.1
              154.5 162.9 171.3 178.3 186.0 193.0 200.0 206.3 211.9 218.2
              224.5 230.1 235.7 240.6 246.2 251.7 256.6 261.5 265.7 270.6
              274.8 279.0 283.2 286.0 290.2 293.0 295.8 299.3 302.1 304.9
              307.7 310.5 312.6 315.4 318.2 319.6 322.4 323.8 325.9 ;

LTD_40 = PROG 20.0  23.1  30.8  43.4  58.0  72.0  83.9  94.4 105.6 116.1
              124.5 133.6 142.0 149.0 157.3 163.6 169.9 176.9 183.9 189.5
              195.1 201.4 206.3 211.2 216.8 221.7 226.6 231.5 235.0 240.6
              244.8 249.0 253.8 256.6 260.8 263.6 267.8 270.6 274.1 277.6
              281.1 283.9 286.0 288.8 291.6 294.4 297.2 299.3 301.4 ;

LTD_50 = PROG 20.0  20.3  25.2  33.6  42.7  53.1  63.6  72.7  82.5  92.3
              100.0 109.1 116.8 124.5 131.5 138.5 144.8 151.7 158.7 164.3
              169.9 175.5 181.8 187.4 192.3 197.2 202.1 207.0 211.9 216.1
              221.0 224.5 228.7 232.9 236.4 239.9 243.4 246.2 249.7 253.1
              256.6 259.4 262.2 265.7 268.5 271.3 273.4 276.2 279.0 ;

* Tạo các đường EVOL cho Dauti (Sử dụng CÙNG MÀU với các đường kết quả của bạn)
EVTD_00 = EVOL 'BLEU' 'MANU' 'Time (min)' L_MIN_DAUTI 'T_Da_00' LTD_00 ;
EVTD_10 = EVOL 'ORAN' 'MANU' 'Time (min)' L_MIN_DAUTI 'T_Da_10' LTD_10 ;
EVTD_20 = EVOL 'JAUN' 'MANU' 'Time (min)' L_MIN_DAUTI 'T_Da_20' LTD_20 ;
EVTD_30 = EVOL 'ROSE' 'MANU' 'Time (min)' L_MIN_DAUTI 'T_Da_30' LTD_30 ;
EVTD_40 = EVOL 'VERT' 'MANU' 'Time (min)' L_MIN_DAUTI 'T_Da_40' LTD_40 ;
EVTD_50 = EVOL 'TURQ' 'MANU' 'Time (min)' L_MIN_DAUTI 'T_Da_50' LTD_50 ;

*===================================================================*
* 1. NHẬP DỮ LIỆU NHIỆT ĐỘ EXPERIMENTAL TỪ BẢNG EXCEL (MỖI 5 PHÚT)
*===================================================================*

* Trục đích cho Thực nghiệm (Bắt đầu từ 5, bỏ qua phút 0)
L_MIN_EXP = PROG 5. PAS 5. 240. ;

* Mảng dữ liệu nhiệt độ chính xác (được làm tròn 1 chữ số thập phân)
LTE_00 = PROG 85.5 132.8 164.0 186.3 205.8 222.3 236.5 250.0 261.5 273.1
              283.6 291.5 299.3 307.1 314.9 321.3 326.9 332.5 338.2 343.8
              349.4 354.1 357.6 361.0 364.4 367.9 371.3 374.7 378.2 380.9
              383.0 385.1 387.2 389.3 391.5 393.6 395.7 397.8 399.2 400.7
              402.1 403.6 405.0 406.5 407.9 409.4 410.9 412.3 ;

LTE_10 = PROG 58.4  98.0 128.8 150.1 170.6 183.4 196.1 208.8 216.1 223.4
              228.8 238.5 246.9 254.5 262.1 269.7 275.8 280.2 284.7 289.1
              293.6 298.0 302.4 306.9 311.3 315.8 320.2 324.7 329.1 332.0
              334.3 336.5 338.8 341.1 343.4 345.6 347.9 350.2 352.5 354.7
              356.6 358.2 359.8 361.5 363.1 364.7 366.3 367.9 ;

LTE_20 = PROG 40.3  63.7  87.1 110.5 124.8 139.1 153.4 167.7 179.3 188.7
              198.1 206.5 214.0 221.4 228.9 232.6 236.1 240.7 246.6 252.5
              258.4 264.3 269.2 273.3 277.4 281.5 285.6 289.7 293.8 297.5
              300.3 303.2 306.1 308.9 311.8 314.7 317.5 320.4 323.3 325.8
              327.8 329.8 331.7 333.7 335.7 337.7 339.7 341.7 ;

LTE_30 = PROG 35.7  51.4  67.1  83.4 100.0 114.3 126.0 137.7 149.3 161.0
              171.8 178.2 184.5 190.9 197.3 203.7 210.0 214.8 219.5 224.3
              229.0 233.8 238.5 243.3 248.0 252.6 256.0 259.3 262.7 266.0
              269.4 272.7 276.1 279.4 282.8 286.0 288.3 290.7 293.0 295.4
              297.7 300.1 302.4 304.8 307.1 309.5 311.8 314.2 ;

LTE_40 = PROG 25.9  37.9  52.0  65.7  79.3  93.8 107.9 119.7 131.5 143.2
              151.4 159.1 166.7 174.4 182.0 189.3 195.1 200.9 206.7 212.4
              217.4 221.6 225.7 229.9 233.4 235.3 237.2 239.1 241.0 242.9
              248.9 251.7 254.6 257.4 260.2 263.0 265.8 268.7 271.5 274.2
              276.8 279.4 282.0 284.0 286.0 288.0 290.1 292.1 ;

LTE_50 = PROG 23.6  30.6  41.7  53.3  64.8  76.3  87.0  97.3 107.6 117.1
              125.0 132.9 140.8 147.9 154.6 161.4 168.1 174.8 180.0 184.5
              189.0 193.6 197.9 201.7 205.6 209.4 213.0 216.0 219.0 222.0
              225.0 227.9 230.1 232.3 234.6 236.6 237.9 239.3 240.6 241.9
              243.3 244.6 246.1 248.0 250.0 251.9 253.9 255.8 ;

LTE_120 = PROG 22.6  24.6  29.6  34.5  39.5  44.4  49.3  54.4  59.5  64.5
               69.6  74.6  79.7  84.8  89.8  94.9  99.9 105.0 109.1 113.1
              117.0 121.0 124.9 128.9 132.8 136.7 138.8 140.8 142.9 144.9
              146.9 149.0 151.0 153.0 155.1 156.8 157.9 159.0 160.1 161.3
              162.4 163.5 164.6 165.8 166.9 168.0 169.1 170.3 ;

* Tạo các đường EVOL cho Dauti (Sử dụng CÙNG MÀU với các đường kết quả của bạn)
EVTE_00 = EVOL 'BLEU' 'MANU' 'Time (min)' L_MIN_DAUTI 'T_Exp_00' LTE_00 ;
EVTE_10 = EVOL 'ORAN' 'MANU' 'Time (min)' L_MIN_DAUTI 'T_Exp_10' LTE_10 ;
EVTE_20 = EVOL 'JAUN' 'MANU' 'Time (min)' L_MIN_DAUTI 'T_Exp_20' LTE_20 ;
EVTE_30 = EVOL 'ROSE' 'MANU' 'Time (min)' L_MIN_DAUTI 'T_Exp_30' LTE_30 ;
EVTE_40 = EVOL 'VERT' 'MANU' 'Time (min)' L_MIN_DAUTI 'T_Exp_40' LTE_40 ;
EVTE_50 = EVOL 'TURQ' 'MANU' 'Time (min)' L_MIN_DAUTI 'T_Exp_50' LTE_50 ;
EVTE_120 = EVOL 'BLAN' 'MANU' 'Time (min)' L_MIN_DAUTI 'T_Exp_120' LTE_120 ;


*===================================================================*
* 2. THIẾT LẬP BẢNG KIỂU NÉT VẼ (TABLE DE DESSIN)
*===================================================================*
TAB_DESS = TABLE ;

* Nhóm 1: 6 đường nét liền ('LIGN') cho kết quả mô phỏng của bạn
TAB_DESS . 1 = 'LIGN' ; TAB_DESS . 2 = 'LIGN' ; TAB_DESS . 3 = 'LIGN' ;
TAB_DESS . 4 = 'LIGN' ; TAB_DESS . 5 = 'LIGN' ; TAB_DESS . 6 = 'LIGN' ;

* Nhóm 2: 6 đường nét đứt ('TIRR') cho kết quả tham chiếu của Dauti
TAB_DESS . 7  = 'TIRR' ; TAB_DESS . 8  = 'TIRR' ; TAB_DESS . 9 = 'TIRR' ;
TAB_DESS . 10 = 'TIRR' ; TAB_DESS . 11 = 'TIRR' ; TAB_DESS . 12 = 'TIRR' ;

* Nhóm 3: Thực nghiệm (6 đường nét chấm - TIRC)
TAB_DESS . 13 = 'TIRC' ; TAB_DESS . 14 = 'TIRC' ; TAB_DESS . 15 = 'TIRC' ;
TAB_DESS . 16 = 'TIRC' ; TAB_DESS . 17 = 'TIRC' ; TAB_DESS . 18 = 'TIRC' ;

*===================================================================*
* 3. HIỂN THỊ ĐỒ THỊ SO SÁNH TRỰC QUAN (DOUBLE-LAYER CALIBRATION MY CODE VS DAUTI)
*===================================================================*
*DESS (EVT_00 ET EVT_10 ET EVT_20 ET EVT_30 ET EVT_40 ET EVT_50
   ET EVTD_00 ET EVTD_10 ET EVTD_20 ET EVTD_30 ET EVTD_40 ET EVTD_50)
     TAB_DESS
     'XBOR' 0. 240. 'XGRA' 10.
     'YBOR' 0. 500. 'YGRA' 25.
     'GRIL' 'POIN' 'GRIS'
     TITRE 'Temperature Calibration: Current Model (Solid) vs Dauti (Dashed)' ;

*===================================================================*
* 3. HIỂN THỊ ĐỒ THỊ SO SÁNH TRỰC QUAN (DOUBLE-LAYER CALIBRATION MY CODE VS EXPERIMENT)
*===================================================================*
*DESS (EVT_00 ET EVT_10 ET EVT_20 ET EVT_30 ET EVT_40 ET EVT_50
   ET EVTE_00 ET EVTE_10 ET EVTE_20 ET EVTE_30 ET EVTE_40 ET EVTE_50)
     TAB_DESS
     'XBOR' 0. 240. 'XGRA' 10.
     'YBOR' 0. 500. 'YGRA' 25.
     'GRIL' 'POIN' 'GRIS'
     TITRE 'Temperature Calibration: Current Model (Solid) vs Exp (Dotted)' ;

*===================================================================*
* 3. HIỂN THỊ ĐỒ THỊ SO SÁNH 3 LỚP (TRIPLE-LAYER CALIBRATION)
*===================================================================*
DESS (EVT_00 ET EVT_10 ET EVT_20 ET EVT_30 ET EVT_40 ET EVT_50
   ET EVTD_00 ET EVTD_10 ET EVTD_20 ET EVTD_30 ET EVTD_40 ET EVTD_50
   ET EVTE_00 ET EVTE_10 ET EVTE_20 ET EVTE_30 ET EVTE_40 ET EVTE_50)
     TAB_DESS
     'XBOR' 0. 240. 'XGRA' 10.
     'YBOR' 0. 500. 'YGRA' 25.
     'GRIL' 'POIN' 'GRIS'
     TITRE 'Calibration: Current (Solid) vs Dauti (Dashed) vs Exp (Dotted)' ;
