*---------------------------------------------------------------------
* ADIABATIC HYDRATION / AGING / ACCIDENT - COOLING OF KALIFA (2000) EXPERIMENT
*---------------------------------------------------------------------
* By: Tan Kiet HONG

* Reference code: * G.Sciumè (31 - 10 - 2024)
* "CONCRETE CASTING AND LIFETIME CONDITIONS IMPACT ON HIGH TEMPERATURE RESISTANCE" by G. Sciumè (1), S. Dal Pont (2), D. Dauti (2)
* (1) I2M, Université de Bordeaux, Bordeaux, France
* (2) 3SR, Université Grenoble Alpes, Grenoble, France


OPTI ECHO 0;
*---------------------------------------------------------------------
* CONSTANT PHYSICAL PARAMEMTERS
*---------------------------------------------------------------------
RGP1     = 8.3145 ;
MMGA1    = 28.9645E-3 ;
MMGW1    = 18.0153E-3 ;
RHOS1    = 2625.8 ;
RHOW0    = 1000. ;
CPW1     = 4181.0 ;
CPGW1    = 1805.0 ;
CPGA1    = 1005.7 ;

*---------------------------------------------------------------------
* MESH - KALIFA 120x120mm
*---------------------------------------------------------------------
'OPTI' 'DIME' 2 'MODE' PLAN CONT 'ELEM' QUA4;

* OPTION 1: REGTANGULAR MESH 24X24 ELEMENTS (Original mesh used in Dauti's thesis is 28x28)
p1  = 0.0   0.0;
p2  = 0.12  0.0;
p3  = 0.12  0.12;
p4  = 0.0   0.12;

DAB1 = DROI 24 p1 p2;
DDA1 = DROI 24 p2 p3;
DCD1 = DROI 24 p3 p4;
DBC1 = DROI 24 p4 p1;

CONT1  = DAB1 ET DDA1 ET DCD1 ET DBC1;
MAIL1  = (SURF CONT1) 'COUL' 'BLAN';

* OPTION 2: REFINED 1D MESH (Not used in this example)
L1       = 0.12 ;
H1       = 0.12 ;
DY_COLD  = 0.005;
DY_HOT   = 0.001;

P1  = 0.   0.;
P2  = 0.   H1;
L12 = DROI P1 P2 'DINI' DY_COLD 'DFIN' DY_HOT;

*MAIL1 = (TRAN 1 L12 (L1 0.)) 'COUL' 'BLAN';
*DCD1 = COTE 2 MAIL1;
*DAB1 = COTE 4 MAIL1;

* VISUALIZATION OF THE MESH
TRAC (MAIL1 ET (DCD1 'COUL' 'ROUG') ET (DAB1 'COUL' 'BLEU')) TITRE 'Mesh - Kalifa HPC M100' ;

* ALIAS FOR BOUNDARIES: DCD1 = hot face (top, y=0.12) and DAB1 = cold face (bottom, y=0)
* [HYRIC] Vapor convection
CONTH1 = DCD1;
CONTH2 = DAB1;
CONTH = CONTH1 ET CONTH2;

* [THERMAL] Thermal convection and radiation
CONTT1 = DCD1;
CONTT2 = DAB1;

* Points of measurement for temperature (PO_00 to PO_120) along the vertical centerline of the sample
* x = 0.06 (mid sample), y = 0.120 - distance from hot face
PO_00  = MAIL1 POIN 'PROC' (0.06 0.120);
PO_10  = MAIL1 POIN 'PROC' (0.06 0.110);
PO_20  = MAIL1 POIN 'PROC' (0.06 0.100);
PO_30  = MAIL1 POIN 'PROC' (0.06 0.090);
PO_40  = MAIL1 POIN 'PROC' (0.06 0.080);
PO_50  = MAIL1 POIN 'PROC' (0.06 0.070);
PO_120 = MAIL1 POIN 'PROC' (0.06 0.000);

*---------------------------------------------------------------------
* MATERIAL PROPERTIES (HPC M100)
*---------------------------------------------------------------------

* MIX DATA
cem  = 377.   ;
aggr = 1920.  ;
wc   = 0.34   ;
sc   = 0.1  ;

* HYDRATION PROCESS DATA (affinity. activation energy. hydration heat)
AI   = 6    ;
AP   = 1250.  ;
GAMP = 0.24   ;
ALFA = 48.    ;
EAR1 = 5369.  ;
lat1 = 114.3e6 ;

* INTRINSIC PERMEABILITY
KINT = 2.E-19 ;
*KINT = 7.5E-20 ;

* THERMAL PARAMETERS
CS   = 960.   ;
KS   = 1.38   ;
*CS   = 835.   ;
*KS   = 1.67   ;

* DESORPTION ISOTHERME MODEL PARAMETERS
*a1   =  46.9364E6 ;
*b1   =  1.9433    ;
*c1   =  1.5     ;

a1   =  18.6E6 ;
b1   =  2.27    ;
c1   =  1.5     ;


*---------------------------------------------------------------------
* MODEL DEFINITION
*---------------------------------------------------------------------
MODTHC  = 'MODE' MAIL1 'THERMOHYDRIQUE' 'BETON_THM' 'CONS' 'BO';
MODCOT1 = 'MODE' CONTT1 'THERMIQUE' 'CONVECTION';
MODCOT2 = 'MODE' CONTT2 'THERMIQUE' 'CONVECTION';
MODRAY  = 'MODE' CONTT1 'THERMIQUE' 'RAYONNEMENT' 'INFINI';
MOD_TOT = MODTHC ET MODCOT1 ET MODCOT2 ET MODRAY ;
*---------------------------------------------------------------------

*---------------------------------------------------------------------
* MATERIAL MODEL DEFINITION
*---------------------------------------------------------------------
WINF GAM0 POR1 APOR = @POWERS cem aggr wc sc;
MATTHC = 'MATE' MODTHC 'CS'  CS    'KS'   KS   'GAM0' GAM0 'WINF' WINF
'VGA' a1   'VGB'  b1   'VGC' c1    'K1' KINT  'AK'   3.  'BK'   1.
'KLI1' 20000.  'AKLI'   1.  'BKLI' 1. 'POR1' POR1 'APOR' APOR
'AFF1' Ai  'AFF2' Ap   'AFF3' GAMP 'AFF4' ALFA 'EAR'  EAR1 'QLAT' lat1;
MATCOT1  = 'MATE'  MODCOT1   'H'     10.;
MATCOT2  = 'MATE'  MODCOT2   'H'     10.;
MATRAY  = 'MATE'  MODRAY   'EMIS'   0.;
MAT_TOT = MATTHC et MATCOT1 ET MATCOT2 ET MATRAY;
*---------------------------------------------------------------------

*---------------------------------------------------------------------
* Vapor convection (processed by Charther) and therefore not to be added to the overall model
*---------------------------------------------------------------------
MODCOH  = 'MODE' CONTH 'THERMIQUE' 'CONVECTION' ;
MATCOH  = 'MATE' MODCOH   'H'                0. ;
*---------------------------------------------------------------------

*---------------------------------------------------------------------*
* TEST DESCRIPTION AND TEMPORAL DISCRETIZATION
*---------------------------------------------------------------------*
* Modeled phases
* I)   Early age :        0           ---> 3 days              /  adiabatic conditions
* II)  Aging     :        3           ---> age time            /  H & T convection
* III) Accident  : age time           ---> age time + 240 mins /  H convection & T convection + radiation (hot face)
* IV)  Cooling   : age time + 240 min ---> age time + 600 mins /  H & T convection
*---------------------------------------------------------------------*
minute1  = 60.         ;
hours1   = 3600.       ;
day1     = 86400.      ;
year1    = 360 * day1  ;

* Duration of diferent phases
early_time =   180*day1   ;
ramp0_time  =   1*hours1 ;
constant_time = 1*hours1 ;
age_time   =   early_time + ramp0_time + constant_time;

* Accident phase duration
* x = 10 mins (original paper is 0 mins but we need some time for the ramp to reach 400oC)
* Ramp:    0    -->x min     (20oC --> 400oC)
* Linear1: x    -->x+130 min (400oC --> 460oC)
* Linear2: x+130-->x+240 min (460oC --> 466oC)
ramp1_time   = 1 * minute1;
lin1_time   = 130 * minute1 - ramp1_time;
lin2_time   = 110 * minute1;
acc_time    = ramp1_time + lin1_time + lin2_time;

ramp2_time  = 1 * minute1;
cool_time   = 360 * minute1;

* Time markers for the different phases
temps1       =  early_time ;

temps2a      =  early_time + ramp0_time ;
temps2       =  age_time   ;

temps_ramp   = age_time  + ramp1_time ;
temps_lin1   = age_time  + ramp1_time + lin1_time ;
temps3       = age_time  + acc_time ;

temps_ramp2  = temps3 + ramp2_time ;
temps4       = temps3 + cool_time ;


* Time steps for the different phases
DT01     = 1*hours1;

DT12a    =  60.;
DT2a2    =  60.;

DT_RAMP  =   5.;
DT_LIN1  =   15. ;
DT_LIN2  =   15. ;

DT_RAMP2 =   1.;
DT34     =   15.;

* Calculation of the time steps for the different phases
LTP_HYDR = PROG  0.              PAS DT01 temps1        ;
LTP_AGIN = PROG (temps1 + DT12a) PAS DT12a temps2a PAS DT2a2 temps2 ;
LTP_ACCI = PROG (temps2 + DT_RAMP) PAS DT_RAMP temps_ramp PAS DT_LIN1 temps_lin1 PAS DT_LIN2 temps3;
LTP_COOL = PROG (temps3 + DT_RAMP2) PAS DT_RAMP2 temps_ramp2 PAS DT34 temps4;
LTP_TOT  = LTP_HYDR ET LTP_AGIN ET LTP_ACCI ET LTP_COOL;

* Saved times
LSA_HYDR = PROG  0.              PAS hours1 temps1;
LSA_AGIN = PROG (temps1 + DT2a2) PAS DT2a2  temps2;
LSA_ACCI = PROG (temps2 + 60.)  PAS 60.   temps3;
LSA_COOL = PROG (temps3 + 60.)  PAS 60.   temps4;
LSA_TOT  = LSA_HYDR ET LSA_AGIN ET LSA_ACCI ET LSA_COOL;
*---------------------------------------------------------------------


*---------------------------------------------------------------------
* INITIAL CONDITION (COST adibatic calorimetry test)
* - initial degree of hydration HY_0 = 0
* - initial temperature TC_0 = 22°
* - initial gas pressure PG_0 = p_atm
* - initial relative humidity HR_0 = 0.99995
HY_0   = 0.            ;
TC_0   = 20.           ;
TK_0   = 273.15 + TC_0 ;
PG_0   = 101325.       ;
HR_0   = 0.99995      ;

ZERO1  = MANU 'CHPO' MAIL1 'SCAL' 0.       ;
CHTK_0 = MANU 'CHPO' MAIL1 'T' TK_0        ;
PVS_0 XX YY ZZ KK JJ= @PVSAT ZERO1 ZERO1 CHTK_0    ;

* Clapeyron
PC_0   = PG_0 - PVS_0 + ((-1.)*(RGP1*TK_0*RHOW0*(LOG(HR_0))/MMGW1));
PC_0   = PC_0 'NOMC' 'PC';

* Calculation of the corresponding degree of saturation
CHPC_0 = MANU CHPO MAIL1 1 'SCAL' (MAXI PC_0);
CHTK_0 = MANU CHPO MAIL1 1 'SCAL' TK_0;
HYDR   = MANU CHPO MAIL1 1 'SCAL' HY_0;
cha1   = MANU CHPO MAIL1 1 'SCAL' a1;
chb1   = MANU CHPO MAIL1 1 'SCAL' b1;
chc1   = MANU CHPO MAIL1 1 'SCAL' c1;
chgam0 = MANU CHPO MAIL1 1 'SCAL' gam0;

SW0    = @SATURA CHPC_0 CHTK_0 HYDR cha1 chb1 chc1 chgam0;

CI_TH  = ('MANU' 'CHPO' MAIL1 2 'PG' PG_0 'T' TK_0)  +  PC_0;
*TRAC CI_TH MAIL1;
*---------------------------------------------------------------------*

*---------------------------------------------------------------------*
* BOUNDARY CONDITIONS
* - PC_ext = p_atm
*
* - TC_ext = 20°C until "age time" then accident phase thermal loading (see below)
*
*             / 0.95            0      < time < 3 days
* - HR_ext = {  0.95 --> 0.50   3 days < time < 6 days
*             \ 0.50            6 days < time < age time
* - Accident:  PGWe_i  = 1300.;
*---------------------------------------------------------------------*
TK_E  = TK_0;
PG_E  = PG_0;
HR_E1 = 0.95;
HR_E2 = 0.5;

* PG: imposed gas pressure at the top and bottom faces (PG_ext = p_atm)
EV_PG = 'EVOL' 'MANU' 'TEMPS'  ('PROG' 0.  temps4) ('PROG' 1. 1.);
CLPG1 = 'BLOQ' 'PG'         CONTT1;
CLPG2 = 'BLOQ' 'PG'         CONTT2;
CLPGT = CLPG1 ET CLPG2;
CHPG1 = 'DEPI'  CLPG1        PG_E;
CHPG2 = 'DEPI'  CLPG2        PG_E;
CGPG1 = 'CHAR' 'TIMP' CHPG1 EV_PG;
CGPG2 = 'CHAR' 'TIMP' CHPG2 EV_PG;


* T: Thermal convection and radiation
* --- Temperature loading curve ---

T_RAMP      = 400. ;
DELTAT_RAMP = T_RAMP - TC_0;
DELTAT_LIN1 = 60.;
DELTAT_LIN2 = 6.;

N1     = 1   ;
PRO_TK = PROG;
REPETER BOU_TE (DIME LTP_TOT);
    TIMEi  = EXTR N1 LTP_TOT;
* Before accident phase, temperature is constant at 20oC
SI (TIMEi '<EG' temps2);
TKi    = TK_E;
FINS;
* Linear 400-->460oC from x min to x+130 min
SI ((TIMEi '>' temps2) ET (TIMEi '<EG' temps_lin1));
TKi = T_RAMP + 273.15 + (DELTAT_LIN1 * ((TIMEi - temps2) / (temps_lin1 - temps2)));
FINS;
* Linear 460-->466oC from x+130 min to x+240 min
SI ((TIMEi '>' temps_lin1) ET (TIMEi '<EG' temps3));
TKi = T_RAMP + DELTAT_LIN1 + 273.15 + (DELTAT_LIN2 * ((TIMEi - temps_lin1) / (temps3 - temps_lin1)));
FINS;
* Thermal radiator turned off after x+240 min
SI (TIMEi '>' temps3);
TKi    = TK_E;
FINS;
    PRO_TK = PRO_TK ET (PROG TKi);
    N1 = N1 + 1;
FIN BOU_TE;

EVTK1 = 'EVOL' 'MANU'  LTP_TOT  PRO_TK;

* PLOT THERMAL RAMP IN CELSIUS (Accident and cooling phases)
L_TIME = EXTR EVTK1 'ABSC' ;
L_TEMP = EXTR EVTK1 'ORDO' ;
L_TIME_MIN = (L_TIME - (PROG (DIME L_TIME) * temps2)) / 60. ;
L_TEMP_C   = L_TEMP - (PROG (DIME L_TEMP) * 273.15) ;
EV_PLOT = EVOL 'ROUG' 'MANU' 'Time (min)' L_TIME_MIN 'Temp (C)' L_TEMP_C ;

*DESS EV_PLOT 'XBOR' 0. 600. 'XGRA' 50.
             'YBOR' 0. 500. 'YGRA' 50.
             'GRIL' 'POIN' 'GRIS'
             TITRE 'Thermal Loading Curve - Kalifa HPC M100' ;

* --- Hot face: convection + radiation (T_inf = T_rad) ---
CHTK1 = 'MANU' 'CHPO'  CONTT1 1 'T'  1. 'NATURE' 'DISCRETE';
CGTK1 = ('CHAR' 'TECO'  CHTK1    EVTK1) ET
        ('CHAR' 'TERA'  CHTK1    EVTK1);

* --- Cold face: convection only (T_inf = T_room = const) ---
EVTC1 = 'EVOL' 'MANU' ('PROG' 0. temps4) ('PROG' TK_0 TK_0);
CHTK2 = 'MANU' 'CHPO' CONTT2 1 'T' 1. 'NATURE' 'DISCRETE';
CGTK2 = 'CHAR' 'TECO' CHTK2 EVTC1;


* PC: hygral convection ( qw = hcv * (RGW_s - RGW_ext)n ) - Both faces
N1      = 1   ;
PRO_RGW = PROG;
REPETER BOU_RGW (DIME LTP_TOT);
    EXTR N1 LTP_TOT;
    TIMEi        = EXTR N1 LTP_TOT;
    TKi          = EXTR N1 PRO_TK ;
    PVSe_i XX YY ZZ KK JJ
           = @PVSAT ZERO1 ZERO1 (MANU 'CHPO' MAIL1 'T' TKi);
    PVSe_i       = MAXI PVSe_i;
    FGPGW0 = (MMGW1 / RGP1 )* (1./TKi) ;
       SI (TIMEi '<' temps1);
       PGWe_i  = HR_E1 * PVSe_i;
       FINS;
       SI (TIMEi '>EG' temps1);
       HR_i = HR_E1-(((TIMEi-temps1)/(temps2a-temps1))*(HR_E1-HR_E2));
       PGWe_i  = HR_i * PVSe_i;
       FINS;
       SI (TIMEi '>' temps2a);
       PGWe_i  = HR_E2 * PVSe_i;
       FINS;
       SI (TIMEi '>' temps2);
       PGWe_i  = 1300.;
       FINS;
    RGWi    = FGPGW0 * PGWe_i ;
    PRO_RGW = PRO_RGW ET (PROG RGWi);
    N1 = N1 + 1;
FIN BOU_RGW;
EVPC1   = 'EVOL' 'MANU' LTP_TOT  PRO_RGW;
*DESS EVPC1;
CHPC1   = 'MANU' 'CHPO' CONTH  1  'SCAL'  1. 'NATURE' 'DISCRETE';
CGPC1   = 'CHAR' 'TECO' CHPC1  EVPC1 ;
*---------------------------------------------------------------------

*---------------------------------------------------------------------*
*VI. Resolution PASAPAS : Early age (sealed)
*---------------------------------------------------------------------
TAB0                         = 'TABL' ;
TAB0 . 'MODELE'              = MOD_TOT ;
TAB0 . 'CARACTERISTIQUES'    = MAT_TOT ;
TAB0 . 'BLOCAGES_THERMIQUES' = CLPGT ;
TAB0 . 'CHARGEMENT'          = CGPG1 ET CGPG2 ET CGTK1 ET CGTK2;
TAB0 . 'TEMPS_CALCULES'      = LTP_HYDR ;
TAB0 . 'TEMPS_SAUVES'        = LSA_HYDR ;
TAB0 . 'PROCEDURE_THERMIQUE' = 'NONLINEAIRE' ;
TAB0 . 'RELAXATION_THETA'    = 1. ;
TAB0 . 'MOVA'                = 'D' ;

*--Vapor convection (managed by the CHARTHM procedure)
TAB0 . 'MO_CONVECTION_VAPEUR'     = TABLE;
TAB0 . 'MO_CONVECTION_VAPEUR' . 1 = MODCOH ;
TAB0 . 'MA_CONVECTION_VAPEUR'     = TABLE  ;
TAB0 . 'MA_CONVECTION_VAPEUR' . 1 = MATCOH ;
TAB0 . 'CH_CONVECTION_VAPEUR'     = TABLE  ;
TAB0 . 'CH_CONVECTION_VAPEUR' . 1 = CGPC1  ;
*---------------------------------------------------------------------
TAB0 . 'THM_PARAMETRES'      = MATTHC ;
TAB0 . 'TEMPERATURES'        = 'TABL' ;
TAB0 . 'TEMPERATURES' . 0    = CI_TH ;
TAB0 . 'HYDRATATION'         = 'TABL' ;
TAB0 . 'HYDRATATION' .  0    = MANU CHML MODTHC 'SCAL' HY_0;
TAB0 . 'DCH'                 = 'TABL' ;
TAB0 . 'DCH' .  0            = MANU CHML MODTHC 'SCAL' HY_0;
*---------------------------------------------------------------------
PASAPAS TAB0;

*---------------------------------------------------------------------
opti SAUV 'KALIFA_PHASE1';
SAUV;

*opti SAUV 'FORMAT' 'D:\castem\KALIFA_PHASE1';
*SAUV 'FORMAT';
*---------------------------------------------------------------------

*---------------------------------------------------------------------
opti REST 'KALIFA_PHASE1';
REST;

*opti REST 'FORMAT' 'D:\castem\KALIFA_PHASE1';
*REST 'FORMAT';
*---------------------------------------------------------------------

* --- Check the total number of saved steps
NTOT = DIME TAB0.'TEMPERATURES';
N_LAST = NTOT - 1 ;
MESS '--- Total saved steps = ' NTOT;
MESS '--- Final saved steps = ' N_LAST;

* --- Visualization of the T, PG, PC field at the last saved time step (end of early aging)
CHMT = EXCO 'T' TAB0 . 'TEMPERATURES' . N_LAST;
CHPG = EXCO 'PG' TAB0 . 'TEMPERATURES' . N_LAST;
CHPC = EXCO 'PC' TAB0 . 'TEMPERATURES' . N_LAST;
*TRAC CHMT MODTHC MAIL1 TITRE 'Temperature after early age phase';
*TRAC CHPG MODTHC MAIL1 TITRE 'Gas pressure after early age phase';
*TRAC CHPC MODTHC MAIL1 TITRE 'Capillary pressure after early age phase';

* HYDRATATION FIELD AT THE FINAL TIME STEP - last saved time step (end of early aging)

CHAM_HYDR_LAST = TAB0 . 'HYDRATATION' . N_LAST ;

MESS '=== HYDRATION DEGREE AT THE FINAL TIME STEP ===' ;
MESS 'Min HYDR = ' (MINI CHAM_HYDR_LAST) ;
MESS 'Max HYDR = ' (MAXI CHAM_HYDR_LAST) ;

CHPO_HYDR_LAST = CHAN 'CHPO' CHAM_HYDR_LAST MODTHC ;
*TRAC CHPO_HYDR_LAST MODTHC MAIL1 TITRE 'Hydration Degree Field at Final Step' ;

*---------------------------------------------------------------------
* DRYING AND AGING
*---------------------------------------------------------------------
MATCOH  = 'MATE' MODCOH   'H'  0.002;

*  Recalculation resumed
TAB0 . 'MA_CONVECTION_VAPEUR' . 1 = MATCOH ;
TAB0 . 'TEMPS_CALCULES'           = LTP_AGIN ;
TAB0 . 'TEMPS_SAUVES'             = LSA_AGIN ;
PASAPAS TAB0;

*---------------------------------------------------------------------
opti SAUV 'KALIFA_PHASE2';
SAUV;

opti SAUV 'FORMAT' 'D:\castem\KALIFA_PHASE2';
SAUV 'FORMAT';
*---------------------------------------------------------------------

*---------------------------------------------------------------------
opti REST 'KALIFA_PHASE2';
REST;

opti REST 'FORMAT' 'D:\castem\KALIFA_PHASE2';
REST 'FORMAT';
*---------------------------------------------------------------------

*===================================================================*
* VISUALIZATION OF THE FIELDS AT THE END OF AGING PHASE (last saved time step)
*===================================================================*

* --- Check the total number of saved steps
NTOT = DIME TAB0.'TEMPERATURES';
N_LAST = NTOT - 1 ;
MESS '--- Total saved steps = ' NTOT;
MESS '--- Final saved steps = ' N_LAST;

*===================================================================*
* T, PG, PC field at the last saved time step (end of aging)

CHMT = EXCO 'T' TAB0 . 'TEMPERATURES' . N_LAST;
CHPG = EXCO 'PG' TAB0 . 'TEMPERATURES' . N_LAST;
CHPC = EXCO 'PC' TAB0 . 'TEMPERATURES' . N_LAST;

*TRAC CHMT MODTHC MAIL1 TITRE 'Temperature after aging phase - before accident';
*TRAC CHPG MODTHC MAIL1 TITRE 'Gas pressure after aging phase - before accident';
*TRAC CHPC MODTHC MAIL1 TITRE 'Capillary pressure after aging phase - before accident';

*===================================================================*
* HYDRATATION FIELD AT THE FINAL TIME STEP - last saved time step (before accident)

CHAM_HYDR_LAST = TAB0 . 'HYDRATATION' . N_LAST ;

MESS '=== HYDRATION DEGREE AT THE FINAL TIME STEP ===' ;
MESS 'Min HYDR = ' (MINI CHAM_HYDR_LAST) ;
MESS 'Max HYDR = ' (MAXI CHAM_HYDR_LAST) ;

CHPO_HYDR_LAST = CHAN 'CHPO' CHAM_HYDR_LAST MODTHC ;
*TRAC CHPO_HYDR_LAST MODTHC MAIL1 TITRE 'Hydration Degree Field at Final Step' ;

*===================================================================*
* DEHYDRATION FIELD AT THE FINAL TIME STEP - last saved time step (end of aging)

CHAM_DCH_LAST = TAB0 . 'DCH' . N_LAST ;

MESS '=== DEHYDRATION DEGREE AT THE FINAL TIME STEP ===' ;
MESS 'Min DCH = ' (MINI CHAM_DCH_LAST) ;
MESS 'Max DCH = ' (MAXI CHAM_DCH_LAST) ;

CHPO_DCH_LAST = CHAN 'CHPO' CHAM_DCH_LAST MODTHC ;
*TRAC CHPO_DCH_LAST MODTHC MAIL1 TITRE 'Dehydration Degree Field at Final Step' ;
*===================================================================*

*===================================================================*
* SATURATION DEGREE AND HR AT THE FINAL TIME STEP - last saved time step (end of aging)

* Calcul humidité relative (Loi de Clapeyron) et SW
TAB0 . 'HR' = TABLE;
TAB0 . 'SW' = TABLE;
*
N1 = 0;
REPETER BOU_HR NTOT;
   CHTKi = EXCO 'T'  TAB0 . 'TEMPERATURES' . N1;
   CHPCi = EXCO 'PC' TAB0 . 'TEMPERATURES' . N1;
   CHPGi = EXCO 'PG' TAB0 . 'TEMPERATURES' . N1;
   HYDRi = CHAN CHPO TAB0 . 'HYDRATATION' . N1  MODTHC;
   CHPVSATi CHPGWSCi RHOGWi XX YY ZZ = @PVSAT CHPGi CHPCi CHTKi;
   SWi = @SATURA CHPCi CHTKi HYDRi cha1 chb1 chc1 chgam0;
   HRi   =   CHPGWSCi * (CHPVSATi**-1);
   TAB0 . 'HR' . N1 = HRi;
   TAB0 . 'SW' . N1 = SWi;
   N1 = N1 + 1;
FIN BOU_HR;

CH_SW_LAST= TAB0 . 'SW' . N_LAST ;
CH_HR_LAST= TAB0 . 'HR' . N_LAST ;
TRAC CH_SW_LAST MAIL1 'TITR' 'Saturation Degree (SW) at Final Time Step' ;
TRAC CH_HR_LAST MAIL1 'TITR' 'Relative Humidity (HR) at Final Time Step' ;


*---------------------------------------------------------------------
* ACCIDENT
*---------------------------------------------------------------------
OPTI ECHO 0;
DEBP PARATHER ;
  'ARGUMENT' TABTHER*'TABLE' INST*'FLOTTANT' ;
* (ENG) TABTHER is the input table of the PASAPAS procedur
*       INST is the current calculation time
* (ENG) The loading must be updated in the TABTHER.'WTABLE' table !
* (ENG) The 'THER_COURANT' indice is containing the current iteration
*       temperature field. The loading is updated to have TS = T.

*'MESS' 'ENTRA PARATHER';

WTABLE = TABTHER .'WTABLE' ;

SI ( (INST '>' temps2) ET (INST '<EG' temps3) );
   MATCOT1 = 'MATE' MODCOT1   'H'    8. ;
   MATCOT2 = 'MATE' MODCOT2   'H'    8.3 ;
   MATRAY  = 'MATE' MODRAY   'EMIS'  0.6  ;
   WTABLE.'MAT_TOT' = MATTHC et MATCOT1 et MATRAY et MATCOT2;
FINS;

FINP;
*---------------------------------------------------------------------

MATCOH  = 'MATE' MODCOH   'H'     0.018 ;

* Reprise du calcul
TAB0 . 'PROCEDURE_PARATHER'       = VRAI ;
TAB0 . 'CONVECTION_VAPEUR'        = 2 ;
TAB0 . 'MA_CONVECTION_VAPEUR' . 1 = MATCOH ;
TAB0 . 'TEMPS_CALCULES'           = LTP_ACCI ;
TAB0 . 'TEMPS_SAUVES'             = LSA_ACCI ;
PASAPAS TAB0;

*---------------------------------------------------------------------
opti SAUV 'KALIFA_PHASE3';
SAUV;

opti SAUV 'FORMAT' 'D:\castem\KALIFA_PHASE3';
SAUV 'FORMAT';
*---------------------------------------------------------------------

*---------------------------------------------------------------------
opti REST 'KALIFA_PHASE3';
REST;

opti REST 'FORMAT' 'D:\castem\KALIFA_PHASE3';
REST 'FORMAT';
*---------------------------------------------------------------------


*===================================================================*
* VISUALIZATION OF THE FIELDS AT THE END OF ACCIDENT PHASE (last saved time step)
*===================================================================*

* --- Check the total number of saved steps
NTOT = DIME TAB0.'TEMPERATURES';
N_LAST = NTOT - 1 ;
MESS '--- Total saved steps = ' NTOT;
MESS '--- Final saved steps = ' N_LAST;

*===================================================================*
* T, PG, PC field at the last saved time step (end of accident)

CHMT = EXCO 'T' TAB0 . 'TEMPERATURES' . N_LAST;
CHPG = EXCO 'PG' TAB0 . 'TEMPERATURES' . N_LAST;
CHPC = EXCO 'PC' TAB0 . 'TEMPERATURES' . N_LAST;

*TRAC CHMT MODTHC MAIL1 TITRE 'Temperature after aging phase - after accident';
*TRAC CHPG MODTHC MAIL1 TITRE 'Gas pressure after aging phase - after accident';
*TRAC CHPC MODTHC MAIL1 TITRE 'Capillary pressure after aging phase - after accident';

*===================================================================*
* HYDRATATION FIELD AT THE FINAL TIME STEP - last saved time step (end of accident)

CHAM_HYDR_LAST = TAB0 . 'HYDRATATION' . N_LAST ;

MESS '=== HYDRATION DEGREE AT THE FINAL TIME STEP ===' ;
MESS 'Min HYDR = ' (MINI CHAM_HYDR_LAST) ;
MESS 'Max HYDR = ' (MAXI CHAM_HYDR_LAST) ;

CHPO_HYDR_LAST = CHAN 'CHPO' CHAM_HYDR_LAST MODTHC ;
TRAC CHPO_HYDR_LAST MODTHC MAIL1 TITRE 'Hydration Degree Field at Final Step' ;

*===================================================================*
* DEHYDRATION FIELD AT THE FINAL TIME STEP - last saved time step (accident phase)

CHAM_DCH_LAST = TAB0 . 'DCH' . N_LAST ;

MESS '=== DEHYDRATION DEGREE AT THE FINAL TIME STEP ===' ;
MESS 'Min DCH = ' (MINI CHAM_DCH_LAST) ;
MESS 'Max DCH = ' (MAXI CHAM_DCH_LAST) ;

CHPO_DCH_LAST = CHAN 'CHPO' CHAM_DCH_LAST MODTHC ;
TRAC CHPO_DCH_LAST MODTHC MAIL1 TITRE 'Dehydration Degree Field at Final Step' ;
*===================================================================*

*===================================================================*
* SATURATION DEGREE AND HR AT THE FINAL TIME STEP - last saved time step (end of accident)

* Calcul humidité relative (Loi de Clapeyron) et SW
TAB0 . 'HR' = TABLE;
TAB0 . 'SW' = TABLE;
*
N1 = 0;
REPETER BOU_HR NTOT;
   CHTKi = EXCO 'T'  TAB0 . 'TEMPERATURES' . N1;
   CHPCi = EXCO 'PC' TAB0 . 'TEMPERATURES' . N1;
   CHPGi = EXCO 'PG' TAB0 . 'TEMPERATURES' . N1;
   HYDRi = CHAN CHPO TAB0 . 'HYDRATATION' . N1  MODTHC;
   CHPVSATi CHPGWSCi RHOGWi XX YY ZZ = @PVSAT CHPGi CHPCi CHTKi;
   SWi = @SATURA CHPCi CHTKi HYDRi cha1 chb1 chc1 chgam0;
   HRi   =   CHPGWSCi * (CHPVSATi**-1);
   TAB0 . 'HR' . N1 = HRi;
   TAB0 . 'SW' . N1 = SWi;
   N1 = N1 + 1;
FIN BOU_HR;

CH_SW_LAST= TAB0 . 'SW' . N_LAST ;
CH_HR_LAST= TAB0 . 'HR' . N_LAST ;
TRAC CH_SW_LAST MAIL1 'TITR' 'Saturation Degree (SW) at Final Time Step' ;
TRAC CH_HR_LAST MAIL1 'TITR' 'Relative Humidity (HR) at Final Time Step' ;


*---------------------------------------------------------------------
* EXPORTATION OF THE RESULTS
*---------------------------------------------------------------------

*===================================================================
*********** EXPORT TEMPERATURE EVERY 1 MINUTE **************
*===================================================================
* 1. Initialize the Cast3M base timeline (starting from temps2)
EVT_INIT = EVOL 'BLAN' 'TEMP' TAB0 'TEMPERATURES' 'T' PO_00 ;
LT_SEC   = EXTR EVT_INIT 'ABSC' ;
LT_MIN   = (LT_SEC - (PROG (DIME LT_SEC) * temps2)) / 60. ;

* 2. Initialize the target time axis: From 0 to 240 minutes, step size 1 minute
L_MIN_1  = PROG 0. PAS 1. 240. ;

* 3. Extract, convert to Celsius, and interpolate (IPOL) in a single line
* IPOL syntax: IPOL [new X-axis] [original graph]
LT_00_1 = IPOL L_MIN_1 (EVOL 'MANU' LT_MIN ((EXTR (EVOL 'TEMP' TAB0 'TEMPERATURES' 'T' PO_00) 'ORDO') - 273.15)) ;
LT_10_1 = IPOL L_MIN_1 (EVOL 'MANU' LT_MIN ((EXTR (EVOL 'TEMP' TAB0 'TEMPERATURES' 'T' PO_10) 'ORDO') - 273.15)) ;
LT_20_1 = IPOL L_MIN_1 (EVOL 'MANU' LT_MIN ((EXTR (EVOL 'TEMP' TAB0 'TEMPERATURES' 'T' PO_20) 'ORDO') - 273.15)) ;
LT_30_1 = IPOL L_MIN_1 (EVOL 'MANU' LT_MIN ((EXTR (EVOL 'TEMP' TAB0 'TEMPERATURES' 'T' PO_30) 'ORDO') - 273.15)) ;
LT_40_1 = IPOL L_MIN_1 (EVOL 'MANU' LT_MIN ((EXTR (EVOL 'TEMP' TAB0 'TEMPERATURES' 'T' PO_40) 'ORDO') - 273.15)) ;
LT_50_1 = IPOL L_MIN_1 (EVOL 'MANU' LT_MIN ((EXTR (EVOL 'TEMP' TAB0 'TEMPERATURES' 'T' PO_50) 'ORDO') - 273.15)) ;
LT_120_1 = IPOL L_MIN_1 (EVOL 'MANU' LT_MIN ((EXTR (EVOL 'TEMP' TAB0 'TEMPERATURES' 'T' PO_120) 'ORDO') - 273.15)) ;

* 4. Package into new graph objects to prepare for export.
EV_EX_00 = EVOL 'BLEU' 'MANU' 'Time(min)' L_MIN_1 'T_00mm' LT_00_1 ;
EV_EX_10 = EVOL 'ORAN' 'MANU' 'Time(min)' L_MIN_1 'T_10mm' LT_10_1 ;
EV_EX_20 = EVOL 'JAUN' 'MANU' 'Time(min)' L_MIN_1 'T_20mm' LT_20_1 ;
EV_EX_30 = EVOL 'ROSE' 'MANU' 'Time(min)' L_MIN_1 'T_30mm' LT_30_1 ;
EV_EX_40 = EVOL 'VERT' 'MANU' 'Time(min)' L_MIN_1 'T_40mm' LT_40_1 ;
EV_EX_50 = EVOL 'TURQ' 'MANU' 'Time(min)' L_MIN_1 'T_50mm' LT_50_1 ;
EV_EX_120 = EVOL 'BLAN' 'MANU' 'Time(min)' L_MIN_1 'T_120mm' LT_120_1 ;

* Combine everything into one data package
EV_EXPORT_TEMP = EV_EX_00 ET EV_EX_10 ET EV_EX_20 ET EV_EX_30 ET EV_EX_40 ET EV_EX_50 ET EV_EX_120 ;
DESS EV_EXPORT_TEMP
     'XBOR' 0. 240. 'XGRA' 10.
     'YBOR' 0. 500. 'YGRA' 25
     'GRIL' 'POIN' 'GRIS'
     TITRE 'Temperature Evolution at Measurement Points' ;

* 5. Export to CSV/TXT file
*OPTI 'SORT' 'D:\cast3m-m2internship\02.Simulation\02.Results\Temperature_1min_Intervals.csv' ;
SORT 'EXCE' EV_EXPORT_TEMP ;


*===================================================================
*********** EXPORT GAS PRESSURE EVERY 1 MINUTE **************
*===================================================================

* 1. Initialize the Cast3M base timeline (starting from temps2)
* Dùng PO_10 làm mốc trích xuất thời gian ban đầu vì đã bỏ PO_00
EVP_INIT = EVOL 'BLAN' 'TEMP' TAB0 'TEMPERATURES' 'PG' PO_10 ;

* 3. Extract, convert to MPa (divide by 1.E6), and interpolate (IPOL) in a single line
* IPOL syntax: IPOL [new X-axis] [original graph]
LPG_00_1  = IPOL L_MIN_1 (EVOL 'MANU' LT_MIN ((EXTR (EVOL 'TEMP' TAB0 'TEMPERATURES' 'PG' PO_00)  'ORDO') / 1.E6)) ;
LPG_10_1  = IPOL L_MIN_1 (EVOL 'MANU' LT_MIN ((EXTR (EVOL 'TEMP' TAB0 'TEMPERATURES' 'PG' PO_10)  'ORDO') / 1.E6)) ;
LPG_20_1  = IPOL L_MIN_1 (EVOL 'MANU' LT_MIN ((EXTR (EVOL 'TEMP' TAB0 'TEMPERATURES' 'PG' PO_20)  'ORDO') / 1.E6)) ;
LPG_30_1  = IPOL L_MIN_1 (EVOL 'MANU' LT_MIN ((EXTR (EVOL 'TEMP' TAB0 'TEMPERATURES' 'PG' PO_30)  'ORDO') / 1.E6)) ;
LPG_40_1  = IPOL L_MIN_1 (EVOL 'MANU' LT_MIN ((EXTR (EVOL 'TEMP' TAB0 'TEMPERATURES' 'PG' PO_40)  'ORDO') / 1.E6)) ;
LPG_50_1  = IPOL L_MIN_1 (EVOL 'MANU' LT_MIN ((EXTR (EVOL 'TEMP' TAB0 'TEMPERATURES' 'PG' PO_50)  'ORDO') / 1.E6)) ;
LPG_120_1  = IPOL L_MIN_1 (EVOL 'MANU' LT_MIN ((EXTR (EVOL 'TEMP' TAB0 'TEMPERATURES' 'PG' PO_120)  'ORDO') / 1.E6)) ;

* 4. Package into new graph objects to prepare for export.
EV_PG_00  = EVOL 'BLEU' 'MANU' 'Time(min)' L_MIN_1 'PG_00mm(MPa)'  LPG_00_1 ;
EV_PG_10  = EVOL 'ORAN' 'MANU' 'Time(min)' L_MIN_1 'PG_10mm(MPa)'  LPG_10_1 ;
EV_PG_20  = EVOL 'JAUN' 'MANU' 'Time(min)' L_MIN_1 'PG_20mm(MPa)'  LPG_20_1 ;
EV_PG_30  = EVOL 'ROSE' 'MANU' 'Time(min)' L_MIN_1 'PG_30mm(MPa)'  LPG_30_1 ;
EV_PG_40  = EVOL 'VERT' 'MANU' 'Time(min)' L_MIN_1 'PG_40mm(MPa)'  LPG_40_1 ;
EV_PG_50  = EVOL 'TURQ' 'MANU' 'Time(min)' L_MIN_1 'PG_50mm(MPa)'  LPG_50_1 ;
EV_PG_120  = EVOL 'BLAN' 'MANU' 'Time(min)' L_MIN_1 'PG_120mm(MPa)'  LPG_120_1 ;

* Combine everything into one data package
EV_EXPORT_PG = EV_PG_00 ET EV_PG_10 ET EV_PG_20 ET EV_PG_30 ET EV_PG_40 ET EV_PG_50 ET EV_PG_120;
DESS EV_EXPORT_PG
     'XBOR' 0. 240. 'XGRA' 10.
     'YBOR' 0. 4. 'YGRA' 0.25
     'GRIL' 'POIN' 'GRIS'
     TITRE 'Gas Pressure Evolution at Measurement Points' ;

* 5. Export to CSV/TXT file
*OPTI 'SORT' 'D:\cast3m-m2internship\02.Simulation\02.Results\GasPressure_1min_Intervals.csv' ;
SORT 'EXCE' EV_EXPORT_PG ;

*===================================================================
*********** EXPORT CAPILLARY PRESSURE EVERY 1 MINUTE **************
*===================================================================

* 1. Initialize the Cast3M base timeline (starting from temps2)
EVP_INIT = EVOL 'BLAN' 'TEMP' TAB0 'TEMPERATURES' 'PC' PO_10 ;

* 3. Extract, convert to MPa (divide by 1.E6), and interpolate (IPOL) in a single line
* IPOL syntax: IPOL [new X-axis] [original graph]
LPC_10_1  = IPOL L_MIN_1 (EVOL 'MANU' LT_MIN ((EXTR (EVOL 'TEMP' TAB0 'TEMPERATURES' 'PC' PO_10)  'ORDO') / 1.E6)) ;
LPC_20_1  = IPOL L_MIN_1 (EVOL 'MANU' LT_MIN ((EXTR (EVOL 'TEMP' TAB0 'TEMPERATURES' 'PC' PO_20)  'ORDO') / 1.E6)) ;
LPC_30_1  = IPOL L_MIN_1 (EVOL 'MANU' LT_MIN ((EXTR (EVOL 'TEMP' TAB0 'TEMPERATURES' 'PC' PO_30)  'ORDO') / 1.E6)) ;
LPC_40_1  = IPOL L_MIN_1 (EVOL 'MANU' LT_MIN ((EXTR (EVOL 'TEMP' TAB0 'TEMPERATURES' 'PC' PO_40)  'ORDO') / 1.E6)) ;
LPC_50_1  = IPOL L_MIN_1 (EVOL 'MANU' LT_MIN ((EXTR (EVOL 'TEMP' TAB0 'TEMPERATURES' 'PC' PO_50)  'ORDO') / 1.E6)) ;

* 4. Package into new graph objects to prepare for export.
EV_PC_10  = EVOL 'ORAN' 'MANU' 'Time(min)' L_MIN_1 'PC_10mm(MPa)'  LPC_10_1 ;
EV_PC_20  = EVOL 'JAUN' 'MANU' 'Time(min)' L_MIN_1 'PC_20mm(MPa)'  LPC_20_1 ;
EV_PC_30  = EVOL 'ROSE' 'MANU' 'Time(min)' L_MIN_1 'PC_30mm(MPa)'  LPC_30_1 ;
EV_PC_40  = EVOL 'VERT' 'MANU' 'Time(min)' L_MIN_1 'PC_40mm(MPa)'  LPC_40_1 ;
EV_PC_50  = EVOL 'TURQ' 'MANU' 'Time(min)' L_MIN_1 'PC_50mm(MPa)'  LPC_50_1 ;

* Combine everything into one data package
EV_EXPORT_PC = EV_PC_10 ET EV_PC_20 ET EV_PC_30 ET EV_PC_40 ET EV_PC_50;
DESS EV_EXPORT_PC
     'XBOR' 0. 240. 'XGRA' 10.
     'GRIL' 'POIN' 'GRIS'
     TITRE 'Capillary Pressure Evolution at Measurement Points' ;

* 5. Export to CSV/TXT file
*OPTI 'SORT' 'D:\cast3m-m2internship\02.Simulation\02.Results\CapillaryPressure_1min_Intervals.csv' ;
SORT 'EXCE' EV_EXPORT_PC ;


*===================================================================*
*********** EXPORT DEHYDRATION DEGREE (0-->1) EVERY 1 MINUTE ***********
*===================================================================*

* 1. Initialize empty data arrays
LDHY_00 = PROG ;
LDHY_10 = PROG ;
LDHY_20 = PROG ;
LDHY_30 = PROG ;
LDHY_40 = PROG ;
LDHY_50 = PROG ;
LDHY_120 = PROG ;

* 2. Type Casting and Extraction Loops (Optimizing nested code writing)
N_STEP = 0 ;
REPETER BOU_HY (DIME TAB0 . 'DCH') ;
* Read MCHAML and immediately convert to CHPOINT
   HY_CHPO = CHAN 'CHPO' (TAB0 . 'DCH' . N_STEP) MODTHC ;

* Extract values ​​and append them directly to the array (without creating intermediate variables)
   LDHY_00 = LDHY_00 ET (PROG (EXTR HY_CHPO 'SCAL' PO_00)) ;
   LDHY_10 = LDHY_10 ET (PROG (EXTR HY_CHPO 'SCAL' PO_10)) ;
   LDHY_20 = LDHY_20 ET (PROG (EXTR HY_CHPO 'SCAL' PO_20)) ;
   LDHY_30 = LDHY_30 ET (PROG (EXTR HY_CHPO 'SCAL' PO_30)) ;
   LDHY_40 = LDHY_40 ET (PROG (EXTR HY_CHPO 'SCAL' PO_40)) ;
   LDHY_50 = LDHY_50 ET (PROG (EXTR HY_CHPO 'SCAL' PO_50)) ;
   LDHY_120 = LDHY_120 ET (PROG (EXTR HY_CHPO 'SCAL' PO_120)) ;
   N_STEP = N_STEP + 1 ;
FIN BOU_HY ;

* 4. Nội suy dữ liệu về mốc 1 phút bằng IPOL
* Cú pháp: IPOL [Trục X mới] (EVOL 'MANU' [Trục X cũ] [Giá trị Y cũ])
LDHY_00_1 = IPOL L_MIN_1 (EVOL 'MANU' LT_MIN 'HYD' LDHY_00) ;
LDHY_10_1 = IPOL L_MIN_1 (EVOL 'MANU' LT_MIN 'HYD' LDHY_10) ;
LDHY_20_1 = IPOL L_MIN_1 (EVOL 'MANU' LT_MIN 'HYD' LDHY_20) ;
LDHY_30_1 = IPOL L_MIN_1 (EVOL 'MANU' LT_MIN 'HYD' LDHY_30) ;
LDHY_40_1 = IPOL L_MIN_1 (EVOL 'MANU' LT_MIN 'HYD' LDHY_40) ;
LDHY_50_1 = IPOL L_MIN_1 (EVOL 'MANU' LT_MIN 'HYD' LDHY_50) ;
LDHY_120_1 = IPOL L_MIN_1 (EVOL 'MANU' LT_MIN 'HYD' LDHY_120) ;

* 5. Tạo đối tượng EVOL với trục thời gian mới
EV_DHYDR_00 = EVOL 'BLEU' 'MANU' 'Time (min)' L_MIN_1 'DHyd_00mm' LDHY_00_1 ;
EV_DHYDR_10 = EVOL 'ORAN' 'MANU' 'Time (min)' L_MIN_1 'DHyd_10mm' LDHY_10_1 ;
EV_DHYDR_20 = EVOL 'JAUN' 'MANU' 'Time (min)' L_MIN_1 'DHyd_20mm' LDHY_20_1 ;
EV_DHYDR_30 = EVOL 'ROSE' 'MANU' 'Time (min)' L_MIN_1 'DHyd_30mm' LDHY_30_1 ;
EV_DHYDR_40 = EVOL 'VERT' 'MANU' 'Time (min)' L_MIN_1 'DHyd_40mm' LDHY_40_1 ;
EV_DHYDR_50 = EVOL 'TURQ' 'MANU' 'Time (min)' L_MIN_1 'DHyd_50mm' LDHY_50_1 ;
EV_DHYDR_120 = EVOL 'BLAN' 'MANU' 'Time (min)' L_MIN_1 'DHyd_120mm' LDHY_120_1 ;

* 4. Combine everything into one data package
EV_EXPORT_DHYDR = EV_DHYDR_00 ET EV_DHYDR_10 ET EV_DHYDR_20 ET EV_DHYDR_30 ET EV_DHYDR_40 ET EV_DHYDR_50 ET EV_DHYDR_120;
DESS EV_EXPORT_DHYDR
     'XBOR' 0. 240. 'XGRA' 10.
     'YBOR' 0. 1. 'YGRA' 0.1
     'GRIL' 'POIN' 'GRIS'
     TITRE 'Dehydration degree Evolution at Measurement Points' ;

* 5. Export to CSV file
*OPTI 'SORT' 'D:\cast3m-m2internship\02.Simulation\02.Results\DehydrationDegree_1min_Intervals.csv' ;
SORT 'EXCE' EV_EXPORT_DHYDR ;


*===================================================================*
*********** EXPORT HYDRATION DEGREE (0-->1) EVERY 1 MINUTE ***********
*===================================================================*

* 1. Initialize empty data arrays
LHY_00 = PROG ;
LHY_10 = PROG ;
LHY_20 = PROG ;
LHY_30 = PROG ;
LHY_40 = PROG ;
LHY_50 = PROG ;
LHY_120 = PROG ;

* 2. Type Casting and Extraction Loops (Optimizing nested code writing)
N_STEP = 0 ;
REPETER BOU_HY (DIME TAB0 . 'HYDRATATION') ;
* Read MCHAML and immediately convert to CHPOINT
   HY_CHPO = CHAN 'CHPO' (TAB0 . 'HYDRATATION' . N_STEP) MODTHC ;

* Extract values ​​and append them directly to the array (without creating intermediate variables)
   LHY_00 = LHY_00 ET (PROG (EXTR HY_CHPO 'SCAL' PO_00)) ;
   LHY_10 = LHY_10 ET (PROG (EXTR HY_CHPO 'SCAL' PO_10)) ;
   LHY_20 = LHY_20 ET (PROG (EXTR HY_CHPO 'SCAL' PO_20)) ;
   LHY_30 = LHY_30 ET (PROG (EXTR HY_CHPO 'SCAL' PO_30)) ;
   LHY_40 = LHY_40 ET (PROG (EXTR HY_CHPO 'SCAL' PO_40)) ;
   LHY_50 = LHY_50 ET (PROG (EXTR HY_CHPO 'SCAL' PO_50)) ;
   LHY_120 = LHY_120 ET (PROG (EXTR HY_CHPO 'SCAL' PO_120)) ;
   N_STEP = N_STEP + 1 ;
FIN BOU_HY ;

* 4. Nội suy dữ liệu về mốc 1 phút bằng IPOL
* Cú pháp: IPOL [Trục X mới] (EVOL 'MANU' [Trục X cũ] [Giá trị Y cũ])
LHY_00_1 = IPOL L_MIN_1 (EVOL 'MANU' LT_MIN 'HYD' LHY_00) ;
LHY_10_1 = IPOL L_MIN_1 (EVOL 'MANU' LT_MIN 'HYD' LHY_10) ;
LHY_20_1 = IPOL L_MIN_1 (EVOL 'MANU' LT_MIN 'HYD' LHY_20) ;
LHY_30_1 = IPOL L_MIN_1 (EVOL 'MANU' LT_MIN 'HYD' LHY_30) ;
LHY_40_1 = IPOL L_MIN_1 (EVOL 'MANU' LT_MIN 'HYD' LHY_40) ;
LHY_50_1 = IPOL L_MIN_1 (EVOL 'MANU' LT_MIN 'HYD' LHY_50) ;
LHY_120_1 = IPOL L_MIN_1 (EVOL 'MANU' LT_MIN 'HYD' LHY_120) ;

* 5. Tạo đối tượng EVOL với trục thời gian mới
EV_HYDR_00 = EVOL 'BLEU' 'MANU' 'Time (min)' L_MIN_1 'Hyd_00mm' LHY_00_1 ;
EV_HYDR_10 = EVOL 'ORAN' 'MANU' 'Time (min)' L_MIN_1 'Hyd_10mm' LHY_10_1 ;
EV_HYDR_20 = EVOL 'JAUN' 'MANU' 'Time (min)' L_MIN_1 'Hyd_20mm' LHY_20_1 ;
EV_HYDR_30 = EVOL 'ROSE' 'MANU' 'Time (min)' L_MIN_1 'Hyd_30mm' LHY_30_1 ;
EV_HYDR_40 = EVOL 'VERT' 'MANU' 'Time (min)' L_MIN_1 'Hyd_40mm' LHY_40_1 ;
EV_HYDR_50 = EVOL 'TURQ' 'MANU' 'Time (min)' L_MIN_1 'Hyd_50mm' LHY_50_1 ;
EV_HYDR_120 = EVOL 'BLAN' 'MANU' 'Time (min)' L_MIN_1 'Hyd_120mm' LHY_120_1 ;

* 4. Combine everything into one data package
EV_EXPORT_HYDR = EV_HYDR_00 ET EV_HYDR_10 ET EV_HYDR_20 ET EV_HYDR_30 ET EV_HYDR_40 ET EV_HYDR_50 ET EV_HYDR_120;
DESS EV_EXPORT_HYDR
     'XBOR' 0. 240. 'XGRA' 10.
     'YBOR' 0. 1. 'YGRA' 0.1
     'GRIL' 'POIN' 'GRIS'
     TITRE 'Hydration degree Evolution at Measurement Points' ;

* 5. Export to CSV file
*OPTI 'SORT' 'D:\cast3m-m2internship\02.Simulation\02.Results\HydrationDegree_1min_Intervals.csv' ;
SORT 'EXCE' EV_EXPORT_HYDR ;


* STILL NOT WORKING
*===================================================================
*********** EXPORT SATURATION DEGREE (SW) EVERY 1 MINUTE ***********
*===================================================================

* 2. Khởi tạo các mảng PROG rỗng để lưu lịch sử SW cho từng điểm
LSW_00 = PROG ;
LSW_10 = PROG ;
LSW_20 = PROG ;
LSW_30 = PROG ;
LSW_40 = PROG ;
LSW_50 = PROG ;
LSW_120 = PROG ;

* Lặp qua tất cả các bước thời gian để trích xuất giá trị SW tại các điểm
N1 = 0;
REPETER BOU_EXTR_SW (DIME TAB0 . 'SW') ;
   CH_SWi = TAB0 . 'SW' . N1 ;

* Trích xuất giá trị SCAL tại từng điểm (PO_00, PO_10,...) và nối vào PROG
   LSW_00  = LSW_00  ET (PROG (EXTR CH_SWi 'SCAL' PO_00)) ;
   LSW_10  = LSW_10  ET (PROG (EXTR CH_SWi 'SCAL' PO_10)) ;
   LSW_20  = LSW_20  ET (PROG (EXTR CH_SWi 'SCAL' PO_20)) ;
   LSW_30  = LSW_30  ET (PROG (EXTR CH_SWi 'SCAL' PO_30)) ;
   LSW_40  = LSW_40  ET (PROG (EXTR CH_SWi 'SCAL' PO_40)) ;
   LSW_50  = LSW_50  ET (PROG (EXTR CH_SWi 'SCAL' PO_50)) ;
   LSW_120 = LSW_120 ET (PROG (EXTR CH_SWi 'SCAL' PO_120)) ;

   N1 = N1 + 1;
FIN BOU_EXTR_SW ;

* 3. Nội suy (IPOL) về mốc thời gian mục tiêu (mỗi 1 phút)
LSW_00_1  = IPOL L_MIN_1 (EVOL 'MANU' LT_MIN LSW_00) ;
LSW_10_1  = IPOL L_MIN_1 (EVOL 'MANU' LT_MIN LSW_10) ;
LSW_20_1  = IPOL L_MIN_1 (EVOL 'MANU' LT_MIN LSW_20) ;
LSW_30_1  = IPOL L_MIN_1 (EVOL 'MANU' LT_MIN LSW_30) ;
LSW_40_1  = IPOL L_MIN_1 (EVOL 'MANU' LT_MIN LSW_40) ;
LSW_50_1  = IPOL L_MIN_1 (EVOL 'MANU' LT_MIN LSW_50) ;
LSW_120_1 = IPOL L_MIN_1 (EVOL 'MANU' LT_MIN LSW_120) ;

* 4. Đóng gói dữ liệu thành các đồ thị (EVOL) với màu sắc khác nhau
EV_EX_SW_00  = EVOL 'BLEU' 'MANU' 'Time(min)' L_MIN_1 'SW_00mm' LSW_00_1 ;
EV_EX_SW_10  = EVOL 'ORAN' 'MANU' 'Time(min)' L_MIN_1 'SW_10mm' LSW_10_1 ;
EV_EX_SW_20  = EVOL 'JAUN' 'MANU' 'Time(min)' L_MIN_1 'SW_20mm' LSW_20_1 ;
EV_EX_SW_30  = EVOL 'ROSE' 'MANU' 'Time(min)' L_MIN_1 'SW_30mm' LSW_30_1 ;
EV_EX_SW_40  = EVOL 'VERT' 'MANU' 'Time(min)' L_MIN_1 'SW_40mm' LSW_40_1 ;
EV_EX_SW_50  = EVOL 'TURQ' 'MANU' 'Time(min)' L_MIN_1 'SW_50mm' LSW_50_1 ;
EV_EX_SW_120 = EVOL 'BLAN' 'MANU' 'Time(min)' L_MIN_1 'SW_120mm' LSW_120_1 ;

* Gom tất cả lại để hiển thị
EV_EXPORT_SW = EV_EX_SW_00 ET EV_EX_SW_10 ET EV_EX_SW_20 ET EV_EX_SW_30 ET EV_EX_SW_40 ET EV_EX_SW_50 ET EV_EX_SW_120 ;

* Vẽ đồ thị kiểm tra
DESS EV_EXPORT_SW 'TITR' 'Evolution of Saturation Degree (SW)' 'LEGE' ;

* 5. Xuất dữ liệu ra file CSV
OPTI 'SORT' 'D:\cast3m-m2internship\02.Simulation\02.Results\Saturation_1min_Intervals.csv' ;
SORT 'EXCE' EV_EXPORT_SW ;


* =========================================================
* 1. TÍNH TOÁN MASS LOSS (%)
* =========================================================
L_TIME_ML   = PROG ;
L_ML_PCT    = PROG ;
MASS_0      = 0.0 ;

* --- ĐỊNH NGHĨA HẰNG SỐ ---
PORO  = 0.1 ;
RHOW  = 1000.0 ;
W_INF = winf ;

N1 = 0 ;
REPETER BOU_ML (DIME TAB0 . 'TEMPERATURES') ;
* Trích xuất các trường tại bước N1
    CHTKi = EXCO 'T' TAB0 . 'TEMPERATURES' . N1 ;
    CHPCi = EXCO 'PC' TAB0 . 'TEMPERATURES' . N1 ;
    CHPGi = EXCO 'PG' TAB0 . 'TEMPERATURES' . N1 ;
    HYDRi = CHAN CHPO (TAB0 . 'HYDRATATION' . N1) MODTHC ;

* Tính SW và Mật độ hơi nước RHOGW
    CHPVSATi CHPGWSCi RHOGWi XX YY ZZ = @PVSAT CHPGi CHPCi CHTKi ;
    SWi = @SATURA CHPCi CHTKi HYDRi cha1 chb1 chc1 chgam0 ;

* Tính tổng nước (Lỏng + Hơi + Liên kết) [kg/m3]
    W_LIQ   = SWi * (PORO * RHOW) ;
    CH_SG   = (MANU CHPO MAIL1 1 'SCAL' 1.0) - SWi ;
    W_VAP   = CH_SG * RHOGWi * PORO ;
    W_BOUND = HYDRi * W_INF ;
    W_TOT   = W_LIQ + W_VAP + W_BOUND ;

* Tích phân trên toàn thể tích => Khối lượng [kg]
    CHAM_W = CHAN 'CHAM' W_TOT MODTHC ;
    MASS_I = INTG MODTHC CHAM_W ;

* Lưu khối lượng ban đầu tại t=0
    SI (N1 EGA 0) ;
        MASS_0 = MASS_I ;
    FINSI ;

* Tính Mass Loss theo %
* Kiểm tra MASS_0 để tránh chia cho 0
    SI (MASS_0 NEG 0.0) ;
        M_LOSS_PCT = ((MASS_0 - MASS_I) / MASS_0) * 100.0 ;
    SINON ;
        M_LOSS_PCT = 0.0 ;
    FINSI ;

* Đưa vào mảng
    T_I = TAB0 . 'TEMPS' . N1 ;
    L_TIME_ML   = L_TIME_ML ET (PROG (T_I / 60.)) ;
    L_ML_PCT    = L_ML_PCT ET (PROG M_LOSS_PCT) ;

    N1 = N1 + 1 ;
FIN BOU_ML ;

* Đóng gói đồ thị Full Time
EV_ML_FULL = EVOL 'MANU' 'Time (min)' L_TIME_ML 'Mass Loss (%)' L_ML_PCT ;

* =========================================================
* 2. CẮT VÀ VẼ ĐỒ THỊ TRONG VÙNG 240 PHÚT
* =========================================================
L_MIN_240 = PROG 0. PAS 5. 240. ;
L_ML_240  = IPOL L_MIN_240 EV_ML_FULL ;

* Tạo đối tượng đồ thị cuối cùng
EV_ML_240 = EVOL 'ROUG' 'MANU' 'Time (min)' L_MIN_240 'Mass Loss (%)' L_ML_240 ;

* Vẽ ra màn hình
DESS EV_ML_240 ;

* =========================================================
* 3. XUẤT DỮ LIỆU RA FILE CSV
* =========================================================
OPTI 'SORT' 'D:\cast3m-m2internship\02.Simulation\02.Results\MassLoss_1min_Intervals.csv' ;
SORT 'EXCE' EV_ML_240 ;
