*==============================================================================
*AUTHOR:  Tan Kiet HONG
*DATE:    2026-03-21
*DESCRIPTION: This is a sample of a nonlinear stationary thermic problem K(T)T=F, developed from the code 2a KT=F and Sphere.dgibi (quadrature template). Addtions:
*   - Uncertainty quantification on permeability Kint:
*       QUADRATU → quadrature points/weights
*       PARASTAT → sensitivity analysis
*       PROBDENS → PDF/CDF of shrinkage strain

*GEOMETRY: A rectangular cantilever beam of length 3 m and height 0.5 m.
*BOUNDARY CONDITIONS:
* - Imposed heat flux of 100 W/m² on the right edge (LDROITE).
* - Convection with a coefficient of 100 W/m²K on the top edge (LHAUT) and ambient temperature of 25 °C.
* - The left edge (LGAUCHE) is thermally insulated (no heat flux and has no imposed temperature) and fixed in space (no mechanical displacement).

*INPUTS:
* - KTHERMAL CONDUCTIVITY K:
*   K = KD*(1+4*(SL*PHI*RHO_L)/((1-PHI)*RHO_S))
*   KD(T)=KD0(1+A_K (T-T0))
*   WITH KD0=2, A_K=0.005, T0=20

*   SL = 0.2; PHI = 0.18; RHO_L = 1000.; RHO_S = 2500.;

* - CONVECTION COEFFICIENT: HCONVEC = 100.
* - AMBIENT TEMPERATURE: TLIBRE = 25.
* - IMPOSED HEAT FLUX: FLUXIMPOSE = 100.

*OUTPUTS:
* - TEMPERATURE FIELD T
*==============================================================================

*OPTIONS
OPTI ECHO 0;
OPTI 'DIME' 2 'ELEM' QUA4;

*==============================================================================
* 1) GEOMETRY AND MESH DEFINITION

*GEOMETRY DEFINITION
LONG    = 3.;
HAUT    = 0.5;

*NUMBER OF MESH SEGMENT
NLONG   = 35;
NHAUT   = 5;

*POINTS CREATION
PA      = 0. 0.;
PB      = LONG 0.;
PC      = LONG HAUT;
PD      = 0. HAUT;
*TRAC (PA ET PB ET PC ET PD);

*MESH LINES CREATION
LAB     = DROI NLONG PA PB;
LBC     = DROI NHAUT PB PC;
LCD     = DROI NLONG PC PD;
LDA     = DROI NHAUT PD PA;

*MESH SURFACE CREATION
MAIL1   = DALL LAB LBC LCD LDA;
*TRAC MAIL1;


*==============================================================================
* 2) PHYSICAL PROBLEM DEFINITION

*LINE DEFINITION FOR APPLYING BOUNDARY CONDITIONS
LHAUT    = LCD;
LBAS     = LAB;
LDROITE  = LBC;
LGAUCHE  = LDA;

*MATERIAL PROPERTY DEFINITION
A_K     = 0.005;
T0      = 20.;

SL      = 0.2;
PHI     = 0.18;
RHO_L   = 1000.;
RHO_S   = 2500.;

HCONVEC  = 100.;
TLIBRE   = 25.;
FLUXIMPOSE = 100.;

* Step-by-step calculation of the liquid phase multiplier (FEAU) to ensure mathematical operator priority in Cast3M
* FEAU = [1 + 4 * (SL * PHI * RHO_L) / ((1 - PHI) * RHO_S)]
temps1    = SL * PHI * RHO_L;
temps2  = (1. - PHI) * RHO_S;
FEAU    = 1. + (4. * temps1 / temps2);

*MODEL DEFINITION
MOD1     = MODE MAIL1 THERMIQUE ISOTROPE;
MOD2     = MODE LHAUT THERMIQUE CONVECTION;
MOD_TOT  = MOD1 ET MOD2;

*MATERIAL DEFINITION
MAT2     = MATE MOD2 'H' HCONVEC;

*==============================================================================
* 2B) TIME DISCRETIZATION
* Pseudo-transient: PASAPAS requires time steps even for steady-state problems
* TFIN and dt are artificial — only the final converged state matters
TFIN    = 1000.;
LTEMPS1 = PROG 0. PAS 100. TFIN;

* INITIAL CONDITION (for every mesh node at initital temperature)
T_INI   = T0;
T0_CHPO = MANU 'CHPO' MAIL1 'T' T_INI;

*==============================================================================
* 2C) F VECTOR

*THERMAL BOUNDARY CONDITIONS DEFINITION
*SOLVING K(T)T=F
*IMPOSED HEAT FLUX on LDROITE
EV_FLUX = EVOL MANU 'TEMPS' (PROG 0. TFIN) 'T' (PROG 1. 1.);
FLT2_0  = FLUX MOD1 LDROITE FLUXIMPOSE;
FLT2    = CHAR 'Q' FLT2_0 EV_FLUX;
*CONVECTION LOAD VECTOR on LHAUT
CONV1   = MANU 'CHPO' LHAUT 1 'T' TLIBRE 'NATURE' 'DISCRETE';
EV_CONV = EVOL MANU 'TEMPS' (PROG 0. TFIN) 'T' (PROG 1. 1.);
CHAR_CV = CHAR 'TECO' CONV1 EV_CONV;

CHAR_TOT = FLT2 ET CHAR_CV;

*==============================================================================
* 3) QUADRATURE POINTS FOR KD0 ~ LogNormal(MU_KD0, SIG_KD0)

MU_KD0  = 2.0;
SIG_KD0 = 0.1;
NpKD0   = 10;

TabKD0 = QUADRATU 'LOGN' MU_KD0 SIG_KD0 NpKD0;

*==============================================================================
* 4) PROCEDURE: FEM solve for a given KD0 value → returns T_max

DEBPROC CalTmax KD0val*FLOTTANT;

* Build K(T) curve for this KD0 sample
tXT = PROG 0. PAS 1. 150.;
tYK = PROG;

REPE BoucleT (DIME tXT);
   tT_i   = EXTR tXT &BoucleT;
   tKD_i  = KD0val * (1. + (A_K * (tT_i - T0)));
   tKT_i  = tKD_i * FEAU;
   tYK    = tYK ET (PROG tKT_i);
FIN BoucleT;

K_EVOL_i = EVOL MANU 'T' tXT 'K' tYK;

* Assemble material (K depends on KD0val)
MAT1_i   = MATE MOD1 'K' K_EVOL_i;
MAT_TOT_i = MAT1_i ET MAT2;

* PASAPAS nonlinear solve
TABi = TABLE;
TABi.TEMPERATURES        = TABLE;
TABi.TEMPERATURES.0      = T0_CHPO;
TABi.MODELE              = MOD_TOT;
TABi.CARACTERISTIQUES    = MAT_TOT_i;
TABi.CHARGEMENT          = CHAR_TOT;
TABi.PROCEDURE_THERMIQUE = NONLINEAIRE;
TABi.RELAXATION_THETA    = 0.57;
TABi.TEMPS_CALCULES      = LTEMPS1;

PASAPAS TABi;

* Extract T_max at final time step as scalar QoI
NBTi   = DIME TABi.TEMPERATURES;
TRES_i = TABi.TEMPERATURES.(NBTi - 1);
Tmax_i = MAXI TRES_i;

FINPROC Tmax_i;

*==============================================================================
* 5) LOOP OVER QUADRATURE POINTS → build TabRES

TabRES = TABLE;

REPE BoucleQ NpKD0;
  KD0_q   = TabKD0 .&BoucleQ. 'POINT';
  POIDS_q = TabKD0 .&BoucleQ. 'POIDS';

  Tmax_q  = CalTmax KD0_q;

  TabRES .&BoucleQ = TABLE;
  TabRES .&BoucleQ. 'POINT' = Tmax_q;
  TabRES .&BoucleQ. 'POIDS' = POIDS_q;

  MESS '--- Quadrature point ' &BoucleQ ' / ' NpKD0;
  MESS '    KD0   = ' KD0_q;
  MESS '    POIDS = ' POIDS_q;
  MESS '    Tmax  = ' Tmax_q;
FIN BoucleQ;

*==============================================================================
* 6) STATISTICAL MOMENTS via PARASTAT

MU_T SIGMA_T RB1_T B2_T = PARASTAT TabRES;

MESS '%%%%%%%%%%%%%%%%%%%%%%%%%%%%%%%%%%%%%%%%%%%%%%%%%%%%%%%%%%';
MESS '%%% STATISTICAL MOMENTS OF T_max (KD0 lognormal UQ)';
MESS '%%% MEAN            (MU)    = ' MU_T;
MESS '%%% STD DEV         (SIGMA) = ' SIGMA_T;
MESS '%%% SKEWNESS        (RB1)   = ' RB1_T;
MESS '%%% KURTOSIS        (B2)    = ' B2_T;
MESS '%%%%%%%%%%%%%%%%%%%%%%%%%%%%%%%%%%%%%%%%%%%%%%%%%%%%%%%%%%';

*==============================================================================
* 7) PDF / CDF of T_max via PROBDENS

PDF_T CDF_T = PROBDENS MU_T SIGMA_T RB1_T B2_T;
DESS PDF_T;
DESS CDF_T;

*==============================================================================
* 8) DETERMINISTIC REFERENCE RUN (KD0 = MU_KD0) FOR VISUALIZATION

MESS '%%% DETERMINISTIC REFERENCE RUN (KD0 = mean)';

tXT_ref = PROG 0. PAS 1. 150.;
tYK_ref = PROG;
REPE BoucleRef (DIME tXT_ref);
  tT_r  = EXTR tXT_ref &BoucleRef;
  tKD_r = MU_KD0 * (1. + (A_K * (tT_r - T0)));
  tKT_r = tKD_r * FEAU;
  tYK_ref = tYK_ref ET (PROG tKT_r);
FIN BoucleRef;

K_REF   = EVOL MANU 'T' tXT_ref 'K' tYK_ref;
MAT1_R  = MATE MOD1 'K' K_REF;
MAT_R   = MAT1_R ET MAT2;

TAB_REF = TABLE;
TAB_REF.TEMPERATURES        = TABLE;
TAB_REF.TEMPERATURES.0      = T0_CHPO;
TAB_REF.MODELE              = MOD_TOT;
TAB_REF.CARACTERISTIQUES    = MAT_R;
TAB_REF.CHARGEMENT          = CHAR_TOT;
TAB_REF.PROCEDURE_THERMIQUE = NONLINEAIRE;
TAB_REF.RELAXATION_THETA    = 0.57;
TAB_REF.TEMPS_CALCULES      = LTEMPS1;

PASAPAS TAB_REF;

NBT_R  = DIME TAB_REF.TEMPERATURES;
TRES_R = TAB_REF.TEMPERATURES.(NBT_R - 1);
TRAC TRES_R MAIL1;

FIN;

*==============================================================================
* 4) RESOLUTION (PASAPAS NONLINEAR SOLVER)

*RESOLUTION PASAPAS (nonlinear thermal)
TAB1 = TABLE;
TAB1.TEMPERATURES        = TABLE;
TAB1.TEMPERATURES.0      = T0_CHPO;
TAB1.MODELE              = MOD_TOT;
TAB1.CARACTERISTIQUES    = MAT_TOT;
TAB1.CHARGEMENT          = FLT2 ET CHAR_CV;
TAB1.PROCEDURE_THERMIQUE = NONLINEAIRE;
TAB1.RELAXATION_THETA    = 0.57;
TAB1.TEMPS_CALCULES      = LTEMPS1;

PASAPAS TAB1;

*VISUALIZATION
NBT  = DIME TAB1.TEMPERATURES;
TRES = TAB1.TEMPERATURES.(NBT - 1);
TRAC TRES MAIL1;
