*==============================================================================
*AUTHOR:  Tan Kiet HONG
*DATE:    2026-03-18
*DESCRIPTION: This is a sample nonlinear stationary thermic problem K(T)T=F.

*GEOMETRY: A rectangular cantilever beam of length 3 m and height 0.5 m.
*BOUNDARY CONDITIONS:
* - Imposed heat flux of 100 W/m² on the right edge (LDROITE).
* - Convection with a coefficient of 100 W/m²K on the top edge (LHAUT) and ambient temperature of 25 °C.
* - The left edge (LGAUCHE) is thermally insulated (no heat flux and has no imposed temperature) and fixed in space (no mechanical displacement).

*INPUTS:
* - KTHERMAL CONDUCTIVITY: K(T)=K0*10**(A_T*(T-T0))
*   WITH K0=, A_T=0.005, T0=20.
* - CONVECTION COEFFICIENT: HCONVEC = 100.
* - AMBIENT TEMPERATURE: TLIBRE = 25.
* - IMPOSED HEAT FLUX: FLUXIMPOSE = 100.

*OUTPUTS:
* - TEMPERATURE FIELD T
*==============================================================================

*OPTIONS
OPTI ECHO 0;
OPTI 'DIME' 2 'ELEM' QUA4;

* 1) GEOMETRY AND MESH DEFINITION

*GEOMETRY DEFINITION
LONG    = 3.;
HAUT    = 0.5;

*NUMBER OF MESH SEGMENT
NLONG   = 35;
NHAUT   = 5;

*POINTS CREATION
PA      = 0. 0.;
PB      = LONG 0.;
PC      = LONG HAUT;
PD      = 0. HAUT;
*TRAC (PA ET PB ET PC ET PD);

*MESH LINES CREATION
LAB     = DROI NLONG PA PB;
LBC     = DROI NHAUT PB PC;
LCD     = DROI NLONG PC PD;
LDA     = DROI NHAUT PD PA;

*MESH SURFACE CREATION
MAIL1   = DALL LAB LBC LCD LDA;
*TRAC MAIL1;

* 2) PHYSICAL PROBLEM DEFINITION

*LINE DEFINITION FOR APPLYING BOUNDARY CONDITIONS
LHAUT    = LCD;
LBAS     = LAB;
LDROITE  = LBC;
LGAUCHE  = LDA;

*MATERIAL PROPERTY DEFINITION
K0       = 0.344;
A_T      = 0.005;
T0       = 20.;

HCONVEC  = 100.;
TLIBRE   = 25.;
FLUXIMPOSE = 100.;

RHO_CP = 1;
*Rho*Cp (fictitious, for transient, small value => converges quickly)

*CONDUCTIVITY K(T)  = K0*10**(A_T*(T-T0)) AS EVOL TABLE (T=0 to 300 with step of 1)
tXT = PROG;
tYK = PROG;
tT  = 0.;

REPETER BOUCLE 301;
  tKT = K0 * (10. ** (A_T * (tT - T0)));
  tXT = tXT ET (PROG tT);
  tYK = tYK ET (PROG tKT);
  tT  = tT + 1.;
FIN BOUCLE;

K_EVOL = EVOL MANU 'T' tXT 'K' tYK;
DESS K_EVOL;

* CAPACITY C(T) - constant (fictitious for pseudo-transient)
C_EVOL = EVOL MANU 'T' (PROG 0. 300.) 'C' (PROG RHO_CP RHO_CP);
DESS C_EVOL;

*MODEL DEFINITION
MOD1     = MODE MAIL1 THERMIQUE ISOTROPE;
MOD2     = MODE LHAUT THERMIQUE CONVECTION;
MOD_TOT  = MOD1 ET MOD2;

*MATERIAL DEFINITION
MAT1     = MATE MOD1 'K' K_EVOL;
MAT2     = MATE MOD2 'H' HCONVEC;
MAT_TOT = MAT1 ET MAT2;

*TIME DISCRETIZATION (pseudo-transient to reach steady-state)
*TIME FINAL 1000 with time step of 100
TFIN    = 1000.;
LTEMPS1 = PROG 0. PAS 100. TFIN;

* INITIAL CONDITION (for every mesh node at initital temperature and Imposed lbas at Timpose)
T_INI   = T0;
T0_CHPO = MANU 'CHPO' MAIL1 'T' T_INI;

* 3) RESOLUTION (PASAPAS NONLINEAR SOLVER)

*THERMAL BOUNDARY CONDITIONS DEFINITION
*SOLVING K(T)T=F

*IMPOSED HEAT FLUX on LDROITE
EV_FLUX = EVOL MANU 'TEMPS' (PROG 0. TFIN) 'T' (PROG 1. 1.);
FLT2_0  = FLUX MOD1 LDROITE FLUXIMPOSE;
FLT2    = CHAR 'Q' FLT2_0 EV_FLUX;
*CONVECTION LOAD VECTOR on LHAUT
CONV1   = MANU 'CHPO' LHAUT 1 'T' TLIBRE 'NATURE' 'DISCRETE';
EV_CONV = EVOL MANU 'TEMPS' (PROG 0. TFIN) 'T' (PROG 1. 1.);
CHAR_CV = CHAR 'TECO' CONV1 EV_CONV;

*RESOLUTION PASAPAS (nonlinear thermal)
TAB1 = TABLE;
TAB1.TEMPERATURES        = TABLE;
TAB1.TEMPERATURES.0      = T0_CHPO;
TAB1.MODELE              = MOD_TOT;
TAB1.CARACTERISTIQUES    = MAT_TOT;
TAB1.CHARGEMENT          = FLT2 ET CHAR_CV;
TAB1.PROCEDURE_THERMIQUE = NONLINEAIRE;
TAB1.RELAXATION_THETA    = 0.57;
TAB1.TEMPS_CALCULES      = LTEMPS1;

PASAPAS TAB1;

*VISUALIZATION
NBT  = DIME TAB1.TEMPERATURES;
TRES = TAB1.TEMPERATURES.(NBT - 1);
TRAC TRES MAIL1;
