*---------------------------------------------------------------------
* CALIBRATION OF THE PERMEABILITY PARAMETERS (KINT, AK) FOR HPC M100
* ADIABATIC HYDRATION / AGING / ACCIDENT - COOLING OF KALIFA (2000) EXPERIMENT
*---------------------------------------------------------------------
* By: Tan Kiet HONG

* Reference code: * G.Sciume (31 - 10 - 2024)
* "CONCRETE CASTING AND LIFETIME CONDITIONS IMPACT ON HIGH TEMPERATURE RESISTANCE" by G. Sciume (1), S. Dal Pont (2), D. Dauti (2)
* (1) I2M, Universite de Bordeaux, Bordeaux, France
* (2) 3SR, Universite Grenoble Alpes, Grenoble, France

OPTI ECHO 0;
*---------------------------------------------------------------------
* CONSTANT PHYSICAL PARAMEMTERS
*---------------------------------------------------------------------
RGP1     = 8.3145 ;
MMGA1    = 28.9645E-3 ;
MMGW1    = 18.0153E-3 ;
RHOS1    = 2625.8 ;
RHOW0    = 1000. ;
CPW1     = 4181.0 ;
CPGW1    = 1805.0 ;
CPGA1    = 1005.7 ;

*---------------------------------------------------------------------
* MESH - KALIFA 120x120mm
*---------------------------------------------------------------------
'OPTI' 'DIME' 2 'MODE' PLAN CONT 'ELEM' QUA4;

* OPTION 1: REGTANGULAR MESH 24X24 ELEMENTS (Original mesh used in Dauti's thesis is 28x28)
p1  = 0.0   0.0;
p2  = 0.12  0.0;
p3  = 0.12  0.12;
p4  = 0.0   0.12;

DAB1 = DROI 24 p1 p2;
DDA1 = DROI 24 p2 p3;
DCD1 = DROI 24 p3 p4;
DBC1 = DROI 24 p4 p1;

CONT1  = DAB1 ET DDA1 ET DCD1 ET DBC1;
MAIL1  = (SURF CONT1) 'COUL' 'BLAN';

* OPTION 2: REFINED 1D MESH (Not used in this example)
L1       = 0.12 ;
H1       = 0.12 ;
DY_COLD  = 0.005;
DY_HOT   = 0.001;

P1  = 0.   0.;
P2  = 0.   H1;
L12 = DROI P1 P2 'DINI' DY_COLD 'DFIN' DY_HOT;

*MAIL1 = (TRAN 1 L12 (L1 0.)) 'COUL' 'BLAN';
*DCD1 = COTE 2 MAIL1;
*DAB1 = COTE 4 MAIL1;

* VISUALIZATION OF THE MESH
*TRAC (MAIL1 ET (DCD1 'COUL' 'ROUG') ET (DAB1 'COUL' 'BLEU')) TITRE 'Mesh - Kalifa HPC M100' ;

* ALIAS FOR BOUNDARIES: DCD1 = hot face (top, y=0.12) and DAB1 = cold face (bottom, y=0)
* [HYRIC] Vapor convection
CONTH1 = DCD1;
CONTH2 = DAB1;
CONTH = CONTH1 ET CONTH2;

* [THERMAL] Thermal convection and radiation
CONTT1 = DCD1;
CONTT2 = DAB1;

* Points of measurement for temperature (PO_00 to PO_120) along the vertical centerline of the sample
* x = 0.06 (mid sample), y = 0.120 - distance from hot face
PO_00  = MAIL1 POIN 'PROC' (0.06 0.120);
PO_10  = MAIL1 POIN 'PROC' (0.06 0.110);
PO_20  = MAIL1 POIN 'PROC' (0.06 0.100);
PO_30  = MAIL1 POIN 'PROC' (0.06 0.090);
PO_40  = MAIL1 POIN 'PROC' (0.06 0.080);
PO_50  = MAIL1 POIN 'PROC' (0.06 0.070);
PO_120 = MAIL1 POIN 'PROC' (0.06 0.000);

*---------------------------------------------------------------------
* MATERIAL PROPERTIES (HPC M100)
*---------------------------------------------------------------------

* MIX DATA
cem  = 377.   ;
aggr = 1920.  ;
wc   = 0.34   ;
sc   = 0.1  ;

* HYDRATION PROCESS DATA (affinity. activation energy. hydration heat)
AI   = 6    ;
AP   = 1250.  ;
GAMP = 0.24   ;
ALFA = 48.    ;
EAR1 = 5369.  ;
lat1 = 114.3e6 ;

* INTRINSIC PERMEABILITY
KINT = 1.000000E-18;
AK   = 1.0;

* THERMAL PARAMETERS
CS   = 960.   ;
KS   = 1.38   ;

* DESORPTION ISOTHERME MODEL PARAMETERS
*a1   =  46.9364E6 ;
*b1   =  1.9433    ;
*c1   =  1.5     ;

a1   =  18.6E6 ;
b1   =  2.27    ;
c1   =  1.5     ;


*---------------------------------------------------------------------
* MODEL DEFINITION
*---------------------------------------------------------------------
MODTHC  = 'MODE' MAIL1 'THERMOHYDRIQUE' 'BETON_THM' 'CONS' 'BO';
MODCOT1 = 'MODE' CONTT1 'THERMIQUE' 'CONVECTION';
MODCOT2 = 'MODE' CONTT2 'THERMIQUE' 'CONVECTION';
MODRAY  = 'MODE' CONTT1 'THERMIQUE' 'RAYONNEMENT' 'INFINI';
MOD_TOT = MODTHC ET MODCOT1 ET MODCOT2 ET MODRAY ;
*---------------------------------------------------------------------

*---------------------------------------------------------------------
* MATERIAL MODEL DEFINITION
*---------------------------------------------------------------------
WINF GAM0 POR1 APOR = @POWERS cem aggr wc sc;
MATTHC = 'MATE' MODTHC 'CS'  CS    'KS'   KS   'GAM0' GAM0 'WINF' WINF
'VGA' a1   'VGB'  b1   'VGC' c1    'K1' KINT  'AK'   AK  'BK'   1.
'KLI1' 20000.  'AKLI'   1.  'BKLI' 1. 'POR1' POR1 'APOR' APOR
'AFF1' Ai  'AFF2' Ap   'AFF3' GAMP 'AFF4' ALFA 'EAR'  EAR1 'QLAT' lat1;
MATCOT1  = 'MATE'  MODCOT1   'H'     10.;
MATCOT2  = 'MATE'  MODCOT2   'H'     10.;
MATRAY  = 'MATE'  MODRAY   'EMIS'   0.;
MAT_TOT = MATTHC et MATCOT1 ET MATCOT2 ET MATRAY;
*---------------------------------------------------------------------

*---------------------------------------------------------------------
* Vapor convection (processed by Charther) and therefore not to be added to the overall model
*---------------------------------------------------------------------
MODCOH  = 'MODE' CONTH 'THERMIQUE' 'CONVECTION' ;
MATCOH  = 'MATE' MODCOH   'H'                0. ;
*---------------------------------------------------------------------

*---------------------------------------------------------------------*
* TEST DESCRIPTION AND TEMPORAL DISCRETIZATION
*---------------------------------------------------------------------*
* Modeled phases
* I)   Early age :        0           ---> 3 days              /  adiabatic conditions
* II)  Aging     :        3           ---> age time            /  H & T convection
* III) Accident  : age time           ---> age time + 240 mins /  H convection & T convection + radiation (hot face)
* IV)  Cooling   : age time + 240 min ---> age time + 600 mins /  H & T convection
*---------------------------------------------------------------------*
minute1  = 60.         ;
hours1   = 3600.       ;
day1     = 86400.      ;
year1    = 360 * day1  ;

* Duration of diferent phases
early_time =   3 * day1   ;
age_time   =   1 * year1  ;

* Accident phase duration
* x = 10 mins (original paper is 0 mins but we need some time for the ramp to reach 400oC)
* Ramp:    0    -->x min     (20oC --> 400oC)
* Linear1: x    -->x+130 min (400oC --> 460oC)
* Linear2: x+130-->x+240 min (460oC --> 466oC)
ramp_time   = 1 * minute1;
lin1_time   = 130 * minute1 - ramp_time;
lin2_time   = 110 * minute1;
acc_time    = ramp_time + lin1_time + lin2_time;

ramp2_time  = 1 * minute1;
cool_time   = 360 * minute1;

* Time markers for the different phases
temps1       =  early_time ;

temps2a      =  early_time + (3 * day1) ;
temps2       =  age_time   ;

temps_ramp   = age_time  + ramp_time ;
temps_lin1   = age_time  + ramp_time + lin1_time ;
temps3       = age_time  + acc_time ;

temps_ramp2  = temps3 + ramp2_time ;
temps4       = temps3 + cool_time ;


* Time steps for the different phases
DT01     =  600.;

DT12a    =  600.;
DT2a2    =  3 * day1;

DT_RAMP  =   5.;
DT_LIN1  =   15. ;
DT_LIN2  =   15. ;

DT_RAMP2 =   1.;
DT34     =   15.;

* Calculation of the time steps for the different phases
LTP_HYDR = PROG  0.              PAS DT01 temps1        ;
LTP_AGIN = PROG (temps1 + DT12a) PAS DT12a temps2a PAS DT2a2 temps2 ;
LTP_ACCI = PROG (temps2 + DT_RAMP) PAS DT_RAMP temps_ramp PAS DT_LIN1 temps_lin1 PAS DT_LIN2 temps3;
LTP_COOL = PROG (temps3 + DT_RAMP2) PAS DT_RAMP2 temps_ramp2 PAS DT34 temps4;
LTP_TOT  = LTP_HYDR ET LTP_AGIN ET LTP_ACCI ET LTP_COOL;

* Saved times
LSA_HYDR = PROG  0.              PAS hours1 temps1;
LSA_AGIN = PROG (temps1 + DT2a2) PAS DT2a2  temps2;
LSA_ACCI = PROG (temps2 + 60.)  PAS 60.   temps3;
LSA_COOL = PROG (temps3 + 60.)  PAS 60.   temps4;
LSA_TOT  = LSA_HYDR ET LSA_AGIN ET LSA_ACCI ET LSA_COOL;
*---------------------------------------------------------------------


*---------------------------------------------------------------------
* INITIAL CONDITION (COST adibatic calorimetry test)
* - initial degree of hydration HY_0 = 0
* - initial temperature TC_0 = 22oC
* - initial gas pressure PG_0 = p_atm
* - initial relative humidity HR_0 = 0.99995
HY_0   = 0.            ;
TC_0   = 20.           ;
TK_0   = 273.15 + TC_0 ;
PG_0   = 101325.       ;
HR_0   = 0.5       ;

ZERO1  = MANU 'CHPO' MAIL1 'SCAL' 0.       ;
CHTK_0 = MANU 'CHPO' MAIL1 'T' TK_0        ;
PVS_0 XX YY ZZ KK JJ= @PVSAT ZERO1 ZERO1 CHTK_0    ;

* Clapeyron
PC_0   = PG_0 - PVS_0 + ((-1.)*(RGP1*TK_0*RHOW0*(LOG(HR_0))/MMGW1));
PC_0   = PC_0 'NOMC' 'PC';

* Calculation of the corresponding degree of saturation
CHPC_0 = MANU CHPO MAIL1 1 'SCAL' (MAXI PC_0);
CHTK_0 = MANU CHPO MAIL1 1 'SCAL' TK_0;
HYDR   = MANU CHPO MAIL1 1 'SCAL' HY_0;
cha1   = MANU CHPO MAIL1 1 'SCAL' a1;
chb1   = MANU CHPO MAIL1 1 'SCAL' b1;
chc1   = MANU CHPO MAIL1 1 'SCAL' c1;
chgam0 = MANU CHPO MAIL1 1 'SCAL' gam0;

SW0    = @SATURA CHPC_0 CHTK_0 HYDR cha1 chb1 chc1 chgam0;

CI_TH  = ('MANU' 'CHPO' MAIL1 2 'PG' PG_0 'T' TK_0)  +  PC_0;
*TRAC CI_TH MAIL1;
*---------------------------------------------------------------------*

*---------------------------------------------------------------------*
* BOUNDARY CONDITIONS
* - PC_ext = p_atm
*
* - TC_ext = 20oC until "age time" then accident phase thermal loading (see below)
*
*             / 0.95            0      < time < 3 days
* - HR_ext = {  0.95 --> 0.50   3 days < time < 6 days
*             \ 0.50            6 days < time < age time
* - Accident:  PGWe_i  = 1300.;
*---------------------------------------------------------------------*
TK_E  = TK_0;
PG_E  = PG_0;
HR_E1 = 0.95;
HR_E2 = 0.50;

* PG: imposed gas pressure at the top and bottom faces (PG_ext = p_atm)
EV_PG = 'EVOL' 'MANU' 'TEMPS'  ('PROG' 0.  temps4) ('PROG' 1. 1.);
CLPG1 = 'BLOQ' 'PG'         CONTT1;
CLPG2 = 'BLOQ' 'PG'         CONTT2;
CLPGT = CLPG1 ET CLPG2;
CHPG1 = 'DEPI'  CLPG1        PG_E;
CHPG2 = 'DEPI'  CLPG2        PG_E;
CGPG1 = 'CHAR' 'TIMP' CHPG1 EV_PG;
CGPG2 = 'CHAR' 'TIMP' CHPG2 EV_PG;


* T: Thermal convection and radiation
* --- Temperature loading curve ---

T_RAMP      = 400. ;
DELTAT_RAMP = T_RAMP - TC_0;
DELTAT_LIN1 = 60.;
DELTAT_LIN2 = 6.;

N1     = 1   ;
PRO_TK = PROG;
REPETER BOU_TE (DIME LTP_TOT);
    TIMEi  = EXTR N1 LTP_TOT;
* Before accident phase, temperature is constant at 20oC
SI (TIMEi '<EG' temps2);
TKi    = TK_E;
FINS;
* Linear 400-->460oC from x min to x+130 min
SI ((TIMEi '>' temps2) ET (TIMEi '<EG' temps_lin1));
TKi = T_RAMP + 273.15 + (DELTAT_LIN1 * ((TIMEi - temps2) / (temps_lin1 - temps2)));
FINS;
* Linear 460-->466oC from x+130 min to x+240 min
SI ((TIMEi '>' temps_lin1) ET (TIMEi '<EG' temps3));
TKi = T_RAMP + DELTAT_LIN1 + 273.15 + (DELTAT_LIN2 * ((TIMEi - temps_lin1) / (temps3 - temps_lin1)));
FINS;
* Thermal radiator turned off after x+240 min
SI (TIMEi '>' temps3);
TKi    = TK_E;
FINS;
    PRO_TK = PRO_TK ET (PROG TKi);
    N1 = N1 + 1;
FIN BOU_TE;

EVTK1 = 'EVOL' 'MANU'  LTP_TOT  PRO_TK;

* PLOT THERMAL RAMP IN CELSIUS (Accident and cooling phases)
L_TIME = EXTR EVTK1 'ABSC' ;
L_TEMP = EXTR EVTK1 'ORDO' ;
L_TIME_MIN = (L_TIME - (PROG (DIME L_TIME) * temps2)) / 60. ;
L_TEMP_C   = L_TEMP - (PROG (DIME L_TEMP) * 273.15) ;
EV_PLOT = EVOL 'ROUG' 'MANU' 'Time (min)' L_TIME_MIN 'Temp (C)' L_TEMP_C ;

*DESS EV_PLOT 'XBOR' 0. 600. 'XGRA' 50.
             'YBOR' 0. 500. 'YGRA' 50.
             'GRIL' 'POIN' 'GRIS'
             TITRE 'Thermal Loading Curve - Kalifa HPC M100' ;

* --- Hot face: convection + radiation (T_inf = T_rad) ---
CHTK1 = 'MANU' 'CHPO'  CONTT1 1 'T'  1. 'NATURE' 'DISCRETE';
CGTK1 = ('CHAR' 'TECO'  CHTK1    EVTK1) ET
        ('CHAR' 'TERA'  CHTK1    EVTK1);

* --- Cold face: convection only (T_inf = T_room = const) ---
EVTC1 = 'EVOL' 'MANU' ('PROG' 0. temps4) ('PROG' TK_0 TK_0);
CHTK2 = 'MANU' 'CHPO' CONTT2 1 'T' 1. 'NATURE' 'DISCRETE';
CGTK2 = 'CHAR' 'TECO' CHTK2 EVTC1;


* PC: hygral convection ( qw = hcv * (RGW_s - RGW_ext)n ) - Both faces
N1      = 1   ;
PRO_RGW = PROG;
REPETER BOU_RGW (DIME LTP_TOT);
    EXTR N1 LTP_TOT;
    TIMEi        = EXTR N1 LTP_TOT;
    TKi          = EXTR N1 PRO_TK ;
    PVSe_i XX YY ZZ KK JJ
           = @PVSAT ZERO1 ZERO1 (MANU 'CHPO' MAIL1 'T' TKi);
    PVSe_i       = MAXI PVSe_i;
    FGPGW0 = (MMGW1 / RGP1 )* (1./TKi) ;
       SI (TIMEi '<' temps1);
       PGWe_i  = HR_E1 * PVSe_i;
       FINS;
       SI (TIMEi '>EG' temps1);
       HR_i = HR_E1-(((TIMEi-temps1)/(temps2a-temps1))*(HR_E1-HR_E2));
       PGWe_i  = HR_i * PVSe_i;
       FINS;
       SI (TIMEi '>' temps2a);
       PGWe_i  = HR_E2 * PVSe_i;
       FINS;
       SI (TIMEi '>' temps2);
       PGWe_i  = 1300.;
       FINS;
    RGWi    = FGPGW0 * PGWe_i ;
    PRO_RGW = PRO_RGW ET (PROG RGWi);
    N1 = N1 + 1;
FIN BOU_RGW;
EVPC1   = 'EVOL' 'MANU' LTP_TOT  PRO_RGW;
*DESS EVPC1;
CHPC1   = 'MANU' 'CHPO' CONTH  1  'SCAL'  1. 'NATURE' 'DISCRETE';
CGPC1   = 'CHAR' 'TECO' CHPC1  EVPC1 ;

* MECHANICAL BOUNDARY CONDITIONS - FIXED LATERAL FACES
L_LAT = DDA1 ET DBC1 ;
BC_LAT = BLOQ 'UX' L_LAT ;
BC_BOT = BLOQ 'UY' DAB1 ;
BC_POINT = BLOQ 'UX' p1 ;
CL_MEC = BC_LAT ET BC_BOT ET BC_POINT ;
*---------------------------------------------------------------------

*---------------------------------------------------------------------*
*VI. Resolution PASAPAS : Early age (sealed)
*---------------------------------------------------------------------
TAB0                         = 'TABL' ;
TAB0 . 'MODELE'              = MOD_TOT ;
TAB0 . 'CARACTERISTIQUES'    = MAT_TOT ;
TAB0 . 'BLOCAGES_MECANIQUES' = CL_MEC ;
TAB0 . 'BLOCAGES_THERMIQUES' = CLPGT ;
TAB0 . 'CHARGEMENT'          = CGPG1 ET CGPG2 ET CGTK1 ET CGTK2;
TAB0 . 'TEMPS_CALCULES'      = LTP_HYDR ;
TAB0 . 'TEMPS_SAUVES'        = LSA_HYDR ;
TAB0 . 'PROCEDURE_THERMIQUE' = 'NONLINEAIRE' ;
TAB0 . 'RELAXATION_THETA'    = 1. ;
TAB0 . 'MOVA'                = 'D' ;

*--Vapor convection (managed by the CHARTHM procedure)
TAB0 . 'MO_CONVECTION_VAPEUR'     = TABLE;
TAB0 . 'MO_CONVECTION_VAPEUR' . 1 = MODCOH ;
TAB0 . 'MA_CONVECTION_VAPEUR'     = TABLE  ;
TAB0 . 'MA_CONVECTION_VAPEUR' . 1 = MATCOH ;
TAB0 . 'CH_CONVECTION_VAPEUR'     = TABLE  ;
TAB0 . 'CH_CONVECTION_VAPEUR' . 1 = CGPC1  ;
*---------------------------------------------------------------------
TAB0 . 'THM_PARAMETRES'      = MATTHC ;
TAB0 . 'TEMPERATURES'        = 'TABL' ;
TAB0 . 'TEMPERATURES' . 0    = CI_TH ;
TAB0 . 'HYDRATATION'         = 'TABL' ;
TAB0 . 'HYDRATATION' .  0    = MANU CHML MODTHC 'SCAL' HY_0;
TAB0 . 'DCH'                 = 'TABL' ;
TAB0 . 'DCH' .  0            = MANU CHML MODTHC 'SCAL' HY_0;
*---------------------------------------------------------------------
PASAPAS TAB0;

*---------------------------------------------------------------------
opti SAUV 'KALIFA_PHASE1';
SAUV;

*opti SAUV 'FORMAT' 'D:\castem\KALIFA_PHASE1';
*SAUV 'FORMAT';
*---------------------------------------------------------------------

*---------------------------------------------------------------------
opti REST 'KALIFA_PHASE1';
REST;

*opti REST 'FORMAT' 'D:\castem\KALIFA_PHASE1';
*REST 'FORMAT';
*---------------------------------------------------------------------

* --- Check the total number of saved steps
NTOT = DIME TAB0.'TEMPERATURES';
N_LAST = NTOT - 1 ;
MESS '--- Total saved steps = ' NTOT;
MESS '--- Final saved steps = ' N_LAST;

* --- Visualization of the T, PG, PC field at the last saved time step (end of early aging)
CHMT = EXCO 'T' TAB0 . 'TEMPERATURES' . N_LAST;
CHPG = EXCO 'PG' TAB0 . 'TEMPERATURES' . N_LAST;
CHPC = EXCO 'PC' TAB0 . 'TEMPERATURES' . N_LAST;
*TRAC CHMT MODTHC MAIL1 TITRE 'Temperature after early age phase';
*TRAC CHPG MODTHC MAIL1 TITRE 'Gas pressure after early age phase';
*TRAC CHPC MODTHC MAIL1 TITRE 'Capillary pressure after early age phase';

*---------------------------------------------------------------------
* DRYING AND AGING
*---------------------------------------------------------------------
MATCOH  = 'MATE' MODCOH   'H'  0.002;

*  Recalculation resumed
TAB0 . 'MA_CONVECTION_VAPEUR' . 1 = MATCOH ;
TAB0 . 'TEMPS_CALCULES'           = LTP_AGIN ;
TAB0 . 'TEMPS_SAUVES'             = LSA_AGIN ;
PASAPAS TAB0;

*---------------------------------------------------------------------
opti SAUV 'KALIFA_PHASE2';
SAUV;

*opti SAUV 'FORMAT' 'D:\castem\KALIFA_PHASE2';
*SAUV 'FORMAT';
*---------------------------------------------------------------------

*---------------------------------------------------------------------
opti REST 'KALIFA_PHASE2';
REST;

*opti REST 'FORMAT' 'D:\castem\KALIFA_PHASE2';
*REST 'FORMAT';
*---------------------------------------------------------------------

*===================================================================*
* VISUALIZATION OF THE FIELDS AT THE END OF AGING PHASE (last saved time step)
*===================================================================*

* --- Check the total number of saved steps
NTOT = DIME TAB0.'TEMPERATURES';
N_LAST = NTOT - 1 ;
MESS '--- Total saved steps = ' NTOT;
MESS '--- Final saved steps = ' N_LAST;

*===================================================================*
* T, PG, PC field at the last saved time step (end of aging)

CHMT = EXCO 'T' TAB0 . 'TEMPERATURES' . N_LAST;
CHPG = EXCO 'PG' TAB0 . 'TEMPERATURES' . N_LAST;
CHPC = EXCO 'PC' TAB0 . 'TEMPERATURES' . N_LAST;

*TRAC CHMT MODTHC MAIL1 TITRE 'Temperature after aging phase - before accident';
*TRAC CHPG MODTHC MAIL1 TITRE 'Gas pressure after aging phase - before accident';
*TRAC CHPC MODTHC MAIL1 TITRE 'Capillary pressure after aging phase - before accident';

*===================================================================*
* HYDRATATION FIELD AT THE FINAL TIME STEP - last saved time step (end of aging)

CHAM_HYDR_LAST = TAB0 . 'HYDRATATION' . N_LAST ;

MESS '=== HYDRATION DEGREE AT THE FINAL TIME STEP ===' ;
MESS 'Min HYDR = ' (MINI CHAM_HYDR_LAST) ;
MESS 'Max HYDR = ' (MAXI CHAM_HYDR_LAST) ;

CHPO_HYDR_LAST = CHAN 'CHPO' CHAM_HYDR_LAST MODTHC ;
*TRAC CHPO_HYDR_LAST MODTHC MAIL1 TITRE 'Hydration Degree Field at Final Step' ;

*===================================================================*
* SATURATION DEGREE AND HR AT THE FINAL TIME STEP - last saved time step (end of aging)

* Calculation of relative humidity (Clapeyron Law) and SW
TAB0 . 'HR' = TABLE;
TAB0 . 'SW' = TABLE;
*
N1 = 0;
REPETER BOU_HR NTOT;
   CHTKi = EXCO 'T'  TAB0 . 'TEMPERATURES' . N1;
   CHPCi = EXCO 'PC' TAB0 . 'TEMPERATURES' . N1;
   CHPGi = EXCO 'PG' TAB0 . 'TEMPERATURES' . N1;
   HYDRi = CHAN CHPO TAB0 . 'HYDRATATION' . N1  MODTHC;
   CHPVSATi CHPGWSCi RHOGWi XX YY ZZ = @PVSAT CHPGi CHPCi CHTKi;
   SWi = @SATURA CHPCi CHTKi HYDRi cha1 chb1 chc1 chgam0;
   HRi   =   CHPGWSCi * (CHPVSATi**-1);
   TAB0 . 'HR' . N1 = HRi;
   TAB0 . 'SW' . N1 = SWi;
   N1 = N1 + 1;
FIN BOU_HR;

CH_SW_LAST= TAB0 . 'SW' . N_LAST ;
CH_HR_LAST= TAB0 . 'HR' . N_LAST ;
*TRAC CH_SW_LAST MAIL1 'TITR' 'Saturation Degree (SW) at Final Time Step' ;
*TRAC CH_HR_LAST MAIL1 'TITR' 'Relative Humidity (HR) at Final Time Step' ;


*---------------------------------------------------------------------
* ACCIDENT
*---------------------------------------------------------------------
OPTI ECHO 0;
DEBP PARATHER ;
  'ARGUMENT' TABTHER*'TABLE' INST*'FLOTTANT' ;
* (ENG) TABTHER is the input table of the PASAPAS procedur
*       INST is the current calculation time
* (ENG) The loading must be updated in the TABTHER.'WTABLE' table !
* (ENG) The 'THER_COURANT' indice is containing the current iteration
*       temperature field. The loading is updated to have TS = T.

*'MESS' 'ENTRA PARATHER';

WTABLE = TABTHER .'WTABLE' ;

SI ( (INST '>' temps2) ET (INST '<EG' temps3) );
   MATCOT1 = 'MATE' MODCOT1   'H'    11. ;
   MATCOT2 = 'MATE' MODCOT2   'H'    8.3 ;
   MATRAY  = 'MATE' MODRAY   'EMIS'  0.6  ;
   WTABLE.'MAT_TOT' = MATTHC et MATCOT1 et MATRAY et MATCOT2;
FINS;

FINP;
*---------------------------------------------------------------------

MATCOH  = 'MATE' MODCOH   'H'     0.001 ;

* Reprise du calcul
TAB0 . 'PROCEDURE_PARATHER'       = VRAI ;
TAB0 . 'CONVECTION_VAPEUR'        = 2 ;
TAB0 . 'MA_CONVECTION_VAPEUR' . 1 = MATCOH ;
TAB0 . 'TEMPS_CALCULES'           = LTP_ACCI ;
TAB0 . 'TEMPS_SAUVES'             = LSA_ACCI ;
PASAPAS TAB0;

*---------------------------------------------------------------------
opti SAUV 'KALIFA_PHASE3';
SAUV;

*opti SAUV 'FORMAT' 'D:\castem\KALIFA_PHASE3';
*SAUV 'FORMAT';
*---------------------------------------------------------------------

*---------------------------------------------------------------------
opti REST 'KALIFA_PHASE3';
REST;

*opti REST 'FORMAT' 'D:\castem\KALIFA_PHASE3';
*REST 'FORMAT';
*---------------------------------------------------------------------


*===================================================================*
* VISUALIZATION OF THE FIELDS AT THE END OF AGING PHASE (last saved time step)
*===================================================================*

* --- Check the total number of saved steps
NTOT = DIME TAB0.'TEMPERATURES';
N_LAST = NTOT - 1 ;
MESS '--- Total saved steps = ' NTOT;
MESS '--- Final saved steps = ' N_LAST;

*===================================================================*
* T, PG, PC field at the last saved time step (end of aging)

CHMT = EXCO 'T' TAB0 . 'TEMPERATURES' . N_LAST;
CHPG = EXCO 'PG' TAB0 . 'TEMPERATURES' . N_LAST;
CHPC = EXCO 'PC' TAB0 . 'TEMPERATURES' . N_LAST;

*TRAC CHMT MODTHC MAIL1 TITRE 'Temperature after aging phase - after accident';
*TRAC CHPG MODTHC MAIL1 TITRE 'Gas pressure after aging phase - after accident';
*TRAC CHPC MODTHC MAIL1 TITRE 'Capillary pressure after aging phase - after accident';

*===================================================================*
* HYDRATATION FIELD AT THE FINAL TIME STEP - last saved time step (end of accident)

CHAM_HYDR_LAST = TAB0 . 'HYDRATATION' . N_LAST ;

MESS '=== HYDRATION DEGREE AT THE FINAL TIME STEP ===' ;
MESS 'Min HYDR = ' (MINI CHAM_HYDR_LAST) ;
MESS 'Max HYDR = ' (MAXI CHAM_HYDR_LAST) ;

CHPO_HYDR_LAST = CHAN 'CHPO' CHAM_HYDR_LAST MODTHC ;
*TRAC CHPO_HYDR_LAST MODTHC MAIL1 TITRE 'Hydration Degree Field at Final Step' ;

*===================================================================*
* SATURATION DEGREE AND HR AT THE FINAL TIME STEP - last saved time step (end of accident)

* Calculation of relative humidity (Clapeyron Law) and SW
TAB0 . 'HR' = TABLE;
TAB0 . 'SW' = TABLE;
TAB0 . 'DCH_CHPO' = TABLE;
TAB0 . 'HYDR_CHPO' = TABLE;
*
N1 = 0;
REPETER BOU_HR NTOT;
   CHTKi = EXCO 'T'  TAB0 . 'TEMPERATURES' . N1;
   CHPCi = EXCO 'PC' TAB0 . 'TEMPERATURES' . N1;
   CHPGi = EXCO 'PG' TAB0 . 'TEMPERATURES' . N1;
   HYDRi = CHAN CHPO TAB0 . 'HYDRATATION' . N1  MODTHC;
   DCHi = CHAN CHPO TAB0 . 'DCH' . N1  MODTHC;
   CHPVSATi CHPGWSCi RHOGWi XX YY ZZ = @PVSAT CHPGi CHPCi CHTKi;
   SWi = @SATURA CHPCi CHTKi HYDRi cha1 chb1 chc1 chgam0;
   HRi   =   CHPGWSCi * (CHPVSATi**-1);
   TAB0 . 'HR' . N1 = HRi;
   TAB0 . 'SW' . N1 = SWi;
   TAB0 . 'DCH_CHPO' . N1 = DCHi;
   TAB0 . 'HYDR_CHPO' . N1 = HYDRi;
   N1 = N1 + 1;
FIN BOU_HR;

CH_SW_LAST= TAB0 . 'SW' . N_LAST ;
CH_HR_LAST= TAB0 . 'HR' . N_LAST ;


*---------------------------------------------------------------------
* EXPORTATION OF THE RESULTS
*---------------------------------------------------------------------

*===================================================================
*********** EXPORT TEMPERATURE EVERY 1 MINUTE **************
*===================================================================
* 1. Initialize the Cast3M base timeline (starting from temps2)
EVT_INIT = EVOL 'BLAN' 'TEMP' TAB0 'TEMPERATURES' 'T' PO_00 ;
LT_SEC   = EXTR EVT_INIT 'ABSC' ;
LT_MIN   = (LT_SEC - (PROG (DIME LT_SEC) * temps2)) / 60. ;

* 2. Initialize the target time axis: From 0 to 240 minutes, step size 1 minute
L_MIN_1  = PROG 0. PAS 1. 240. ;

* 3. Extract, convert to Celsius, and interpolate (IPOL) in a single line
* IPOL syntax: IPOL [new X-axis] [original graph]
LT_00_1 = IPOL L_MIN_1 (EVOL 'MANU' LT_MIN ((EXTR (EVOL 'TEMP' TAB0 'TEMPERATURES' 'T' PO_00) 'ORDO') - 273.15)) ;
LT_10_1 = IPOL L_MIN_1 (EVOL 'MANU' LT_MIN ((EXTR (EVOL 'TEMP' TAB0 'TEMPERATURES' 'T' PO_10) 'ORDO') - 273.15)) ;
LT_20_1 = IPOL L_MIN_1 (EVOL 'MANU' LT_MIN ((EXTR (EVOL 'TEMP' TAB0 'TEMPERATURES' 'T' PO_20) 'ORDO') - 273.15)) ;
LT_30_1 = IPOL L_MIN_1 (EVOL 'MANU' LT_MIN ((EXTR (EVOL 'TEMP' TAB0 'TEMPERATURES' 'T' PO_30) 'ORDO') - 273.15)) ;
LT_40_1 = IPOL L_MIN_1 (EVOL 'MANU' LT_MIN ((EXTR (EVOL 'TEMP' TAB0 'TEMPERATURES' 'T' PO_40) 'ORDO') - 273.15)) ;
LT_50_1 = IPOL L_MIN_1 (EVOL 'MANU' LT_MIN ((EXTR (EVOL 'TEMP' TAB0 'TEMPERATURES' 'T' PO_50) 'ORDO') - 273.15)) ;
LT_120_1 = IPOL L_MIN_1 (EVOL 'MANU' LT_MIN ((EXTR (EVOL 'TEMP' TAB0 'TEMPERATURES' 'T' PO_120) 'ORDO') - 273.15)) ;

* 4. Package into new graph objects to prepare for export.
EV_EX_00 = EVOL 'BLEU' 'MANU' 'Time(min)' L_MIN_1 'T_00mm' LT_00_1 ;
EV_EX_10 = EVOL 'ORAN' 'MANU' 'Time(min)' L_MIN_1 'T_10mm' LT_10_1 ;
EV_EX_20 = EVOL 'JAUN' 'MANU' 'Time(min)' L_MIN_1 'T_20mm' LT_20_1 ;
EV_EX_30 = EVOL 'ROSE' 'MANU' 'Time(min)' L_MIN_1 'T_30mm' LT_30_1 ;
EV_EX_40 = EVOL 'VERT' 'MANU' 'Time(min)' L_MIN_1 'T_40mm' LT_40_1 ;
EV_EX_50 = EVOL 'TURQ' 'MANU' 'Time(min)' L_MIN_1 'T_50mm' LT_50_1 ;
EV_EX_120 = EVOL 'BLAN' 'MANU' 'Time(min)' L_MIN_1 'T_120mm' LT_120_1 ;

* Combine everything into one data package
EV_EXPORT_TEMP = EV_EX_00 ET EV_EX_10 ET EV_EX_20 ET EV_EX_30 ET EV_EX_40 ET EV_EX_50 ET EV_EX_120 ;

* 5. Export to CSV/TXT file
OPTI 'SORT' 'D:\cast3m-m2internship\05.Calibration\Test_11\CSV\temp_results_no_1_KINT_1.0e-18_AK_1.0.csv' ;
SORT 'EXCE' EV_EXPORT_TEMP ;


*===================================================================
*********** EXPORT GAS PRESSURE EVERY 1 MINUTE **************
*===================================================================

* 1. Initialize the Cast3M base timeline (starting from temps2)

EVP_INIT = EVOL 'BLAN' 'TEMP' TAB0 'TEMPERATURES' 'PG' PO_10 ;

* 3. Extract, convert to MPa (divide by 1.E6), and interpolate (IPOL) in a single line
* IPOL syntax: IPOL [new X-axis] [original graph]
LPG_00_1  = IPOL L_MIN_1 (EVOL 'MANU' LT_MIN ((EXTR (EVOL 'TEMP' TAB0 'TEMPERATURES' 'PG' PO_00)  'ORDO') / 1.E6)) ;
LPG_10_1  = IPOL L_MIN_1 (EVOL 'MANU' LT_MIN ((EXTR (EVOL 'TEMP' TAB0 'TEMPERATURES' 'PG' PO_10)  'ORDO') / 1.E6)) ;
LPG_20_1  = IPOL L_MIN_1 (EVOL 'MANU' LT_MIN ((EXTR (EVOL 'TEMP' TAB0 'TEMPERATURES' 'PG' PO_20)  'ORDO') / 1.E6)) ;
LPG_30_1  = IPOL L_MIN_1 (EVOL 'MANU' LT_MIN ((EXTR (EVOL 'TEMP' TAB0 'TEMPERATURES' 'PG' PO_30)  'ORDO') / 1.E6)) ;
LPG_40_1  = IPOL L_MIN_1 (EVOL 'MANU' LT_MIN ((EXTR (EVOL 'TEMP' TAB0 'TEMPERATURES' 'PG' PO_40)  'ORDO') / 1.E6)) ;
LPG_50_1  = IPOL L_MIN_1 (EVOL 'MANU' LT_MIN ((EXTR (EVOL 'TEMP' TAB0 'TEMPERATURES' 'PG' PO_50)  'ORDO') / 1.E6)) ;
LPG_120_1  = IPOL L_MIN_1 (EVOL 'MANU' LT_MIN ((EXTR (EVOL 'TEMP' TAB0 'TEMPERATURES' 'PG' PO_120)  'ORDO') / 1.E6)) ;

* 4. Package into new graph objects to prepare for export.
EV_PG_00  = EVOL 'BLEU' 'MANU' 'Time(min)' L_MIN_1 'PG_00mm(MPa)'  LPG_00_1 ;
EV_PG_10  = EVOL 'ORAN' 'MANU' 'Time(min)' L_MIN_1 'PG_10mm(MPa)'  LPG_10_1 ;
EV_PG_20  = EVOL 'JAUN' 'MANU' 'Time(min)' L_MIN_1 'PG_20mm(MPa)'  LPG_20_1 ;
EV_PG_30  = EVOL 'ROSE' 'MANU' 'Time(min)' L_MIN_1 'PG_30mm(MPa)'  LPG_30_1 ;
EV_PG_40  = EVOL 'VERT' 'MANU' 'Time(min)' L_MIN_1 'PG_40mm(MPa)'  LPG_40_1 ;
EV_PG_50  = EVOL 'TURQ' 'MANU' 'Time(min)' L_MIN_1 'PG_50mm(MPa)'  LPG_50_1 ;
EV_PG_120  = EVOL 'BLAN' 'MANU' 'Time(min)' L_MIN_1 'PG_120mm(MPa)'  LPG_120_1 ;

* Combine everything into one data package
EV_EXPORT_PG = EV_PG_00 ET EV_PG_10 ET EV_PG_20 ET EV_PG_30 ET EV_PG_40 ET EV_PG_50 ET EV_PG_120;

* 5. Export to CSV/TXT file
OPTI 'SORT' 'D:\cast3m-m2internship\05.Calibration\Test_11\CSV\pg_results_no_1_KINT_1.0e-18_AK_1.0.csv' ;
SORT 'EXCE' EV_EXPORT_PG ;


*===================================================================
*********** EXPORT SATURATION DEGREE (SW) EVERY 1 MINUTE ***********
*===================================================================

* 1. Tạo các đối tượng EVOL cơ sở cho SW dọc theo các điểm đo (Từ bảng TAB0.'SW')
* Lưu ý: Trục thời gian của các EVOL này (LT_MIN) đã được định nghĩa ở phần xuất nhiệt độ
EV_SW_00  = EVOL 'BLEU' 'TEMP' TAB0 'SW' PO_00 ;
EV_SW_10  = EVOL 'ORAN' 'TEMP' TAB0 'SW' PO_10 ;
EV_SW_20  = EVOL 'JAUN' 'TEMP' TAB0 'SW' PO_20 ;
EV_SW_30  = EVOL 'ROSE' 'TEMP' TAB0 'SW' PO_30 ;
EV_SW_40  = EVOL 'VERT' 'TEMP' TAB0 'SW' PO_40 ;
EV_SW_50  = EVOL 'TURQ' 'TEMP' TAB0 'SW' PO_50 ;
EV_SW_120 = EVOL 'BLAN' 'TEMP' TAB0 'SW' PO_120 ;

* 2. Nội suy (IPOL) giá trị SW theo trục thời gian chuẩn 1 phút (L_MIN_1)
LSW_00_1  = IPOL L_MIN_1 (EVOL 'MANU' LT_MIN (EXTR EV_SW_00 'ORDO')) ;
LSW_10_1  = IPOL L_MIN_1 (EVOL 'MANU' LT_MIN (EXTR EV_SW_10 'ORDO')) ;
LSW_20_1  = IPOL L_MIN_1 (EVOL 'MANU' LT_MIN (EXTR EV_SW_20 'ORDO')) ;
LSW_30_1  = IPOL L_MIN_1 (EVOL 'MANU' LT_MIN (EXTR EV_SW_30 'ORDO')) ;
LSW_40_1  = IPOL L_MIN_1 (EVOL 'MANU' LT_MIN (EXTR EV_SW_40 'ORDO')) ;
LSW_50_1  = IPOL L_MIN_1 (EVOL 'MANU' LT_MIN (EXTR EV_SW_50 'ORDO')) ;
LSW_120_1 = IPOL L_MIN_1 (EVOL 'MANU' LT_MIN (EXTR EV_SW_120 'ORDO')) ;

* 3. Đóng gói lại thành các EVOL mới với nhãn mác rõ ràng để xuất CSV
EV_EX_SW_00  = EVOL 'BLEU' 'MANU' 'Time(min)' L_MIN_1 'SW_00mm'  LSW_00_1 ;
EV_EX_SW_10  = EVOL 'ORAN' 'MANU' 'Time(min)' L_MIN_1 'SW_10mm'  LSW_10_1 ;
EV_EX_SW_20  = EVOL 'JAUN' 'MANU' 'Time(min)' L_MIN_1 'SW_20mm'  LSW_20_1 ;
EV_EX_SW_30  = EVOL 'ROSE' 'MANU' 'Time(min)' L_MIN_1 'SW_30mm'  LSW_30_1 ;
EV_EX_SW_40  = EVOL 'VERT' 'MANU' 'Time(min)' L_MIN_1 'SW_40mm'  LSW_40_1 ;
EV_EX_SW_50  = EVOL 'TURQ' 'MANU' 'Time(min)' L_MIN_1 'SW_50mm'  LSW_50_1 ;
EV_EX_SW_120 = EVOL 'BLAN' 'MANU' 'Time(min)' L_MIN_1 'SW_120mm' LSW_120_1 ;

* 4. Gộp và xuất ra file CSV
EV_EXPORT_SW = EV_EX_SW_00 ET EV_EX_SW_10 ET EV_EX_SW_20 ET EV_EX_SW_30 ET EV_EX_SW_40 ET EV_EX_SW_50 ET EV_EX_SW_120 ;

OPTI 'SORT' 'D:\cast3m-m2internship\05.Calibration\Test_11\CSV\sw_results_no_1_KINT_1.0e-18_AK_1.0.csv' ;
SORT 'EXCE' EV_EXPORT_SW ;


*===================================================================
*********** EXPORT RELATIVE HUMIDITY (HR) EVERY 1 MINUTE ***********
*===================================================================

* 1. Tạo các đối tượng EVOL cơ sở cho HR dọc theo các điểm đo (Từ bảng TAB0.'HR')
EV_HR_00  = EVOL 'BLEU' 'TEMP' TAB0 'HR' PO_00 ;
EV_HR_10  = EVOL 'ORAN' 'TEMP' TAB0 'HR' PO_10 ;
EV_HR_20  = EVOL 'JAUN' 'TEMP' TAB0 'HR' PO_20 ;
EV_HR_30  = EVOL 'ROSE' 'TEMP' TAB0 'HR' PO_30 ;
EV_HR_40  = EVOL 'VERT' 'TEMP' TAB0 'HR' PO_40 ;
EV_HR_50  = EVOL 'TURQ' 'TEMP' TAB0 'HR' PO_50 ;
EV_HR_120 = EVOL 'BLAN' 'TEMP' TAB0 'HR' PO_120 ;

* 2. Nội suy (IPOL) giá trị HR theo trục thời gian chuẩn 1 phút (L_MIN_1)
LHR_00_1  = IPOL L_MIN_1 (EVOL 'MANU' LT_MIN (EXTR EV_HR_00 'ORDO')) ;
LHR_10_1  = IPOL L_MIN_1 (EVOL 'MANU' LT_MIN (EXTR EV_HR_10 'ORDO')) ;
LHR_20_1  = IPOL L_MIN_1 (EVOL 'MANU' LT_MIN (EXTR EV_HR_20 'ORDO')) ;
LHR_30_1  = IPOL L_MIN_1 (EVOL 'MANU' LT_MIN (EXTR EV_HR_30 'ORDO')) ;
LHR_40_1  = IPOL L_MIN_1 (EVOL 'MANU' LT_MIN (EXTR EV_HR_40 'ORDO')) ;
LHR_50_1  = IPOL L_MIN_1 (EVOL 'MANU' LT_MIN (EXTR EV_HR_50 'ORDO')) ;
LHR_120_1 = IPOL L_MIN_1 (EVOL 'MANU' LT_MIN (EXTR EV_HR_120 'ORDO')) ;

* 3. Đóng gói lại thành các EVOL mới với nhãn mác rõ ràng để xuất CSV
EV_EX_HR_00  = EVOL 'BLEU' 'MANU' 'Time(min)' L_MIN_1 'HR_00mm'  LHR_00_1 ;
EV_EX_HR_10  = EVOL 'ORAN' 'MANU' 'Time(min)' L_MIN_1 'HR_10mm'  LHR_10_1 ;
EV_EX_HR_20  = EVOL 'JAUN' 'MANU' 'Time(min)' L_MIN_1 'HR_20mm'  LHR_20_1 ;
EV_EX_HR_30  = EVOL 'ROSE' 'MANU' 'Time(min)' L_MIN_1 'HR_30mm'  LHR_30_1 ;
EV_EX_HR_40  = EVOL 'VERT' 'MANU' 'Time(min)' L_MIN_1 'HR_40mm'  LHR_40_1 ;
EV_EX_HR_50  = EVOL 'TURQ' 'MANU' 'Time(min)' L_MIN_1 'HR_50mm'  LHR_50_1 ;
EV_EX_HR_120 = EVOL 'BLAN' 'MANU' 'Time(min)' L_MIN_1 'HR_120mm' LHR_120_1 ;

* 4. Gộp và xuất ra file CSV
EV_EXPORT_HR = EV_EX_HR_00 ET EV_EX_HR_10 ET EV_EX_HR_20 ET EV_EX_HR_30 ET EV_EX_HR_40 ET EV_EX_HR_50 ET EV_EX_HR_120 ;

OPTI 'SORT' 'D:\cast3m-m2internship\05.Calibration\Test_11\CSV\hr_results_no_1_KINT_1.0e-18_AK_1.0.csv' ;
SORT 'EXCE' EV_EXPORT_HR ;

*===================================================================
*********** EXPORT EFFECTIVE DEHYDRATION (DCH) EVERY 1 MINUTE ******
*===================================================================

* 1. Tạo các đối tượng EVOL cơ sở cho DCH dọc theo các điểm đo
EV_DCH_00  = EVOL 'BLEU' 'TEMP' TAB0 'DCH_CHPO' PO_00 ;
EV_DCH_10  = EVOL 'ORAN' 'TEMP' TAB0 'DCH_CHPO' PO_10 ;
EV_DCH_20  = EVOL 'JAUN' 'TEMP' TAB0 'DCH_CHPO' PO_20 ;
EV_DCH_30  = EVOL 'ROSE' 'TEMP' TAB0 'DCH_CHPO' PO_30 ;
EV_DCH_40  = EVOL 'VERT' 'TEMP' TAB0 'DCH_CHPO' PO_40 ;
EV_DCH_50  = EVOL 'TURQ' 'TEMP' TAB0 'DCH_CHPO' PO_50 ;
EV_DCH_120 = EVOL 'BLAN' 'TEMP' TAB0 'DCH_CHPO' PO_120 ;

* 2. Nội suy (IPOL) giá trị DCH theo trục thời gian chuẩn 1 phút (L_MIN_1)
LDCH_00_1  = IPOL L_MIN_1 (EVOL 'MANU' LT_MIN (EXTR EV_DCH_00 'ORDO')) ;
LDCH_10_1  = IPOL L_MIN_1 (EVOL 'MANU' LT_MIN (EXTR EV_DCH_10 'ORDO')) ;
LDCH_20_1  = IPOL L_MIN_1 (EVOL 'MANU' LT_MIN (EXTR EV_DCH_20 'ORDO')) ;
LDCH_30_1  = IPOL L_MIN_1 (EVOL 'MANU' LT_MIN (EXTR EV_DCH_30 'ORDO')) ;
LDCH_40_1  = IPOL L_MIN_1 (EVOL 'MANU' LT_MIN (EXTR EV_DCH_40 'ORDO')) ;
LDCH_50_1  = IPOL L_MIN_1 (EVOL 'MANU' LT_MIN (EXTR EV_DCH_50 'ORDO')) ;
LDCH_120_1 = IPOL L_MIN_1 (EVOL 'MANU' LT_MIN (EXTR EV_DCH_120 'ORDO')) ;

* 3. Đóng gói lại thành các EVOL mới với nhãn mác rõ ràng để xuất CSV
EV_EX_DCH_00  = EVOL 'BLEU' 'MANU' 'Time(min)' L_MIN_1 'DCH_00mm'  LDCH_00_1 ;
EV_EX_DCH_10  = EVOL 'ORAN' 'MANU' 'Time(min)' L_MIN_1 'DCH_10mm'  LDCH_10_1 ;
EV_EX_DCH_20  = EVOL 'JAUN' 'MANU' 'Time(min)' L_MIN_1 'DCH_20mm'  LDCH_20_1 ;
EV_EX_DCH_30  = EVOL 'ROSE' 'MANU' 'Time(min)' L_MIN_1 'DCH_30mm'  LDCH_30_1 ;
EV_EX_DCH_40  = EVOL 'VERT' 'MANU' 'Time(min)' L_MIN_1 'DCH_40mm'  LDCH_40_1 ;
EV_EX_DCH_50  = EVOL 'TURQ' 'MANU' 'Time(min)' L_MIN_1 'DCH_50mm'  LDCH_50_1 ;
EV_EX_DCH_120 = EVOL 'BLAN' 'MANU' 'Time(min)' L_MIN_1 'DCH_120mm' LDCH_120_1 ;

* 4. Gộp và xuất ra file CSV
EV_EXPORT_DCH = EV_EX_DCH_00 ET EV_EX_DCH_10 ET EV_EX_DCH_20 ET EV_EX_DCH_30 ET EV_EX_DCH_40 ET EV_EX_DCH_50 ET EV_EX_DCH_120 ;

OPTI 'SORT' 'D:\cast3m-m2internship\05.Calibration\Test_11\CSV\dch_results_no_1_KINT_1.0e-18_AK_1.0.csv' ;
SORT 'EXCE' EV_EXPORT_DCH ;

*===================================================================
*********** EXPORT HYDRATION DEGREE (HYDR) EVERY 1 MINUTE **********
*===================================================================

* 1. Tạo các đối tượng EVOL cơ sở cho HYDR dọc theo các điểm đo nút cố định
EV_HYD_00  = EVOL 'BLEU' 'TEMP' TAB0 'HYDR_CHPO' PO_00 ;
EV_HYD_10  = EVOL 'ORAN' 'TEMP' TAB0 'HYDR_CHPO' PO_10 ;
EV_HYD_20  = EVOL 'JAUN' 'TEMP' TAB0 'HYDR_CHPO' PO_20 ;
EV_HYD_30  = EVOL 'ROSE' 'TEMP' TAB0 'HYDR_CHPO' PO_30 ;
EV_HYD_40  = EVOL 'VERT' 'TEMP' TAB0 'HYDR_CHPO' PO_40 ;
EV_HYD_50  = EVOL 'TURQ' 'TEMP' TAB0 'HYDR_CHPO' PO_50 ;
EV_HYD_120 = EVOL 'BLAN' 'TEMP' TAB0 'HYDR_CHPO' PO_120 ;

* 2. Nội suy (IPOL) giá trị HYDR theo trục thời gian chuẩn 1 phút (L_MIN_1)
LHYD_00_1  = IPOL L_MIN_1 (EVOL 'MANU' LT_MIN (EXTR EV_HYD_00 'ORDO')) ;
LHYD_10_1  = IPOL L_MIN_1 (EVOL 'MANU' LT_MIN (EXTR EV_HYD_10 'ORDO')) ;
LHYD_20_1  = IPOL L_MIN_1 (EVOL 'MANU' LT_MIN (EXTR EV_HYD_20 'ORDO')) ;
LHYD_30_1  = IPOL L_MIN_1 (EVOL 'MANU' LT_MIN (EXTR EV_HYD_30 'ORDO')) ;
LHYD_40_1  = IPOL L_MIN_1 (EVOL 'MANU' LT_MIN (EXTR EV_HYD_40 'ORDO')) ;
LHYD_50_1  = IPOL L_MIN_1 (EVOL 'MANU' LT_MIN (EXTR EV_HYD_50 'ORDO')) ;
LHYD_120_1 = IPOL L_MIN_1 (EVOL 'MANU' LT_MIN (EXTR EV_HYD_120 'ORDO')) ;

* 3. Đóng gói lại thành các EVOL mới có nhãn tiêu đề rõ ràng
EV_EX_HYD_00  = EVOL 'BLEU' 'MANU' 'Time(min)' L_MIN_1 'HYD_00mm'  LHYD_00_1 ;
EV_EX_HYD_10  = EVOL 'ORAN' 'MANU' 'Time(min)' L_MIN_1 'HYD_10mm'  LHYD_10_1 ;
EV_EX_HYD_20  = EVOL 'JAUN' 'MANU' 'Time(min)' L_MIN_1 'HYD_20mm'  LHYD_20_1 ;
EV_EX_HYD_30  = EVOL 'ROSE' 'MANU' 'Time(min)' L_MIN_1 'HYD_30mm'  LHYD_30_1 ;
EV_EX_HYD_40  = EVOL 'VERT' 'MANU' 'Time(min)' L_MIN_1 'HYD_40mm'  LHYD_40_1 ;
EV_EX_HYD_50  = EVOL 'TURQ' 'MANU' 'Time(min)' L_MIN_1 'HYD_50mm'  LHYD_50_1 ;
EV_EX_HYD_120 = EVOL 'BLAN' 'MANU' 'Time(min)' L_MIN_1 'HYD_120mm' LHYD_120_1 ;

* 4. Gộp toàn bộ các đường đo lại thành một gói dữ liệu tổng hợp
EV_EXPORT_HYD = EV_EX_HYD_00 ET EV_EX_HYD_10 ET EV_EX_HYD_20 ET EV_EX_HYD_30 ET EV_EX_HYD_40 ET EV_EX_HYD_50 ET EV_EX_HYD_120 ;

* 5. Xuất file CSV ra bộ nhớ máy tính
OPTI 'SORT' 'D:\cast3m-m2internship\05.Calibration\Test_11\CSV\hyd_results_no_1_KINT_1.0e-18_AK_1.0.csv' ;
SORT 'EXCE' EV_EXPORT_HYD ;

FIN;
