*=====================================================================
* Drying and shrinkage test case - coupled thermo-hydro model (single luquid phase)
* Extended version: Uncertainty quantification on permeability Kint with Quadrature method.

* Original author : G. Sciume (24-04-2017)
* Modified by: Tan Kiet HONG (23-03-2026)
* Modifications :
*   - All absolute file paths replaced with relative paths
*     (runs on any machine without modification)
*   - Added 'TREF' and 'TALP' to mechanical material (fixes ERREUR 77)
*   - English comments throughout

* Simplifed from the debugged TH-model single luquid phase Code 1a and Sphere.dgibi (quadrature template)
*   - Simplified from TH-model to H model (no schrinkage strain)
*   - Uncertainty quantification on permeability Kint:
*       QUADRATU → quadrature points/weights
*       PARASTAT → sensitivity analysis
*       PROBDENS → PDF/CDF of pcmax
*=====================================================================

OPTI ECHO 0;
OPTI DIME 3 MODE TRID ELEM CUB8;

*--------------------------------------------------------------------
*
*
*           I) HYDRO MODEL WITH CONSTANT TEMPERATURE INPUT
*
*
*--------------------------------------------------------------------

*=====================================================================
* 1) USER-DEFINED PROCEDURES: Sl, dSl/dPc, krl
*=====================================================================

* Procedure: degree of saturation Sl as a function of capillary pressure
DEBP sldegre pcap*'FLOTTANT';
   temp1 = b1/(b1-1.);
   temp2 = pcap/a1;
   temp3 = 1. + (temp2**temp1);
   temp4 = -1./b1;
   sldegre = temp3**temp4;
FINP sldegre;

* Procedure: derivative of Sl with respect to capillary pressure (dSl/dPc)
DEBP sldepc pcap*'FLOTTANT';
   temp1 = b1/(b1-1.);
   temp2 = pcap/a1;
   temp3 = 1. + (temp2**temp1);
   temp4 = -1.*((b1 + 1.)/b1);
   temp5 = temp3**temp4;
   temp6 = pcap**(1./(b1 - 1.));
   temp7 = a1**(b1/(b1 - 1.));
   temp8 = temp6/temp7;
   temp9 = (-1./(b1 - 1.))*temp8;
   sldepc =  temp5 * temp9;
FINP sldepc;

* Procedure: relative permeability krl as a function of capillary pressure
DEBP krl pcap*'FLOTTANT';
   temp1 = b1/(b1-1.);
   temp2 = pcap/a1;
   temp3 = 1. + (temp2**temp1);
   temp4 = -1./b1;
   temp5 = temp3**temp4;
   temp6 = 1. - (temp5**b1);
   temp7 = temp6**(1./b1);
   temp8 = (1. - temp7)**2.;
   temp9 = temp5**0.5;
   krl = temp8 * temp9;
FINP krl;

* Procedure: relative humidity field (CHPOINT) from capillary pressure field
DEBP hr_chpo pcap*'CHPOINT' mail1*'MAILLAGE';
   temp0 = (EXCO pcap  'T') 'NOMC' 'SCAL';
   temp1 = 18.e-3 / (8.314 * 1000. * 293.15);
   temp2 = temp0 * temp1 * -1.;
   chhpc = EXP(temp2);
FINP chhpc;

*=====================================================================
* 2) MATERIAL PARAMETERS
*=====================================================================
* Water density [kg/m3]
RHO  = 1000.;
* Porosity [-]
EPS  = 0.2;
* van Genuchten parameter a1 [Pa]
A1   = 20.E6;
* van Genuchten parameter b1 [-]
B1   = 2.;
* Dynamic viscosity of water [Pa.s]
VISC = 1.E-3 ;

*=====================================================================
* 3) INITIAL AND EXTERNAL CONDITIONS
*=====================================================================
* Temperature
TEMPE1 = 20.0;
* External relative humidity
HR_EXT = 0.50;
* Initial relative humidity
HR_INI = 0.90;

*=====================================================================
* 4) MESH CONSTRUCTION: 1/8 of a cubic specimen
*=====================================================================
* Full side length of cube [m]
LATO1    = 0.10;
* Coarse mesh density
DENS_GRO = 0.01;
* Fine mesh density (near exposed surface)
DENS_FIN = 0.002;

p1    =  0.        0.  0.;
p2    = (LATO1/2.) 0.  0.;
l12   =  DROI p1 p2 'DINI' DENS_GRO 'DFIN' DENS_FIN;
SURF1 = l12 TRANS (0. (LATO1/2.) 0.) 'DINI' DENS_GRO 'DFIN' DENS_FIN;
*trac SURF1;

VEC1  = 0. 0. (LATO1/2.);
MAIL1 = SURF1 VOLU TRAN VEC1 'DINI' DENS_GRO 'DFIN' DENS_FIN;
*TRAC CACH MAIL1;

* Extract exposed surface (convective boundary condition)
p3 = (LATO1/2.) (LATO1/2.)  0. ;
p4 =  0.   (LATO1/2.)  0.;
p5 = (LATO1/2.) (LATO1/2.)  0.01;
p6 = 0.000 (LATO1/2.)  0.01;
P_CONT1 = 'POIN' MAIL1 'PLAN' p2 p3 p5 0.0005;
P_CONT2 = 'POIN' MAIL1 'PLAN' p3 p4 p6 0.0005;
P_CONT = P_CONT1 et P_CONT2;
*trac P_CONT;

CONTH = (face 3 mail1) 'ELEM' 'APPUYE' 'STRICTEMENT' P_CONT;
*trac conth;

*=====================================================================
* 5) TIME DISCRETIZATION
*=====================================================================
* 1 hour in seconds
heure1  = 3600.;
jour1   = 24  * heure1;
TFIN    = 120 * jour1;
LTEMPS1 = PROG 0. PAS (24 * heure1) TFIN;

*=====================================================================*
* 6) HYGROMETRIC MODEL AND MATERIAL DEFINITION                          *
*=====================================================================*
MO_HYGR = MODE MAIL1 THERMIQUE;
MO_CONV = MODE CONTH THERMIQUE CONVECTION;
MO_TOT  = MO_HYGR et MO_CONV;

* Build moisture capacity coefficient C(Pc) = -eps * rho * dSl/dPc
tXPC  = 0.;
tYDSW = 0.;
XPC  = PROG tXPC;
YDSW = PROG tYDSW;
REPETER BOUCLE (150);
  tXPC = tXPC + 1.E6;
  tYDSW = sldepc tXPC;
  XPC  = XPC  et (PROG tXPC);
  YDSW = YDSW et (PROG tYDSW);
FIN BOUCLE;
DSWPC = EVOL MANU 'T' XPC 'T' YDSW;
YCP   = -1. * YDSW * EPS * RHO;
CP    =  EVOL MANU 'T' XPC 'C' YCP;
DESS CP;

MA_CONV = MATE MO_CONV 'H' 1.E-13;

*=====================================================================
* 7) INITIAL AND BOUNDARY CONDITIONS (HYGRO)
*=====================================================================

* Initial capillary pressure field from initial relative humidity
PC_INI = -8.314*293.15*1000*(LOG(HR_INI))/18.e-3;
PC0    = MANU 'CHPO' MAIL1 'T'  PC_INI;

* External capillary pressure (imposed at exposed surface)
PC_EXT  = -8.314 * 293.15 * 1000. * (LOG(HR_EXT)) / 18.e-3;
CONV1   = MANU 'CHPO' CONTH 1 'T' PC_EXT 'NATURE' 'DISCRETE';
EV_CHAR = EVOL MANU 'TEMPS' (PROG 0. TFIN) 'T' (PROG 1. 1.);
CHAR1   = CHAR 'TECO' CONV1 EV_CHAR;

*==============================================================================
* 8A) QUADRATURE POINTS FOR K ~ LogNormal(MU_K, SIG_K)
*==============================================================================

* Mean value of intrinsic permeability [m2]
MU_K0  = 1.E-20;
* Coefficient of variation (20% uncertainty)
CV_K0  = 0.20;
* Standard deviation
SIG_K0 = CV_K0 * MU_K0;
* Number of quadrature points
NpK0 = 3;

*==============================================================================
* 8B) PROCEDURE: FEM solve for a given K value → returns pc_max

* QUADRATU takes physical mean and std dev directly (no LOG conversion needed)
TabK0 = QUADRATU 'LOGN' MU_K0 SIG_K0 NpK0;

DEBPROC CalPcmax KINT_val*FLOTTANT;

* Build effective hydraulic conductivity K_eff(Pc) = krl * rho * Kint / visc
tXPC  = 0.;
tYKRL = 1.;
XPC  = PROG tXPC;
YKRL = PROG tYKRL;
REPETER BOUCLE (150);
  tXPC = tXPC + 1.E6;
  tYKRL = krl tXPC;
  XPC  = XPC et (PROG tXPC);
  YKRL = YKRL et (PROG tYKRL);
FIN BOUCLE;
YK    = YKRL * ((RHO * KINT_val)/VISC);

K_EFF_i = EVOL MANU 'T' XPC 'K' YK;

MA_HYGR_i = MATE MO_HYGR 'RHO' 1. 'C' CP 'K' K_EFF_i;
MAT_TOT_i = MA_HYGR_i ET MA_CONV;

* PASAPAS nonlinear solve
TABi= table;
TABi.TEMPERATURES= table;
TABi.TEMPERATURES.0= pc0;
TABi.MODELE= MO_TOT;
TABi.CARACTERISTIQUES= MAT_TOT_i;
TABi.CHARGEMENT= CHAR1;
TABi.PROCEDURE_THERMIQUE= NONLINEAIRE;
TABi.RELAXATION_THETA= 0.51;
TABi.TEMPS_CALCULES= ltemps1;

PASAPAS TABi;

* Extract pc_max at final time step as scalar QoI
NBTi    = DIME TABi.TEMPERATURES;
PcRES_i = TABi.TEMPERATURES.(NBTi - 1);
Pcmax_i = MAXI PcRES_i;

FINPROC Pcmax_i;

*==============================================================================
* 8C) LOOP OVER QUADRATURE POINTS → build TabRES
*==============================================================================
TabRES = TABLE;

REPE BoucleQ NpK0;
  K0_q   = TabK0 .&BoucleQ. 'POINT';
  POIDS_q = TabK0 .&BoucleQ. 'POIDS';

  Pcmax_q  = CalPcmax K0_q;

  TabRES .&BoucleQ = TABLE;
  TabRES .&BoucleQ. 'POINT' = Pcmax_q;
  TabRES .&BoucleQ. 'POIDS' = POIDS_q;

  MESS '--- Quadrature point ' &BoucleQ ' / ' NpK0;
  MESS '    K0     = ' K0_q;
  MESS '    POIDS = ' POIDS_q;
  MESS '    Pcmax = ' Pcmax_q;
FIN BoucleQ;

*=====================================================================
* 8D) STATISTICAL MOMENTS via PARASTAT
*=====================================================================
MU_PC SIGMA_PC RB1_PC B2_PC = PARASTAT TabRES;

MESS '%%%%%%%%%%%%%%%%%%%%%%%%%%%%%%%%%%%%%%%%%%%%%%%%%%%%%%%%%%';
MESS '%%% STATISTICAL MOMENTS OF CAPILLARY PRESSURE (KINT lognormal UQ)';
MESS '%%% MEAN        (MU)    = ' MU_PC    ;
MESS '%%% STD DEV     (SIGMA) = ' SIGMA_PC ;
MESS '%%% SKEWNESS    (RB1)   = ' RB1_PC;
MESS '%%% KURTOSIS    (B2)    = ' B2_PC;
MESS '%%%%%%%%%%%%%%%%%%%%%%%%%%%%%%%%%%%%%%%%%%%%%%%%%%%%%%%%%%';

*=====================================================================
* 8E) PDF / CDF of shrinkage strain via PROBDENS
*=====================================================================
PDF_PC CDF_PC = PROBDENS MU_PC SIGMA_PC RB1_PC B2_PC;
DESS PDF_PC;
DESS CDF_PC;

*=====================================================================
* 8F) DETERMINISTIC REFERENCE RUN (KINT = MU_KINT)
*=====================================================================
MESS '%%% DETERMINISTIC REFERENCE RUN (KINT = mean)';

* K_EFF with nominal KINT and Recalculate YKRL (fix error)
tXPC  = 0.;
tYKRL = 1.;
XPC  = PROG tXPC;
YKRL = PROG tYKRL;
REPETER BOUCLE (150);
  tXPC = tXPC + 1.E6;
  tYKRL = krl tXPC;
  XPC  = XPC et (PROG tXPC);
  YKRL = YKRL et (PROG tYKRL);
FIN BOUCLE;
YK_ref    = YKRL * ((RHO * MU_K0) / VISC);
K_EFF_ref = EVOL MANU 'T' XPC 'K0' YK_ref;
DESS K_EFF_ref;

MA_HYGR_ref = MATE MO_HYGR 'RHO' 1. 'C' CP 'K' K_EFF_ref;
MA_TOT_ref  = MA_HYGR_ref et MA_CONV;

*=====================================================================
* 9) HYGRO RESOLUTION - PASAPAS (nonlinear transient)
*=====================================================================
tab1= table;
tab1.TEMPERATURES= table;
tab1.TEMPERATURES.0= pc0;
tab1.MODELE= MO_TOT;
tab1.CARACTERISTIQUES= MA_TOT_ref;
tab1.CHARGEMENT= CHAR1;
tab1.PROCEDURE_THERMIQUE= NONLINEAIRE;
tab1.RELAXATION_THETA= 0.51;
tab1.TEMPS_CALCULES= ltemps1;
PASAPAS tab1;


*=====================================================================
* 10) POST-PROCESSING: relative humidity field at each time step
*=====================================================================
tab_hr  = TABLE;
nbt2    = DIME tab1.TEMPERATURES;
list nbt2;

n10 = 0;
REPETER BOUCLE (nbt2);
  tab_hr.n10 = hr_chpo  tab1.TEMPERATURES.n10  mail1;
  n10 = n10 + 1;
FIN BOUCLE;

* Plot HR maps at days 0, 30, 60, 90, 120
SCALA_HR = PROG 0.5 PAS ((0.9-0.5)/16) 0.9;
trac tab_hr.0   mail1 SCALA_HR;
trac tab_hr.30  mail1 SCALA_HR;
trac tab_hr.60  mail1 SCALA_HR;
trac tab_hr.90  mail1 SCALA_HR;
trac tab_hr.120 mail1 SCALA_HR;

FIN;
