*---------------------------------------------------------------------*
* TEST 0 : ADIABATIC HYDRATION / AGING / ACCIDENT
* G.Sciumè (31 - 10 - 2024)
*
* Reference
* "CONCRETE CASTING AND LIFETIME CONDITIONS IMPACT ON HIGH
* TEMPERATURE RESISTANCE"
*
* G. Sciumè (1), S. Dal Pont (2), D. Dauti (2)
*
* (1) I2M, Université de Bordeaux, Bordeaux, France
* (2) 3SR, Université Grenoble Alpes, Grenoble, France
*---------------------------------------------------------------------*

OPTI ECHO 0;


*---------------------------------------------------------------------*
* CONSTANT PHYSICAL PARAMEMTERS
*---------------------------------------------------------------------*
RGP1     = 8.3145 ;
MMGA1    = 28.9645E-3 ;
MMGW1    = 18.0153E-3 ;
RHOS1    = 2625.8 ;
RHOW0    = 1000. ;
CPW1     = 4181.0 ;
CPGW1    = 1805.0 ;
CPGA1    = 1005.7 ;
*---------------------------------------------------------------------*


*---------------------------------------------------------------------*
* TEST DESCRIPTION AND TEMPORAL DISCRETIZATION
*---------------------------------------------------------------------*
*
* Modeled phases
* I)   Early age :        0 ---> 3 days        /  adiabatic conditions
* II)  Aging     :        3 ---> age time      /  H & T convection
* III) Accident  : age time ---> age time + 6h /  H & T convection
*
*---------------------------------------------------------------------*
hours1   = 3600.       ;
day1     = 86400.      ;
year1    = 360 * day1  ;
*
age_time =   1 * year1 ;
acc_time =   3 * hours1;
*
temps1   =  3 * day1   ;
temps2   =  6 * day1   ;
temps3   =  age_time   ;
temps4   =  age_time +  acc_time;

DT01     =  600.;
DT12     =  600.;
DT23     =    3 * day1;
DT34     =   60.;

LTP_HYDR = PROG  0.             PAS DT01 temps1        ;
LTP_AGIN = PROG (temps1 + DT12) PAS DT12 temps2 PAS DT23 temps3 ;
LTP_ACCI = PROG (temps3 + DT34) PAS  DT34  temps4               ;
LTP_TOT  = LTP_HYDR ET LTP_AGIN ET LTP_ACCI                     ;

* Saved times
LSA_HYDR = PROG  0.             PAS hours1 temps1;
LSA_AGIN = PROG (temps1 + DT23) PAS DT23   temps3;
LSA_ACCI = PROG (temps3 + 60. ) PAS 60.    temps4;
LSA_TOT  = LSA_HYDR ET LSA_AGIN ET LSA_ACCI                     ;
*---------------------------------------------------------------------*


*---------------------------------------------------------------------*
* DATI MATERIALE (PARTE THC)
*---------------------------------------------------------------------*

* MIX DATA
cem  = 400.   ;
aggr = 1806.  ;
wc   = 0.45   ;
sc   = 0.     ;

* HYDRATION PROCESS DATA (affinity. activation energy. hydration heat)
AI   = 3.8    ;
AP   = 218.   ;
GAMP = 0.12   ;
ALFA = 13.    ;
EAR1 = 5000.  ;
lat1 = 1.37e8 ;

* INTRINSIC PERMEABILITY
KINT = 2.E-19 ;

* DESORPTION ISOTHERME MODEL PARAMETERS
a1   =  18.6E6 ;
b1   =  2.27    ;
c1   =  1.5     ;

* THERMAL PARAMETERS
CS   = 835.   ;
KS   = 1.386    ;
*---------------------------------------------------------------------*


*---------------------------------------------------------------------*
* COSTRUZIONE MESH
*---------------------------------------------------------------------*
'OPTI' 'DIME' 2 'MODE' PLAN CONT 'ELEM' QUA4;
L1   = 0.3  ;
DX1  = 0.001;
*
P1  = 0.   0.;
P2  = L1   0.;
L12 = DROI P1 P2 'DINI' DX1 'DFIN'  DX1;
MAIL1 = (TRAN 1 L12 (0. 0.01)) 'COUL' 'ROUG';
*
CONTH = COTE 4 MAIL1;
CONTT = COTE 4 MAIL1;
trac MAIL1;
*---------------------------------------------------------------------*


*---------------------------------------------------------------------*
* DEFINIZIONE DEL MODELLO
*---------------------------------------------------------------------*
MODTHC  = 'MODE' MAIL1 'THERMOHYDRIQUE' 'BETON_THM' 'CONS' 'BO';
MODCOT  = 'MODE' CONTT 'THERMIQUE' 'CONVECTION';
MODRAY  = 'MODE' CONTT 'THERMIQUE' 'RAYONNEMENT' 'INFINI';
MOD_TOT =  MODCOT 'ET' MODTHC 'ET' MODRAY;
*---------------------------------------------------------------------*


*---------------------------------------------------------------------*
* DEFINIZIONE DEL MATERIALE
*---------------------------------------------------------------------*
WINF GAM0 POR1 APOR = @POWERS cem aggr wc sc;
MATTHC = 'MATE' MODTHC 'CS'  CS    'KS'   KS   'GAM0' GAM0 'WINF' WINF
'VGA' a1   'VGB'  b1   'VGC' c1    'K1' KINT  'AK'   7.  'BK'   1.
'KLI1' 20000.  'AKLI'   1.  'BKLI' 1. 'POR1' POR1 'APOR' APOR
'AFF1' Ai  'AFF2' Ap   'AFF3' GAMP 'AFF4' ALFA 'EAR'  EAR1 'QLAT' lat1;
MATCOT  = 'MATE'  MODCOT   'H'     10.;
MATRAY  = 'MATE'  MODRAY   'EMIS'   0.;
MAT_TOT = MATCOT et MATTHC et MATRAY;
*---------------------------------------------------------------------*


*---------------------------------------------------------------------*
* Convection vapeur (traitée par charther)
* et donc à ne pas ajouter dansle modele total
*---------------------------------------------------------------------*
MODCOH  = 'MODE' CONTH 'THERMIQUE' 'CONVECTION' ;
MATCOH  = 'MATE' MODCOH   'H'                0. ;
*---------------------------------------------------------------------*


*---------------------------------------------------------------------*
* CONDIZIONE INIZIALE (COST adibatic calorimetry test)
* - grado di idratazione iniziale HY_0 = 0
* - temperatura iniziale          TC_0 = 22°
* - pressione del gas iniziale    PG_0 = p_atm
* - umidità relativa iniziale     HR_0 = 0.999
HY_0   = 0.            ;
TC_0   = 22.           ;
TK_0   = 273.15 + TC_0 ;
PG_0   = 101325.       ;
HR_0   = 0.99995       ;

ZERO1  = MANU 'CHPO' MAIL1 'SCAL' 0.       ;
CHTK_0 = MANU 'CHPO' MAIL1 'T' TK_0        ;
PVS_0 XX YY ZZ KK JJ= @PVSAT ZERO1 ZERO1 CHTK_0    ;

* Clapeyron
PC_0   = PG_0 - PVS_0 + ((-1.)*(RGP1*TK_0*RHOW0*(LOG(HR_0))/MMGW1));
PC_0   = PC_0 'NOMC' 'PC';

* Calcul degre de saturation correspondant
CHPC_0 = MANU CHPO MAIL1 1 'SCAL' (MAXI PC_0);
CHTK_0 = MANU CHPO MAIL1 1 'SCAL' TK_0;
HYDR   = MANU CHPO MAIL1 1 'SCAL' HY_0;
cha1   = MANU CHPO MAIL1 1 'SCAL' a1;
chb1   = MANU CHPO MAIL1 1 'SCAL' b1;
chc1   = MANU CHPO MAIL1 1 'SCAL' c1;
chgam0 = MANU CHPO MAIL1 1 'SCAL' gam0;

SW0    = @SATURA CHPC_0 CHTK_0 HYDR cha1 chb1 chc1 chgam0;

CI_TH  = ('MANU' 'CHPO' MAIL1 2 'PG' PG_0 'T' TK_0)  +  PC_0;
*TRAC CI_TH MAIL1;
*---------------------------------------------------------------------*


*---------------------------------------------------------------------*
* CONDIZIONI AL CONTORNO
* - PC_ext = p_atm
*
* - TC_ext = 22°C until "age time" then accident ramp (2K/min)
*
*             / 0.95            0      < time < 3 days
* - HR_ext = {  0.95 --> 0.50   3 days < time < 6 days
*             \ 0.50            6 days < time < age time
* - Accident:  PGWe_i  = 1300.;
*---------------------------------------------------------------------*
TK_E  = TK_0;
PG_E  = PG_0;
HR_E1 = 0.95;
HR_E2 = 0.50;

* PG: imposed gas pressure
EV_PG = 'EVOL' 'MANU' 'TEMPS'  ('PROG' 0.  temps4) ('PROG' 1. 1.);
CLPG1 = 'BLOQ' 'PG'         CONTH;
CHPG1 = 'DEPI'  CLPG1        PG_E;
CGPG1 = 'CHAR' 'TIMP' CHPG1 EV_PG;

* T: Thermal convection
* Ramp (2K/min)
*DELTAT = acc_time * (2./60.);  list DELTAT;
*DELTAT = 410.;
*DELTAT = 420;
DELTAT = 450;
N1     = 1   ;
PRO_TK = PROG;
REPETER BOU_TE (DIME LTP_TOT);
    TIMEi  = EXTR N1 LTP_TOT;
    SI (TIMEi '<EG' temps3);
    TKi    = TK_E;
    FINS;
    SI (TIMEi '>'   temps3);
    TKi    = TK_E + (DELTAT*((TIMEi - temps3)/(temps4 - temps3)));
    FINS;
    PRO_TK = PRO_TK ET (PROG TKi);
    N1 = N1 + 1;
FIN BOU_TE;
EVTK1 = 'EVOL' 'MANU'  LTP_TOT  PRO_TK;
*DESS EVTK1;
CHTK1 = 'MANU' 'CHPO'  CONTT 1 'T'  1. 'NATURE' 'DISCRETE';
CGTK1 = ('CHAR' 'TECO'  CHTK1    EVTK1) ET
        ('CHAR' 'TERA'  CHTK1    EVTK1);
* PC: hygral convection ( qw = hcv * (RGW_s - RGW_ext)n )
N1      = 1   ;
PRO_RGW = PROG;
REPETER BOU_RGW (DIME LTP_TOT);
    EXTR N1 LTP_TOT;
    TIMEi        = EXTR N1 LTP_TOT;
    TKi          = EXTR N1 PRO_TK ;
    PVSe_i XX YY ZZ KK JJ
           = @PVSAT ZERO1 ZERO1 (MANU 'CHPO' MAIL1 'T' TKi);
    PVSe_i       = MAXI PVSe_i;
    FGPGW0 = (MMGW1 / RGP1 )* (1./TKi) ;
       SI (TIMEi '<' temps1);
       PGWe_i  = HR_E1 * PVSe_i;
       FINS;
       SI (TIMEi '>EG' temps1);
       HR_i = HR_E1-(((TIMEi-temps1)/(temps2-temps1))*(HR_E1-HR_E2));
       PGWe_i  = HR_i * PVSe_i;
       FINS;
       SI (TIMEi '>' temps2);
       PGWe_i  = HR_E2 * PVSe_i;
       FINS;
       SI (TIMEi '>' temps3);
       PGWe_i  = 1300.;
       FINS;
    RGWi    = FGPGW0 * PGWe_i ;
    PRO_RGW = PRO_RGW ET (PROG RGWi);
    N1 = N1 + 1;
FIN BOU_RGW;
EVPC1   = 'EVOL' 'MANU' LTP_TOT  PRO_RGW;
*DESS EVPC1;
CHPC1   = 'MANU' 'CHPO' CONTH  1  'SCAL'  1. 'NATURE' 'DISCRETE';
CGPC1   = 'CHAR' 'TECO' CHPC1    EVPC1 ;
*---------------------------------------------------------------------*


*---------------------------------------------------------------------*
*VI. Resolution PASAPAS : Jeune-age (sealed)
*---------------------------------------------------------------------*
TAB0                         = 'TABL' ;
TAB0 . 'MODELE'              = MOD_TOT ;
TAB0 . 'CARACTERISTIQUES'    = MAT_TOT ;
TAB0 . 'BLOCAGES_THERMIQUES' = CLPG1 ;
TAB0 . 'CHARGEMENT'          = CGPG1 ET CGTK1;
TAB0 . 'TEMPS_CALCULES'      = LTP_HYDR ;
TAB0 . 'TEMPS_SAUVES'        = LSA_HYDR ;
TAB0 . 'PROCEDURE_THERMIQUE' = 'NONLINEAIRE' ;
TAB0 . 'RELAXATION_THETA'    = 1.0 ;
*TAB0 . 'PRECISION_THERMIQUE' = 5.E-2;
*TAB0 . 'PRECISION' = 5.E-2;
TAB0 . 'MOVA'                = 'D' ;

*--Convection de la vapeur (gerée par la procedure CHARTHM)--*
TAB0 . 'MO_CONVECTION_VAPEUR'     = TABLE;
TAB0 . 'MO_CONVECTION_VAPEUR' . 1 = MODCOH ;
TAB0 . 'MA_CONVECTION_VAPEUR'     = TABLE  ;
TAB0 . 'MA_CONVECTION_VAPEUR' . 1 = MATCOH ;
TAB0 . 'CH_CONVECTION_VAPEUR'     = TABLE  ;
TAB0 . 'CH_CONVECTION_VAPEUR' . 1 = CGPC1  ;
*---------------------------------------------------------------------*
TAB0 . 'THM_PARAMETRES'      = MATTHC ;
TAB0 . 'TEMPERATURES'        = 'TABL' ;
TAB0 . 'TEMPERATURES' . 0    = CI_TH ;
TAB0 . 'HYDRATATION'         = 'TABL' ;
TAB0 . 'HYDRATATION' .  0    = MANU CHML MODTHC 'SCAL' HY_0;
TAB0 . 'DCH'                 = 'TABL' ;
TAB0 . 'DCH' .  0            = MANU CHML MODTHC 'SCAL' HY_0;
*---------------------------------------------------------------------*
PASAPAS TAB0;


*---------------------------------------------------------------------*
* DRYING AND AGING
*---------------------------------------------------------------------*
MATCOH  = 'MATE' MODCOH   'H'  0.002;

* Reprise du calcul
TAB0 . 'MA_CONVECTION_VAPEUR' . 1 = MATCOH ;
TAB0 . 'TEMPS_CALCULES'           = LTP_AGIN ;
TAB0 . 'TEMPS_SAUVES'             = LSA_AGIN ;
PASAPAS TAB0;
*---------------------------------------------------------------------*

*======================================================================*
*
*======================================================================*
OPTI 'ECHO' 0 ;
MESS ' ' ;
MESS '====================================================' ;
MESS ' KIEM TRA THONG SO KHOI TAO (INITIAL CHECK) ' ;
MESS '====================================================' ;

* 1
MESS '1. GIOI HAN HOA HOC (Tu @POWERS):' ;
MESS '- Do thuy hoa toi da (GAM0)    : ' GAM0 ;
MESS '- Nuoc lien ket toi da (WINF)  : ' WINF ;
MESS '- Do rong cuoi cung (POR1)     : ' POR1 ;
MESS '- Bien do do rong (APOR)       : ' APOR ;
MESS ' ' ;

*
MESS '2. GIA TRI BAN DANG EP VAO (INPUT):' ;
MESS '- Do thuy hoa ban dau (HY_0)   : ' HY_0 ;
MESS ' ' ;

*
MESS '3. GIA TRI TRUONG VAT LY (CH_INIT):' ;
VAL_T  = MAXI (EXCO 'T'  CI_TH) ;
VAL_PG = MAXI (EXCO 'PG' CI_TH) ;
VAL_PC = MAXI (EXCO 'PC' CI_TH) ;
MESS '- Nhiet do ban dau (T)         : ' VAL_T ;
MESS '- Ap suat khi ban dau (PG)     : ' VAL_PG ;
MESS '- Ap suat mao dan ban dau (PC) : ' VAL_PC ;
MESS '====================================================' ;
MESS ' ' ;


*======================================================================*
* TRÍCH XUẤT OUTPUT Ở THỜI ĐIỂM CUỐI CÙNG TRƯỚC KHI CRASH
*======================================================================*
MESS ' ' ;
MESS '====================================================' ;
MESS ' KIEM TRA OUTPUT SAT MEP CRASH ' ;
MESS '====================================================' ;

* 1. Tìm xem code sống sót được đến bước số mấy
NB_STEP = (DIME (TAB0 . 'TEMPERATURES')) - 1 ;
MESS '=> Thuật toán đã chạy được đến Step số: ' NB_STEP ;

* NẾU NB_STEP = 0, NGHĨA LÀ NÓ CHẾT NGAY TỪ GIÂY ĐẦU TIÊN (Lỗi Input)
SI (NB_STEP > 0) ;
* Lấy kết quả ở bước cuối cùng
    CH_LAST = TAB0 . 'TEMPERATURES' . NB_STEP ;

* Tách từng trường vật lý ra
    CH_T_LAST  = EXCO 'T'  CH_LAST ;
    CH_PG_LAST = EXCO 'PG' CH_LAST ;
    CH_PC_LAST = EXCO 'PC' CH_LAST ;

* In ra giá trị Min/Max để tìm "Thủ phạm" (Số âm)
    MESS '1. NHIET DO (T) [C]      : Min=' (MINI CH_T_LAST)  ' / Max=' (MAXI CH_T_LAST) ;
    MESS '2. AP SUAT KHI (Pg) [Pa] : Min=' (MINI CH_PG_LAST) ' / Max=' (MAXI CH_PG_LAST) ;
    MESS '3. AP SUAT MAO DAN (Pc)  : Min=' (MINI CH_PC_LAST) ' / Max=' (MAXI CH_PC_LAST) ;

* (Tùy chọn) Vẽ đồ thị áp suất hoặc nhiệt độ tại thời điểm này
* EV_PG = EVOL 'CHPO' CH_PG_LAST P0 P1 ;
* DESS EV_PG 'TITR' 'Ap suat khi o buoc cuoi cung' ;
SINO ;
    MESS '=> CODE CHUA CHAY DUOC BUOC NAO! LOI DO THONG SO KHOI TAO t=0.' ;
FINSI ;
MESS '====================================================' ;
MESS ' ' ;

*---------------------------------------------------------------------*
opti SAUV 'EXAMPLE1D_HAA1_2024_PHASE1';
SAUV;
*---------------------------------------------------------------------*


*---------------------------------------------------------------------*
opti REST 'EXAMPLE1D_HAA1_2024_PHASE1';
REST;
*---------------------------------------------------------------------*

OPTI ECHO 0;
*list (DIME  TAB0 . 'TEMPERATURES');
*list TAB0 . 'TEMPS';


*---------------------------------------------------------------------*
* ACCIDENT
*---------------------------------------------------------------------*
*---------------------------------------------------------------------*
DEBP PARATHER ;
  'ARGUMENT' TABTHER*'TABLE' INST*'FLOTTANT' ;
* (FRA) TABTHER est la table d'entree de PASAPAS
*       INST est l'instant courant de calcul
* (ENG) TABTHER is the input table of the PASAPAS procedur
*       INST is the current calculation time

* (FRA) Le chargement doit etre mis a jour dans TABTHER.'WTABLE' !
* (ENG) The loading must be updated in the TABTHER.'WTABLE' table !
* (FRA) L'indice 'THER_COURANT' contient le champ de temperatures de
*       l'iteration courante. Le chargement est mis a jour pour avoir
*       TS = T sur le tube.
* (ENG) The 'THER_COURANT' indice is containing the current iteration
*       temperature field. The loading is updated to have TS = T.

*'MESS' 'ENTRA PARATHER';

WTABLE = TABTHER .'WTABLE' ;

SI (INST '>' 0.31104000E+08);
   MATCOT  = 'MATE' MODCOT   'H'     20.  ;
   MATRAY  = 'MATE' MODRAY   'EMIS'   0.9  ;
   WTABLE.'MAT_TOT' = MATTHC et MATCOT et MATRAY;
FINS;

FINP;
*---------------------------------------------------------------------*


MATCOH  = 'MATE' MODCOH   'H'     0.02 ;


* Reprise du calcul
TAB0 . 'PROCEDURE_PARATHER'    = VRAI ;
TAB0 . 'CTE_STEFAN_BOLTZMANN'     = 5.673e-8 ;
TAB0 . 'CONVECTION_VAPEUR'        = 2 ;
TAB0 . 'MA_CONVECTION_VAPEUR' . 1 = MATCOH ;
TAB0 . 'TEMPS_CALCULES'           = LTP_ACCI ;
TAB0 . 'TEMPS_SAUVES'             = LSA_ACCI ;
*TAB0 . 'PRECISION_THERMIQUE'      = 5.E-4;
PASAPAS TAB0;
*---------------------------------------------------------------------


*---------------------------------------------------------------------*
* SAVE RESULTS
*---------------------------------------------------------------------*
opti SAUV 'EXAMPLE1D_HAA1_2024_PHASE2';
SAUV ;
*---------------------------------------------------------------------*

*fin;


*---------------------------------------------------------------------*
* VISULAIZATION OF RESULTS
*---------------------------------------------------------------------*
opti REST 'EXAMPLE1D_HAA1_2024_PHASE2';
REST ;
*---------------------------------------------------------------------*

OPTI ECHO 0;


* Calcul humidité relative (Loi de Clapeyron) et SW
TAB0 . 'HR' = TABLE;
TAB0 . 'SW' = TABLE;
*
VGA  = MANU CHPO MAIL1 1 'SCAL' a1;
VGB  = MANU CHPO MAIL1 1 'SCAL' b1;
VGC  = MANU CHPO MAIL1 1 'SCAL' c1;
VGHY = MANU CHPO MAIL1 1 'SCAL' gam0;
*
N1 = 0;
REPETER BOU_HR (DIME  TAB0 . 'TEMPERATURES' );
   CHTKi = EXCO 'T'  TAB0 . 'TEMPERATURES' . N1;
   CHPCi = EXCO 'PC' TAB0 . 'TEMPERATURES' . N1;
   CHPGi = EXCO 'PG' TAB0 . 'TEMPERATURES' . N1;
   HYDRi = CHAN CHPO TAB0 . 'HYDRATATION' . N1  MODTHC;
   CHPVSATi CHPGWSCi RHOGWi XX YY ZZ = @PVSAT CHPGi CHPCi CHTKi;
   SWi = @SATURA CHPCi CHTKi HYDRi VGA VGB VGC VGHY;
   HRi   =   CHPGWSCi * (CHPVSATi**-1);
   TAB0 . 'HR' . N1 = HRi;
   TAB0 . 'SW' . N1 = SWi;
   N1 = N1 + 1;
FIN BOU_HR;


LIST (DIME TAB0 . 'TEMPERATURES' );

NTOT = DIME TAB0.'TEMPERATURES';
MESS '--- Total saved steps = ' NTOT;

* 1hr after accident start
NN1 = 191 + 60;
* 2hr after accident start
NN2 = 191 + 120;
* 3hr after accident start
*NN3 = 191 + 180;

NN3 = NTOT-11;
NN4 = NTOT-6;
NN5 = NTOT-1;


*********** TEMPERATURE ********************************************
EVT1 = EVOL 'BLEU' 'CHPO'  tab0.temperatures.NN1 'T'  l12;
EVT2 = EVOL 'VERT' 'CHPO'  tab0.temperatures.NN2 'T'  l12;
EVT3 = EVOL 'ROUG' 'CHPO'  tab0.temperatures.NN3 'T'  l12;
EVT4 = EVOL 'TURQ' 'CHPO'  tab0.temperatures.NN4 'T'  l12;
EVT5 = EVOL 'JAUN' 'CHPO'  tab0.temperatures.NN5 'T'  l12;
*dess (EVT1 ET EVT2 ET EVT3 ET EVT4 ET EVT5);
dess (EVT3 ET EVT4 ET EVT5);
********************************************************************

*********** Saturation degree **************************************
EVSW1 =  EVOL 'BLEU'  'CHPO'  tab0.SW.NN1  'SCAL'  l12;
EVSW2 =  EVOL 'VERT'  'CHPO'  tab0.SW.NN2  'SCAL'  l12;
EVSW3 =  EVOL 'ROUG'  'CHPO'  tab0.SW.NN3  'SCAL'  l12;
EVSW4 =  EVOL 'TURQ'  'CHPO'  tab0.SW.NN4  'SCAL'  l12;
EVSW5 =  EVOL 'JAUN'  'CHPO'  tab0.SW.NN5  'SCAL'  l12;
*dess (EVSW1 ET EVSW2 ET EVSW3 ET EVSW4 ET EVSW5);
dess (EVSW3 ET EVSW4 ET EVSW5);
********************************************************************

*********** GAS PRESSURE *******************************************
EVPG1= EVOL 'BLEU' 'CHPO' tab0.temperatures.NN1 'PG'  l12;
EVPG2= EVOL 'VERT' 'CHPO' tab0.temperatures.NN2 'PG'  l12;
EVPG3= EVOL 'ROUG' 'CHPO' tab0.temperatures.NN3 'PG'  l12;
EVPG4= EVOL 'TURQ' 'CHPO' tab0.temperatures.NN4 'PG'  l12;
EVPG5= EVOL 'JAUN' 'CHPO' tab0.temperatures.NN5 'PG'  l12;
*dess (EVPG1 ET EVPG2 ET EVPG3 ET EVPG4 ET EVPG5);
dess (EVPG3 ET EVPG4 ET EVPG5);
************

*********** CAPILLARY PRESSURE *******************************************
EVPC1= EVOL 'BLEU' 'CHPO' tab0.temperatures.NN1 'PC'  l12;
EVPC2= EVOL 'VERT' 'CHPO' tab0.temperatures.NN2 'PC'  l12;
EVPC3= EVOL 'ROUG' 'CHPO' tab0.temperatures.NN3 'PC'  l12;
EVPC4= EVOL 'TURQ' 'CHPO' tab0.temperatures.NN4 'PC'  l12;
EVPC5= EVOL 'JAUN' 'CHPO' tab0.temperatures.NN5 'PC'  l12;
*dess (EVPC1 ET EVPC2 ET EVPC3 ET EVPC4 ET EVPC5);
dess (EVPC3 ET EVPC4 ET EVPC5);
************


TRAC   TAB0 . 'DCH' .  370   MODTHC;
